<?xml version="1.0" encoding="UTF-8"?>
<fdm_config name="D150 AGILE" release="BETA" version="2.0">
   <metrics>
      <wingarea unit="M2">130.514</wingarea>
      <wingspan unit="M">33.914</wingspan>
      <chord unit="M">4.192</chord>
      <htailarea unit="M2">32.758</htailarea>
      <htailarm unit="M">17.727</htailarm>
      <vtailarea unit="M2">46.589</vtailarea>
      <htailarm unit="M2">16.961</htailarm>
      <location name="AERORP" unit="M">
         <x>16.3282</x>
         <y>0.000000</y>
         <z>-1.136280</z>
      </location>
      <location name="EYEPOINT" unit="M">
         <x>14.6200</x>
         <y>0.000000</y>
         <z>-0.100000</z>
      </location>
      <location name="VRP" unit="M">
         <x>16.3282</x>
         <y>0.000000</y>
         <z>-1.136280</z>
      </location>
   </metrics>
   <mass_balance>
      <ixx unit="KG*M2">761969.688</ixx>
      <iyy unit="KG*M2">1997119.840</iyy>
      <izz unit="KG*M2">2567919.197</izz>
      <ixy unit="KG*M2">0.000000</ixy>
      <ixz unit="KG*M2">8000.000</ixz>
      <iyz unit="KG*M2">0.000000</iyz>
      <emptywt unit="KG">37340.020</emptywt>
      <location name="CG" unit="M">
         <x>16.0519</x>
         <y>0.000000</y>
         <z>0.000000</z>
      </location>
   </mass_balance>
   <ground_reactions>
      <contact name="Nose Gear" type="BOGEY">
         <location unit="M">
            <x>5.0720</x>
            <y>0.000000</y>
            <z>-1.690730</z>
         </location>
         <static_friction>0.8000</static_friction>
         <dynamic_friction>0.5000</dynamic_friction>
         <rolling_friction>0.0200</rolling_friction>
         <spring_coeff unit="LBS/FT">133934.750</spring_coeff>
         <dynamic_coeff unit="LBS/FT">5952.656</dynamic_coeff>
         <damping_coeff_rebound unit="LBS/FT/SEC">11905.311</damping_coeff_rebound>
         <max_steer unit="DEG">35.000</max_steer>
         <brake_group>NONE</brake_group>
         <retractable>1.0000</retractable>
      </contact>
      <contact name="Right Main Gear" type="BOGEY">
         <location unit="M">
            <x>16.1264</x>
            <y>3.7814</y>
            <z>-1.305452</z>
         </location>
         <static_friction>0.8000</static_friction>
         <dynamic_friction>0.5000</dynamic_friction>
         <rolling_friction>0.0200</rolling_friction>
         <spring_coeff unit="LBS/FT">178579.673</spring_coeff>
         <dynamic_coeff unit="LBS/FT">14881.640</dynamic_coeff>
         <damping_coeff_rebound unit="LBS/FT/SEC">29763.270</damping_coeff_rebound>
         <max_steer unit="DEG">0.000000</max_steer>
         <brake_group>RIGHT</brake_group>
         <retractable>1.0000</retractable>
      </contact>
      <contact name="Left Main Gear" type="BOGEY">
         <location unit="M">
            <x>16.1264</x>
            <y>-3.781379</y>
            <z>-1.305452</z>
         </location>
         <static_friction>0.8000</static_friction>
         <dynamic_friction>0.5000</dynamic_friction>
         <rolling_friction>0.0200</rolling_friction>
         <spring_coeff unit="LBS/FT">178579.673</spring_coeff>
         <dynamic_coeff unit="LBS/FT">14881.640</dynamic_coeff>
         <damping_coeff_rebound unit="LBS/FT/SEC">29763.270</damping_coeff_rebound>
         <max_steer unit="DEG">0.000000</max_steer>
         <brake_group>LEFT</brake_group>
         <retractable>1.0000</retractable>
      </contact>
   </ground_reactions>
   <propulsion>
      <engine file="D150_AGILE_engine">
         <location unit="M">
            <x>13.6765</x>
            <y>5.7482</y>
            <z>-2.338950</z>
         </location>
         <orient unit="DEG">
            <roll>0.000000</roll>
            <pitch>0.000000</pitch>
            <yaw>0.000000</yaw>
         </orient>
         <feed>0</feed>
         <feed>1</feed>
         <feed>2</feed>
         <thruster file="direct">
            <location unit="M">
               <x>13.6765</x>
               <y>5.7482</y>
               <z>-2.338950</z>
            </location>
            <orient unit="DEG">
               <roll>0.000000</roll>
               <pitch>0.000000</pitch>
               <yaw>0.000000</yaw>
            </orient>
         </thruster>
      </engine>
      <engine file="D150_AGILE_engine">
         <location unit="M">
            <x>13.6765</x>
            <y>-5.748200</y>
            <z>-2.338950</z>
         </location>
         <orient unit="DEG">
            <roll>0.000000</roll>
            <pitch>0.000000</pitch>
            <yaw>0.000000</yaw>
         </orient>
         <feed>3</feed>
         <feed>4</feed>
         <feed>5</feed>
         <thruster file="direct">
            <location unit="M">
               <x>13.6765</x>
               <y>-5.748200</y>
               <z>-2.338950</z>
            </location>
            <orient unit="DEG">
               <roll>0.000000</roll>
               <pitch>0.000000</pitch>
               <yaw>0.000000</yaw>
            </orient>
         </thruster>
      </engine>
      <tank type="FUEL">
         <location unit="M">
            <x>14.7736</x>
            <y>0.9362</y>
            <z>-1.212579</z>
         </location>
         <capacity unit="KG">3271.985</capacity>
         <contents unit="KG">3271.985</contents>
      </tank>
      <tank type="FUEL">
         <location unit="M">
            <x>15.9503</x>
            <z>-0.881934</z>
            <y>4.7680</y>
         </location>
         <capacity unit="KG">5532.997</capacity>
         <contents unit="KG">5532.997</contents>
      </tank>
      <tank type="FUEL">
         <location unit="M">
            <x>18.8026</x>
            <z>-0.241955</z>
            <y>11.3816</y>
         </location>
         <capacity unit="KG">707.706</capacity>
         <contents unit="KG">707.706</contents>
      </tank>
      <tank type="FUEL">
         <location unit="M">
            <x>14.7736</x>
            <y>-0.936171</y>
            <z>-1.212579</z>
         </location>
         <capacity unit="KG">3271.985</capacity>
         <contents unit="KG">3271.985</contents>
      </tank>
      <tank type="FUEL">
         <location unit="M">
            <x>15.9503</x>
            <z>-0.881934</z>
            <y>-4.767959</y>
         </location>
         <capacity unit="KG">5532.997</capacity>
         <contents unit="KG">5532.997</contents>
      </tank>
      <tank type="FUEL">
         <location unit="M">
            <x>18.8026</x>
            <z>-0.241955</z>
            <y>-11.381596</y>
         </location>
         <capacity unit="KG">707.706</capacity>
         <contents unit="KG">707.706</contents>
      </tank>
   </propulsion>
   <flight_control name="FCS :D150 AGILE">
      <channel name="Pitch">
         <summer name="fcs/pitch-trim-sum">
            <input>fcs/elevator-cmd-norm</input>
            <input>fcs/pitch-trim-cmd-norm</input>
            <clipto>
               <min>-1</min>
               <max>1</max>
            </clipto>
         </summer>
         <aerosurface_scale name="Elevator Control">
            <input>fcs/pitch-trim-sum</input>
            <range>
               <min>-15.0</min>
               <max>30.0</max>
            </range>
            <output>fcs/elevator-pos-deg</output>
         </aerosurface_scale>
         <aerosurface_scale name="Elevator Normalized">
            <input>fcs/elevator-pos-deg</input>
            <domain>
               <min>-15.0</min>
               <max>30.0</max>
            </domain>
            <range>
               <min> -1</min>
               <max> 1</max>
            </range>
            <output>fcs/elevator-pos-norm</output>
         </aerosurface_scale>
      </channel>
      <channel name="Yaw">
         <summer name="fcs/yaw-trim-sum">
            <input>fcs/rudder-cmd-norm</input>
            <input>fcs/yaw-trim-cmd-norm</input>
            <clipto>
               <min>-1</min>
               <max>1</max>
            </clipto>
         </summer>
         <aerosurface_scale name="Rudder Control">
            <input>fcs/yaw-trim-sum</input>
            <range>
               <min>-30.0</min>
               <max>30.0</max>
            </range>
            <output>fcs/rudder-pos-deg</output>
         </aerosurface_scale>
         <aerosurface_scale name="Rudder Normalized">
            <input>fcs/rudder-pos-deg</input>
            <domain>
               <min>-30.0</min>
               <max>30.0</max>
            </domain>
            <range>
               <min> -1</min>
               <max> 1</max>
            </range>
            <output>fcs/rudder-pos-norm</output>
         </aerosurface_scale>
      </channel>
      <channel name="Roll">
         <summer name="roll Trim Sum">
            <input>fcs/aileron-cmd-norm</input>
            <input>fcs/roll-trim-cmd-norm</input>
            <clipto>
               <min>-1</min>
               <max>1</max>
            </clipto>
         </summer>
         <aerosurface_scale name="Right Aileron Control">
            <input>fcs/roll-trim-sum</input>
            <output>fcs/right-aileron-pos-deg</output>
            <range>
               <min>-25.0</min>
               <max>25.0</max>
            </range>
         </aerosurface_scale>
         <aerosurface_scale name="Right Aileron Normalized">
            <input>fcs/right-aileron-pos-deg</input>
            <domain>
               <min>-25.0</min>
               <max>25.0</max>
            </domain>
            <range>
               <min> -1</min>
               <max> 1</max>
            </range>
            <output>fcs/right-aileron-pos-norm</output>
         </aerosurface_scale>
         <aerosurface_scale name="Left Aileron Control">
            <input>fcs/roll-trim-sum</input>
            <output>fcs/left-aileron-pos-rad</output>
            <range>
               <min>-25.0</min>
               <max>25.0</max>
            </range>
            <gain>0.0175</gain>
         </aerosurface_scale>
         <aerosurface_scale name="Left Aileron position normalized">
            <input>fcs/left-aileron-pos-deg</input>
            <domain>
               <min>-25.0</min>
               <max>25.0</max>
            </domain>
            <range>
               <min> -1</min>
               <max> 1</max>
            </range>
            <output>fcs/left-aileron-pos-norm</output>
         </aerosurface_scale>
      </channel>
      <channel name="Flap">
         <aerosurface_scale name="Flap Position Normalizer">
            <input>fcs/flap-pos-deg</input>
            <domain>
               <min>0</min>
               <max>35.0</max>
            </domain>
            <range>
               <min> 0</min>
               <max> 1</max>
            </range>
            <output>fcs/flap-pos-norm</output>
         </aerosurface_scale>
      </channel>
   </flight_control>
   <aerodynamics>
      <axis name="DRAG">
         <function name="aero/forces/drag_basic_Mach">
            <description>drag force due to alpha beta Reynolds number and Mach number</description>
            <product>
               <property>aero/qbar-psf</property>
               <property>metrics/Sw-sqft</property>
               <property>aero/function/drag_coeff_basic_Mach</property>
            </product>
         </function>
         <function name="aero/function/drag_coeff_basic_Mach">
            <product>
               <interpolate1d>
                  <p>velocities/mach</p>
                  <v>0.200</v>
                  <p>aero/function/drag_coeff_basic_M0</p>
                  <v>0.600</v>
                  <p>aero/function/drag_coeff_basic_M1</p>
                  <v>0.780</v>
                  <p>aero/function/drag_coeff_basic_M2</p>
                  <v>0.800</v>
                  <p>aero/function/drag_coeff_basic_M3</p>
               </interpolate1d>
            </product>
         </function>
         <function name="aero/function/drag_coeff_basic_M0">
            <product>
               <table>
                  <independentVar lookup="row">aero/alpha-deg</independentVar>
                  <independentVar lookup="column">aero/beta-deg</independentVar>
                  <independentVar lookup="table">aero/Re</independentVar>
                  <tableData breakPoint="1.12018250784E7">
 	0.0	10.0
-5.0	0.0023264608105732117	0.006092301193227579
-2.5	6.593089183729332E-4	0.004823720895149592
0.0	0.0026414	0.007085716312585755
1.0	0.00445597662464807	0.008981375601177288
2.0	0.006847856294847406	0.011438363516096646
3.0	0.009806478002083736	0.014444198582858255
4.0	0.013308616784374998	0.017961062881949593
5.0	0.017317543377671517	0.021850895364885145
6.0	0.021801128930038563	0.02554771363947389
7.5	0.02962533815637025	0.030203973085777325
10.0	0.0467918212470009	0.051603854270714566
12.5	0.06759191118071334	0.07117912937004349
</tableData>
                  <tableData breakPoint="3.36054752352E7">
 	0.0	10.0
-5.0	0.0023264608105732117	0.006092301193227579
-2.5	6.593089183729332E-4	0.004823720895149592
0.0	0.0026414	0.007085716312585755
1.0	0.00445597662464807	0.008981375601177288
2.0	0.006847856294847406	0.011438363516096646
3.0	0.009806478002083736	0.014444198582858255
4.0	0.013308616784374998	0.017961062881949593
5.0	0.017317543377671517	0.021850895364885145
6.0	0.021801128930038563	0.02554771363947389
7.5	0.02962533815637025	0.030203973085777325
10.0	0.0467918212470009	0.051603854270714566
12.5	0.06759191118071334	0.07117912937004349
</tableData>
                  <tableData breakPoint="4.36871178058E7">
 	0.0	10.0
-5.0	0.0023264608105732117	0.006092301193227579
-2.5	6.593089183729332E-4	0.004823720895149592
0.0	0.0026414	0.007085716312585755
1.0	0.00445597662464807	0.008981375601177288
2.0	0.006847856294847406	0.011438363516096646
3.0	0.009806478002083736	0.014444198582858255
4.0	0.013308616784374998	0.017961062881949593
5.0	0.017317543377671517	0.021850895364885145
6.0	0.021801128930038563	0.02554771363947389
7.5	0.02962533815637025	0.030203973085777325
10.0	0.0467918212470009	0.051603854270714566
12.5	0.06759191118071334	0.07117912937004349
</tableData>
                  <tableData breakPoint="4.48073003136E7">
 	0.0	10.0
-5.0	0.0023264608105732117	0.006092301193227579
-2.5	6.593089183729332E-4	0.004823720895149592
0.0	0.0026414	0.007085716312585755
1.0	0.00445597662464807	0.008981375601177288
2.0	0.006847856294847406	0.011438363516096646
3.0	0.009806478002083736	0.014444198582858255
4.0	0.013308616784374998	0.017961062881949593
5.0	0.017317543377671517	0.021850895364885145
6.0	0.021801128930038563	0.02554771363947389
7.5	0.02962533815637025	0.030203973085777325
10.0	0.0467918212470009	0.051603854270714566
12.5	0.06759191118071334	0.07117912937004349
</tableData>
               </table>
            </product>
         </function>
         <function name="aero/function/drag_coeff_basic_M1">
            <product>
               <table>
                  <independentVar lookup="row">aero/alpha-deg</independentVar>
                  <independentVar lookup="column">aero/beta-deg</independentVar>
                  <independentVar lookup="table">aero/Re</independentVar>
                  <tableData breakPoint="1.12018250784E7">
 	0.0	10.0
-5.0	0.0028495351398102834	0.0074616269809817115
-2.5	8.074952153037896E-4	0.005907817693603431
0.0	0.0032351	0.008678156391447707
1.0	0.00545731123039522	0.010999629092827238
2.0	0.0083875983809111	0.014009092483825758
3.0	0.012010386451976818	0.017690544043573574
4.0	0.016300341745452314	0.021997360568473578
5.0	0.02121033477086425	0.026762313830473953
6.0	0.026700650283316127	0.03128823240263976
7.5	0.03628591973130908	0.036998563185826214
10.0	0.05730256785353979	0.0631859069768049
12.5	0.08278075069578328	0.08716584948972701
</tableData>
                  <tableData breakPoint="3.36054752352E7">
 	0.0	10.0
-5.0	0.0028495351398102834	0.0074616269809817115
-2.5	8.074952153037896E-4	0.005907817693603431
0.0	0.0032351	0.008678156391447707
1.0	0.00545731123039522	0.010999629092827238
2.0	0.0083875983809111	0.014009092483825758
3.0	0.012010386451976818	0.017690544043573574
4.0	0.016300341745452314	0.021997360568473578
5.0	0.02121033477086425	0.026762313830473953
6.0	0.026700650283316127	0.03128823240263976
7.5	0.03628591973130908	0.036998563185826214
10.0	0.05730256785353979	0.0631859069768049
12.5	0.08278075069578328	0.08716584948972701
</tableData>
                  <tableData breakPoint="4.36871178058E7">
 	0.0	10.0
-5.0	0.0028495351398102834	0.0074616269809817115
-2.5	8.074952153037896E-4	0.005907817693603431
0.0	0.0032351	0.008678156391447707
1.0	0.00545731123039522	0.010999629092827238
2.0	0.0083875983809111	0.014009092483825758
3.0	0.012010386451976818	0.017690544043573574
4.0	0.016300341745452314	0.021997360568473578
5.0	0.02121033477086425	0.026762313830473953
6.0	0.026700650283316127	0.03128823240263976
7.5	0.03628591973130908	0.036998563185826214
10.0	0.05730256785353979	0.0631859069768049
12.5	0.08278075069578328	0.08716584948972701
</tableData>
                  <tableData breakPoint="4.48073003136E7">
 	0.0	10.0
-5.0	0.0028495351398102834	0.0074616269809817115
-2.5	8.074952153037896E-4	0.005907817693603431
0.0	0.0032351	0.008678156391447707
1.0	0.00545731123039522	0.010999629092827238
2.0	0.0083875983809111	0.014009092483825758
3.0	0.012010386451976818	0.017690544043573574
4.0	0.016300341745452314	0.021997360568473578
5.0	0.02121033477086425	0.026762313830473953
6.0	0.026700650283316127	0.03128823240263976
7.5	0.03628591973130908	0.036998563185826214
10.0	0.05730256785353979	0.0631859069768049
12.5	0.08278075069578328	0.08716584948972701
</tableData>
               </table>
            </product>
         </function>
         <function name="aero/function/drag_coeff_basic_M2">
            <product>
               <table>
                  <independentVar lookup="row">aero/alpha-deg</independentVar>
                  <independentVar lookup="column">aero/beta-deg</independentVar>
                  <independentVar lookup="table">aero/Re</independentVar>
                  <tableData breakPoint="1.12018250784E7">
 	0.0	10.0
-5.0	0.003643478618292513	0.009537086413946141
-2.5	0.0010323140207493782	0.0075523173527814805
0.0	0.0041358	0.011094200129365447
1.0	0.006976620346788755	0.014061423584929775
2.0	0.010722006158570357	0.017909618762547517
3.0	0.015353540403465812	0.022615668448147244
4.0	0.020837478515978412	0.028120641171523124
5.0	0.027117604938862977	0.03420981766390321
6.0	0.034133869655736726	0.04000525427033745
7.5	0.04638577545932995	0.04730376244183949
10.0	0.07326181261251344	0.08079219356093856
12.5	0.10582271055578107	0.11141558135807329
</tableData>
                  <tableData breakPoint="3.36054752352E7">
 	0.0	10.0
-5.0	0.003643478618292513	0.009537086413946141
-2.5	0.0010323140207493782	0.0075523173527814805
0.0	0.0041358	0.011094200129365447
1.0	0.006976620346788755	0.014061423584929775
2.0	0.010722006158570357	0.017909618762547517
3.0	0.015353540403465812	0.022615668448147244
4.0	0.020837478515978412	0.028120641171523124
5.0	0.027117604938862977	0.03420981766390321
6.0	0.034133869655736726	0.04000525427033745
7.5	0.04638577545932995	0.04730376244183949
10.0	0.07326181261251344	0.08079219356093856
12.5	0.10582271055578107	0.11141558135807329
</tableData>
                  <tableData breakPoint="4.36871178058E7">
 	0.0	10.0
-5.0	0.003643478618292513	0.009537086413946141
-2.5	0.0010323140207493782	0.0075523173527814805
0.0	0.0041358	0.011094200129365447
1.0	0.006976620346788755	0.014061423584929775
2.0	0.010722006158570357	0.017909618762547517
3.0	0.015353540403465812	0.022615668448147244
4.0	0.020837478515978412	0.028120641171523124
5.0	0.027117604938862977	0.03420981766390321
6.0	0.034133869655736726	0.04000525427033745
7.5	0.04638577545932995	0.04730376244183949
10.0	0.07326181261251344	0.08079219356093856
12.5	0.10582271055578107	0.11141558135807329
</tableData>
                  <tableData breakPoint="4.48073003136E7">
 	0.0	10.0
-5.0	0.003643478618292513	0.009537086413946141
-2.5	0.0010323140207493782	0.0075523173527814805
0.0	0.0041358	0.011094200129365447
1.0	0.006976620346788755	0.014061423584929775
2.0	0.010722006158570357	0.017909618762547517
3.0	0.015353540403465812	0.022615668448147244
4.0	0.020837478515978412	0.028120641171523124
5.0	0.027117604938862977	0.03420981766390321
6.0	0.034133869655736726	0.04000525427033745
7.5	0.04638577545932995	0.04730376244183949
10.0	0.07326181261251344	0.08079219356093856
12.5	0.10582271055578107	0.11141558135807329
</tableData>
               </table>
            </product>
         </function>
         <function name="aero/function/drag_coeff_basic_M3">
            <product>
               <table>
                  <independentVar lookup="row">aero/alpha-deg</independentVar>
                  <independentVar lookup="column">aero/beta-deg</independentVar>
                  <independentVar lookup="table">aero/Re</independentVar>
                  <tableData breakPoint="1.12018250784E7">
 	0.0	10.0
-5.0	0.0038006253544974264	0.009948277423651324
-2.5	0.001076712350490703	0.007878073657366615
0.0	0.0043135	0.01157072485379221
1.0	0.007276473148548417	0.01466702069571466
2.0	0.01118301504595012	0.018678211151175458
3.0	0.016013674149448282	0.023586153901448196
4.0	0.021732858907619834	0.029331857707881052
5.0	0.028278371181398032	0.03567997224508788
6.0	0.035604419010180174	0.041712145587390906
7.5	0.048376875435338085	0.04933347791093179
10.0	0.07640342380471965	0.08425796678034773
12.5	0.11038225492859283	0.11621746471157195
</tableData>
                  <tableData breakPoint="3.36054752352E7">
 	0.0	10.0
-5.0	0.0038006253544974264	0.009948277423651324
-2.5	0.001076712350490703	0.007878073657366615
0.0	0.0043135	0.01157072485379221
1.0	0.007276473148548417	0.01466702069571466
2.0	0.01118301504595012	0.018678211151175458
3.0	0.016013674149448282	0.023586153901448196
4.0	0.021732858907619834	0.029331857707881052
5.0	0.028278371181398032	0.03567997224508788
6.0	0.035604419010180174	0.041712145587390906
7.5	0.048376875435338085	0.04933347791093179
10.0	0.07640342380471965	0.08425796678034773
12.5	0.11038225492859283	0.11621746471157195
</tableData>
                  <tableData breakPoint="4.36871178058E7">
 	0.0	10.0
-5.0	0.0038006253544974264	0.009948277423651324
-2.5	0.001076712350490703	0.007878073657366615
0.0	0.0043135	0.01157072485379221
1.0	0.007276473148548417	0.01466702069571466
2.0	0.01118301504595012	0.018678211151175458
3.0	0.016013674149448282	0.023586153901448196
4.0	0.021732858907619834	0.029331857707881052
5.0	0.028278371181398032	0.03567997224508788
6.0	0.035604419010180174	0.041712145587390906
7.5	0.048376875435338085	0.04933347791093179
10.0	0.07640342380471965	0.08425796678034773
12.5	0.11038225492859283	0.11621746471157195
</tableData>
                  <tableData breakPoint="4.48073003136E7">
 	0.0	10.0
-5.0	0.0038006253544974264	0.009948277423651324
-2.5	0.001076712350490703	0.007878073657366615
0.0	0.0043135	0.01157072485379221
1.0	0.007276473148548417	0.01466702069571466
2.0	0.01118301504595012	0.018678211151175458
3.0	0.016013674149448282	0.023586153901448196
4.0	0.021732858907619834	0.029331857707881052
5.0	0.028278371181398032	0.03567997224508788
6.0	0.035604419010180174	0.041712145587390906
7.5	0.048376875435338085	0.04933347791093179
10.0	0.07640342380471965	0.08425796678034773
12.5	0.11038225492859283	0.11621746471157195
</tableData>
               </table>
            </product>
         </function>
         <function name="aero/function/aileron_drag_coeff_basic_Mach_deflection">
            <product>
               <interpolate1d>
                  <p>fcs/right-aileron-pos-deg</p>
                  <v>-3.000000</v>
                  <p>aero/function/aileron_drag_coeff_basic_Mach_deflection_0</p>
                  <v>3.0000</v>
                  <p>aero/function/aileron_drag_coeff_basic_Mach_deflection_1</p>
               </interpolate1d>
            </product>
         </function>
         <function name="aero/function/aileron_drag_coeff_basic_Mach_deflection_0">
            <product>
               <interpolate1d>
                  <p>velocities/mach</p>
                  <v>0.2000</v>
                  <p>aero/function/aileron_drag_coeff_basic_M0_deflection_0</p>
                  <v>0.6000</v>
                  <p>aero/function/aileron_drag_coeff_basic_M1_deflection_0</p>
                  <v>0.7800</v>
                  <p>aero/function/aileron_drag_coeff_basic_M2_deflection_0</p>
                  <v>0.8000</v>
                  <p>aero/function/aileron_drag_coeff_basic_M3_deflection_0</p>
               </interpolate1d>
            </product>
         </function>
         <function name="aero/function/aileron_drag_coeff_basic_M0_deflection_0">
            <product>
               <table>
                  <independentVar lookup="row">aero/alpha-deg</independentVar>
                  <independentVar lookup="column">aero/beta-deg</independentVar>
                  <independentVar lookup="table">aero/Re</independentVar>
                  <tableData breakPoint="1.12018250784E7">
 	0.0	10.0
-5.0	8.360139746724208E-5	-1.046333235077533E-5
-2.5	8.405318130641613E-5	1.9606093852602064E-4
0.0	8.2044E-5	-3.127375334277519E-6
1.0	8.146604127231474E-5	1.73702697482485E-4
2.0	7.936847549079882E-5	9.609104474623975E-6
3.0	7.80883096611695E-5	1.5402465669001045E-4
4.0	7.626434724268904E-5	3.0243685986696932E-5
5.0	7.467601119255269E-5	1.2660575925835E-4
6.0	7.237151624246563E-5	7.033035139303282E-5
7.5	6.952377624342225E-5	8.052951931378456E-5
10.0	6.329790484666586E-5	3.26010983287584E-5
12.5	5.7681565466098105E-5	9.236344597336971E-5
</tableData>
                  <tableData breakPoint="3.36054752352E7">
 	0.0	10.0
-5.0	2.3523023133753765E-4	3.9566465131861753E-4
-2.5	4.679160354798036E-5	-8.975925452945272E-5
0.0	5.8315E-5	1.8153220732698824E-4
1.0	1.4906245909496158E-4	3.610325662200193E-5
2.0	2.2741146972364717E-5	1.1320041154443778E-4
3.0	1.7936492572774313E-4	9.873184988424897E-5
4.0	-5.2774559835959634E-5	2.596922438044571E-5
5.0	2.4868583633580417E-4	1.7998795288471959E-4
6.0	-1.2987385228846094E-4	1.0263702601448618E-4
7.5	3.418863418369134E-4	1.2132843574087834E-4
10.0	-3.1289753867545875E-4	1.1044262584363187E-5
12.5	5.538208023903755E-4	2.3635952677058416E-4
</tableData>
                  <tableData breakPoint="4.36871178058E7">
 	0.0	10.0
-5.0	8.360139746724208E-5	-1.046333235077533E-5
-2.5	8.405318130641613E-5	1.9606093852602064E-4
0.0	8.2044E-5	-3.127375334277519E-6
1.0	8.146604127231474E-5	1.73702697482485E-4
2.0	7.936847549079882E-5	9.609104474623975E-6
3.0	7.80883096611695E-5	1.5402465669001045E-4
4.0	7.626434724268904E-5	3.0243685986696932E-5
5.0	7.467601119255269E-5	1.2660575925835E-4
6.0	7.237151624246563E-5	7.033035139303282E-5
7.5	6.952377624342225E-5	8.052951931378456E-5
10.0	6.329790484666586E-5	3.26010983287584E-5
12.5	5.7681565466098105E-5	9.236344597336971E-5
</tableData>
                  <tableData breakPoint="4.48073003136E7">
 	0.0	10.0
-5.0	2.3523023133753765E-4	3.9566465131861753E-4
-2.5	4.679160354798036E-5	-8.975925452945272E-5
0.0	5.8315E-5	1.8153220732698824E-4
1.0	1.4906245909496158E-4	3.610325662200193E-5
2.0	2.2741146972364717E-5	1.1320041154443778E-4
3.0	1.7936492572774313E-4	9.873184988424897E-5
4.0	-5.2774559835959634E-5	2.596922438044571E-5
5.0	2.4868583633580417E-4	1.7998795288471959E-4
6.0	-1.2987385228846094E-4	1.0263702601448618E-4
7.5	3.418863418369134E-4	1.2132843574087834E-4
10.0	-3.1289753867545875E-4	1.1044262584363187E-5
12.5	5.538208023903755E-4	2.3635952677058416E-4
</tableData>
               </table>
            </product>
         </function>
         <function name="aero/function/aileron_drag_coeff_basic_M1_deflection_0">
            <product>
               <table>
                  <independentVar lookup="row">aero/alpha-deg</independentVar>
                  <independentVar lookup="column">aero/beta-deg</independentVar>
                  <independentVar lookup="table">aero/Re</independentVar>
                  <tableData breakPoint="1.12018250784E7">
 	0.0	10.0
-5.0	8.360139746724208E-5	-1.046333235077533E-5
-2.5	8.405318130641613E-5	1.9606093852602064E-4
0.0	8.2044E-5	-3.127375334277519E-6
1.0	8.146604127231474E-5	1.73702697482485E-4
2.0	7.936847549079882E-5	9.609104474623975E-6
3.0	7.80883096611695E-5	1.5402465669001045E-4
4.0	7.626434724268904E-5	3.0243685986696932E-5
5.0	7.467601119255269E-5	1.2660575925835E-4
6.0	7.237151624246563E-5	7.033035139303282E-5
7.5	6.952377624342225E-5	8.052951931378456E-5
10.0	6.329790484666586E-5	3.26010983287584E-5
12.5	5.7681565466098105E-5	9.236344597336971E-5
</tableData>
                  <tableData breakPoint="3.36054752352E7">
 	0.0	10.0
-5.0	2.3523023133753765E-4	3.9566465131861753E-4
-2.5	4.679160354798036E-5	-8.975925452945272E-5
0.0	5.8315E-5	1.8153220732698824E-4
1.0	1.4906245909496158E-4	3.610325662200193E-5
2.0	2.2741146972364717E-5	1.1320041154443778E-4
3.0	1.7936492572774313E-4	9.873184988424897E-5
4.0	-5.2774559835959634E-5	2.596922438044571E-5
5.0	2.4868583633580417E-4	1.7998795288471959E-4
6.0	-1.2987385228846094E-4	1.0263702601448618E-4
7.5	3.418863418369134E-4	1.2132843574087834E-4
10.0	-3.1289753867545875E-4	1.1044262584363187E-5
12.5	5.538208023903755E-4	2.3635952677058416E-4
</tableData>
                  <tableData breakPoint="4.36871178058E7">
 	0.0	10.0
-5.0	8.360139746724208E-5	-1.046333235077533E-5
-2.5	8.405318130641613E-5	1.9606093852602064E-4
0.0	8.2044E-5	-3.127375334277519E-6
1.0	8.146604127231474E-5	1.73702697482485E-4
2.0	7.936847549079882E-5	9.609104474623975E-6
3.0	7.80883096611695E-5	1.5402465669001045E-4
4.0	7.626434724268904E-5	3.0243685986696932E-5
5.0	7.467601119255269E-5	1.2660575925835E-4
6.0	7.237151624246563E-5	7.033035139303282E-5
7.5	6.952377624342225E-5	8.052951931378456E-5
10.0	6.329790484666586E-5	3.26010983287584E-5
12.5	5.7681565466098105E-5	9.236344597336971E-5
</tableData>
                  <tableData breakPoint="4.48073003136E7">
 	0.0	10.0
-5.0	2.3523023133753765E-4	3.9566465131861753E-4
-2.5	4.679160354798036E-5	-8.975925452945272E-5
0.0	5.8315E-5	1.8153220732698824E-4
1.0	1.4906245909496158E-4	3.610325662200193E-5
2.0	2.2741146972364717E-5	1.1320041154443778E-4
3.0	1.7936492572774313E-4	9.873184988424897E-5
4.0	-5.2774559835959634E-5	2.596922438044571E-5
5.0	2.4868583633580417E-4	1.7998795288471959E-4
6.0	-1.2987385228846094E-4	1.0263702601448618E-4
7.5	3.418863418369134E-4	1.2132843574087834E-4
10.0	-3.1289753867545875E-4	1.1044262584363187E-5
12.5	5.538208023903755E-4	2.3635952677058416E-4
</tableData>
               </table>
            </product>
         </function>
         <function name="aero/function/aileron_drag_coeff_basic_M2_deflection_0">
            <product>
               <table>
                  <independentVar lookup="row">aero/alpha-deg</independentVar>
                  <independentVar lookup="column">aero/beta-deg</independentVar>
                  <independentVar lookup="table">aero/Re</independentVar>
                  <tableData breakPoint="1.12018250784E7">
 	0.0	10.0
-5.0	1.0238927692555043E-4	-1.2817303356356727E-5
-2.5	1.0294259957621076E-4	2.401213806922337E-4
0.0	1.0048E-4	-3.827789882486352E-6
1.0	9.977337168552053E-5	2.1274182771990446E-4
2.0	9.720341806375221E-5	1.176685696843695E-5
3.0	9.56355314823434E-5	1.886398113813101E-4
4.0	9.340860774341397E-5	3.7041869026753356E-5
5.0	9.146317803825787E-5	1.5506320547956385E-4
6.0	8.863957237140134E-5	8.6139762532038E-5
7.5	8.515177525752762E-5	9.863097425559983E-5
10.0	7.75265124262325E-5	3.992476707372104E-5
12.5	7.064755389464264E-5	1.1311910390335365E-4
</tableData>
                  <tableData breakPoint="3.36054752352E7">
 	0.0	10.0
-5.0	2.881005577632465E-4	4.845951448343964E-4
-2.5	5.7299827647360336E-5	-1.0993198155183755E-4
0.0	7.1422E-5	2.2233521305251995E-4
1.0	1.8256000286504746E-4	4.421521138196418E-5
2.0	2.7852388659583497E-5	1.3865049621188038E-4
3.0	2.1967196955716394E-4	1.2093106468091462E-4
4.0	-6.463360453003077E-5	3.180915256954432E-5
5.0	3.0457464422818496E-4	2.2043951024504859E-4
6.0	-1.5905974831262445E-4	1.2571207465931068E-4
7.5	4.187174306565156E-4	1.4859237346355266E-4
10.0	-3.832261736647588E-4	1.3522588530768296E-5
12.5	6.782963052725505E-4	2.894815082917451E-4
</tableData>
                  <tableData breakPoint="4.36871178058E7">
 	0.0	10.0
-5.0	1.0238927692555043E-4	-1.2817303356356727E-5
-2.5	1.0294259957621076E-4	2.401213806922337E-4
0.0	1.0048E-4	-3.827789882486352E-6
1.0	9.977337168552053E-5	2.1274182771990446E-4
2.0	9.720341806375221E-5	1.176685696843695E-5
3.0	9.56355314823434E-5	1.886398113813101E-4
4.0	9.340860774341397E-5	3.7041869026753356E-5
5.0	9.146317803825787E-5	1.5506320547956385E-4
6.0	8.863957237140134E-5	8.6139762532038E-5
7.5	8.515177525752762E-5	9.863097425559983E-5
10.0	7.75265124262325E-5	3.992476707372104E-5
12.5	7.064755389464264E-5	1.1311910390335365E-4
</tableData>
                  <tableData breakPoint="4.48073003136E7">
 	0.0	10.0
-5.0	2.881005577632465E-4	4.845951448343964E-4
-2.5	5.7299827647360336E-5	-1.0993198155183755E-4
0.0	7.1422E-5	2.2233521305251995E-4
1.0	1.8256000286504746E-4	4.421521138196418E-5
2.0	2.7852388659583497E-5	1.3865049621188038E-4
3.0	2.1967196955716394E-4	1.2093106468091462E-4
4.0	-6.463360453003077E-5	3.180915256954432E-5
5.0	3.0457464422818496E-4	2.2043951024504859E-4
6.0	-1.5905974831262445E-4	1.2571207465931068E-4
7.5	4.187174306565156E-4	1.4859237346355266E-4
10.0	-3.832261736647588E-4	1.3522588530768296E-5
12.5	6.782963052725505E-4	2.894815082917451E-4
</tableData>
               </table>
            </product>
         </function>
         <function name="aero/function/aileron_drag_coeff_basic_M3_deflection_0">
            <product>
               <table>
                  <independentVar lookup="row">aero/alpha-deg</independentVar>
                  <independentVar lookup="column">aero/beta-deg</independentVar>
                  <independentVar lookup="table">aero/Re</independentVar>
                  <tableData breakPoint="1.12018250784E7">
 	0.0	10.0
-5.0	1.0238927692555043E-4	-1.2817303356356727E-5
-2.5	1.0294259957621076E-4	2.401213806922337E-4
0.0	1.0048E-4	-3.827789882486352E-6
1.0	9.977337168552053E-5	2.1274182771990446E-4
2.0	9.720341806375221E-5	1.176685696843695E-5
3.0	9.56355314823434E-5	1.886398113813101E-4
4.0	9.340860774341397E-5	3.7041869026753356E-5
5.0	9.146317803825787E-5	1.5506320547956385E-4
6.0	8.863957237140134E-5	8.6139762532038E-5
7.5	8.515177525752762E-5	9.863097425559983E-5
10.0	7.75265124262325E-5	3.992476707372104E-5
12.5	7.064755389464264E-5	1.1311910390335365E-4
</tableData>
                  <tableData breakPoint="3.36054752352E7">
 	0.0	10.0
-5.0	2.881005577632465E-4	4.845951448343964E-4
-2.5	5.7299827647360336E-5	-1.0993198155183755E-4
0.0	7.1422E-5	2.2233521305251995E-4
1.0	1.8256000286504746E-4	4.421521138196418E-5
2.0	2.7852388659583497E-5	1.3865049621188038E-4
3.0	2.1967196955716394E-4	1.2093106468091462E-4
4.0	-6.463360453003077E-5	3.180915256954432E-5
5.0	3.0457464422818496E-4	2.2043951024504859E-4
6.0	-1.5905974831262445E-4	1.2571207465931068E-4
7.5	4.187174306565156E-4	1.4859237346355266E-4
10.0	-3.832261736647588E-4	1.3522588530768296E-5
12.5	6.782963052725505E-4	2.894815082917451E-4
</tableData>
                  <tableData breakPoint="4.36871178058E7">
 	0.0	10.0
-5.0	1.0238927692555043E-4	-1.2817303356356727E-5
-2.5	1.0294259957621076E-4	2.401213806922337E-4
0.0	1.0048E-4	-3.827789882486352E-6
1.0	9.977337168552053E-5	2.1274182771990446E-4
2.0	9.720341806375221E-5	1.176685696843695E-5
3.0	9.56355314823434E-5	1.886398113813101E-4
4.0	9.340860774341397E-5	3.7041869026753356E-5
5.0	9.146317803825787E-5	1.5506320547956385E-4
6.0	8.863957237140134E-5	8.6139762532038E-5
7.5	8.515177525752762E-5	9.863097425559983E-5
10.0	7.75265124262325E-5	3.992476707372104E-5
12.5	7.064755389464264E-5	1.1311910390335365E-4
</tableData>
                  <tableData breakPoint="4.48073003136E7">
 	0.0	10.0
-5.0	2.881005577632465E-4	4.845951448343964E-4
-2.5	5.7299827647360336E-5	-1.0993198155183755E-4
0.0	7.1422E-5	2.2233521305251995E-4
1.0	1.8256000286504746E-4	4.421521138196418E-5
2.0	2.7852388659583497E-5	1.3865049621188038E-4
3.0	2.1967196955716394E-4	1.2093106468091462E-4
4.0	-6.463360453003077E-5	3.180915256954432E-5
5.0	3.0457464422818496E-4	2.2043951024504859E-4
6.0	-1.5905974831262445E-4	1.2571207465931068E-4
7.5	4.187174306565156E-4	1.4859237346355266E-4
10.0	-3.832261736647588E-4	1.3522588530768296E-5
12.5	6.782963052725505E-4	2.894815082917451E-4
</tableData>
               </table>
            </product>
         </function>
         <function name="aero/function/aileron_drag_coeff_basic_Mach_deflection_1">
            <product>
               <interpolate1d>
                  <p>velocities/mach</p>
                  <v>0.2000</v>
                  <p>aero/function/aileron_drag_coeff_basic_M0_deflection_1</p>
                  <v>0.6000</v>
                  <p>aero/function/aileron_drag_coeff_basic_M1_deflection_1</p>
                  <v>0.7800</v>
                  <p>aero/function/aileron_drag_coeff_basic_M2_deflection_1</p>
                  <v>0.8000</v>
                  <p>aero/function/aileron_drag_coeff_basic_M3_deflection_1</p>
               </interpolate1d>
            </product>
         </function>
         <function name="aero/function/aileron_drag_coeff_basic_M0_deflection_1">
            <product>
               <table>
                  <independentVar lookup="row">aero/alpha-deg</independentVar>
                  <independentVar lookup="column">aero/beta-deg</independentVar>
                  <independentVar lookup="table">aero/Re</independentVar>
                  <tableData breakPoint="1.12018250784E7">
 	0.0	10.0
-5.0	1.3089572442203577E-4	-1.6378088242119962E-5
-2.5	1.3160309740995767E-4	3.0698027083410644E-4
0.0	1.2846E-4	-4.893711280503689E-6
1.0	1.27556645057806E-4	2.7197213493630247E-4
2.0	1.242653194313818E-4	1.5039053256033673E-5
3.0	1.2226090099941785E-4	2.411572889584045E-4
4.0	1.1941282469453234E-4	4.734877895405745E-5
5.0	1.1692574302739272E-4	1.982288469354551E-4
6.0	1.1331013601085272E-4	1.1011726359011867E-4
7.5	1.088510898878346E-4	1.2608640923464622E-4
10.0	9.910337574289035E-5	5.103594509971271E-5
12.5	9.030964220376074E-5	1.4460784483608945E-4
</tableData>
                  <tableData breakPoint="3.36054752352E7">
 	0.0	10.0
-5.0	3.6830703786528085E-4	6.195160240738043E-4
-2.5	7.325853681423047E-5	-1.4053452976004415E-4
0.0	9.1306E-5	2.8423369273862455E-4
1.0	2.3339212572679585E-4	5.65274459794961E-5
2.0	3.561657132811815E-5	1.7725136089774543E-4
3.0	2.808319590771681E-4	1.5459453483550838E-4
4.0	-8.26268447550441E-5	4.066909090817194E-5
5.0	3.893748410409751E-4	2.81810830021255E-4
6.0	-2.0333379768967656E-4	1.6070912549644598E-4
7.5	5.352988107568497E-4	1.8995984292493934E-4
10.0	-4.899146275418204E-4	1.7284754863988008E-5
12.5	8.671349202943252E-4	3.7007781871639553E-4
</tableData>
                  <tableData breakPoint="4.36871178058E7">
 	0.0	10.0
-5.0	1.3089572442203577E-4	-1.6378088242119962E-5
-2.5	1.3160309740995767E-4	3.0698027083410644E-4
0.0	1.2846E-4	-4.893711280503689E-6
1.0	1.27556645057806E-4	2.7197213493630247E-4
2.0	1.242653194313818E-4	1.5039053256033673E-5
3.0	1.2226090099941785E-4	2.411572889584045E-4
4.0	1.1941282469453234E-4	4.734877895405745E-5
5.0	1.1692574302739272E-4	1.982288469354551E-4
6.0	1.1331013601085272E-4	1.1011726359011867E-4
7.5	1.088510898878346E-4	1.2608640923464622E-4
10.0	9.910337574289035E-5	5.103594509971271E-5
12.5	9.030964220376074E-5	1.4460784483608945E-4
</tableData>
                  <tableData breakPoint="4.48073003136E7">
 	0.0	10.0
-5.0	3.6830703786528085E-4	6.195160240738043E-4
-2.5	7.325853681423047E-5	-1.4053452976004415E-4
0.0	9.1306E-5	2.8423369273862455E-4
1.0	2.3339212572679585E-4	5.65274459794961E-5
2.0	3.561657132811815E-5	1.7725136089774543E-4
3.0	2.808319590771681E-4	1.5459453483550838E-4
4.0	-8.26268447550441E-5	4.066909090817194E-5
5.0	3.893748410409751E-4	2.81810830021255E-4
6.0	-2.0333379768967656E-4	1.6070912549644598E-4
7.5	5.352988107568497E-4	1.8995984292493934E-4
10.0	-4.899146275418204E-4	1.7284754863988008E-5
12.5	8.671349202943252E-4	3.7007781871639553E-4
</tableData>
               </table>
            </product>
         </function>
         <function name="aero/function/aileron_drag_coeff_basic_M1_deflection_1">
            <product>
               <table>
                  <independentVar lookup="row">aero/alpha-deg</independentVar>
                  <independentVar lookup="column">aero/beta-deg</independentVar>
                  <independentVar lookup="table">aero/Re</independentVar>
                  <tableData breakPoint="1.12018250784E7">
 	0.0	10.0
-5.0	1.3089572442203577E-4	-1.6378088242119962E-5
-2.5	1.3160309740995767E-4	3.0698027083410644E-4
0.0	1.2846E-4	-4.893711280503689E-6
1.0	1.27556645057806E-4	2.7197213493630247E-4
2.0	1.242653194313818E-4	1.5039053256033673E-5
3.0	1.2226090099941785E-4	2.411572889584045E-4
4.0	1.1941282469453234E-4	4.734877895405745E-5
5.0	1.1692574302739272E-4	1.982288469354551E-4
6.0	1.1331013601085272E-4	1.1011726359011867E-4
7.5	1.088510898878346E-4	1.2608640923464622E-4
10.0	9.910337574289035E-5	5.103594509971271E-5
12.5	9.030964220376074E-5	1.4460784483608945E-4
</tableData>
                  <tableData breakPoint="3.36054752352E7">
 	0.0	10.0
-5.0	3.6830703786528085E-4	6.195160240738043E-4
-2.5	7.325853681423047E-5	-1.4053452976004415E-4
0.0	9.1306E-5	2.8423369273862455E-4
1.0	2.3339212572679585E-4	5.65274459794961E-5
2.0	3.561657132811815E-5	1.7725136089774543E-4
3.0	2.808319590771681E-4	1.5459453483550838E-4
4.0	-8.26268447550441E-5	4.066909090817194E-5
5.0	3.893748410409751E-4	2.81810830021255E-4
6.0	-2.0333379768967656E-4	1.6070912549644598E-4
7.5	5.352988107568497E-4	1.8995984292493934E-4
10.0	-4.899146275418204E-4	1.7284754863988008E-5
12.5	8.671349202943252E-4	3.7007781871639553E-4
</tableData>
                  <tableData breakPoint="4.36871178058E7">
 	0.0	10.0
-5.0	1.3089572442203577E-4	-1.6378088242119962E-5
-2.5	1.3160309740995767E-4	3.0698027083410644E-4
0.0	1.2846E-4	-4.893711280503689E-6
1.0	1.27556645057806E-4	2.7197213493630247E-4
2.0	1.242653194313818E-4	1.5039053256033673E-5
3.0	1.2226090099941785E-4	2.411572889584045E-4
4.0	1.1941282469453234E-4	4.734877895405745E-5
5.0	1.1692574302739272E-4	1.982288469354551E-4
6.0	1.1331013601085272E-4	1.1011726359011867E-4
7.5	1.088510898878346E-4	1.2608640923464622E-4
10.0	9.910337574289035E-5	5.103594509971271E-5
12.5	9.030964220376074E-5	1.4460784483608945E-4
</tableData>
                  <tableData breakPoint="4.48073003136E7">
 	0.0	10.0
-5.0	3.6830703786528085E-4	6.195160240738043E-4
-2.5	7.325853681423047E-5	-1.4053452976004415E-4
0.0	9.1306E-5	2.8423369273862455E-4
1.0	2.3339212572679585E-4	5.65274459794961E-5
2.0	3.561657132811815E-5	1.7725136089774543E-4
3.0	2.808319590771681E-4	1.5459453483550838E-4
4.0	-8.26268447550441E-5	4.066909090817194E-5
5.0	3.893748410409751E-4	2.81810830021255E-4
6.0	-2.0333379768967656E-4	1.6070912549644598E-4
7.5	5.352988107568497E-4	1.8995984292493934E-4
10.0	-4.899146275418204E-4	1.7284754863988008E-5
12.5	8.671349202943252E-4	3.7007781871639553E-4
</tableData>
               </table>
            </product>
         </function>
         <function name="aero/function/aileron_drag_coeff_basic_M2_deflection_1">
            <product>
               <table>
                  <independentVar lookup="row">aero/alpha-deg</independentVar>
                  <independentVar lookup="column">aero/beta-deg</independentVar>
                  <independentVar lookup="table">aero/Re</independentVar>
                  <tableData breakPoint="1.12018250784E7">
 	0.0	10.0
-5.0	1.365256801039126E-4	-1.708732592411343E-5
-2.5	1.3726345830244533E-4	3.201646909239838E-4
0.0	1.3398E-4	-5.104298670574028E-6
1.0	1.3303784535106814E-4	2.836564064113487E-4
2.0	1.2960793525375528E-4	1.5687984970064794E-5
3.0	1.275173707415737E-4	2.5152090616293124E-4
4.0	1.2454171763263023E-4	4.9385992146204496E-5
5.0	1.2194787392115936E-4	2.0674796316029947E-4
6.0	1.1817911792102175E-4	1.1484992148643277E-4
7.5	1.135286556236536E-4	1.315053131910438E-4
10.0	1.0335999281196434E-4	5.323739565314049E-5
12.5	9.418841849687859E-5	1.5082048312135702E-4
</tableData>
                  <tableData breakPoint="3.36054752352E7">
 	0.0	10.0
-5.0	3.841282334283222E-4	6.461356824087235E-4
-2.5	7.640122417605931E-5	-1.4657612957517794E-4
0.0	9.5229E-5	2.964469507366932E-4
1.0	2.4342058455157885E-4	5.895902782493454E-5
2.0	3.7141012832091484E-5	1.848623231193015E-4
3.0	2.9289911559678985E-4	1.6123798351752158E-4
4.0	-8.618478980037603E-5	4.240606001222521E-5
5.0	4.0610533602042977E-4	2.939250691034766E-4
6.0	-2.1206938077963016E-4	1.676029319517078E-4
7.5	5.582945888967152E-4	1.981240907416846E-4
10.0	-5.109715142455219E-4	1.802993156193609E-5
12.5	9.044019629185297E-4	3.859731807033648E-4
</tableData>
                  <tableData breakPoint="4.36871178058E7">
 	0.0	10.0
-5.0	1.365256801039126E-4	-1.708732592411343E-5
-2.5	1.3726345830244533E-4	3.201646909239838E-4
0.0	1.3398E-4	-5.104298670574028E-6
1.0	1.3303784535106814E-4	2.836564064113487E-4
2.0	1.2960793525375528E-4	1.5687984970064794E-5
3.0	1.275173707415737E-4	2.5152090616293124E-4
4.0	1.2454171763263023E-4	4.9385992146204496E-5
5.0	1.2194787392115936E-4	2.0674796316029947E-4
6.0	1.1817911792102175E-4	1.1484992148643277E-4
7.5	1.135286556236536E-4	1.315053131910438E-4
10.0	1.0335999281196434E-4	5.323739565314049E-5
12.5	9.418841849687859E-5	1.5082048312135702E-4
</tableData>
                  <tableData breakPoint="4.48073003136E7">
 	0.0	10.0
-5.0	3.841282334283222E-4	6.461356824087235E-4
-2.5	7.640122417605931E-5	-1.4657612957517794E-4
0.0	9.5229E-5	2.964469507366932E-4
1.0	2.4342058455157885E-4	5.895902782493454E-5
2.0	3.7141012832091484E-5	1.848623231193015E-4
3.0	2.9289911559678985E-4	1.6123798351752158E-4
4.0	-8.618478980037603E-5	4.240606001222521E-5
5.0	4.0610533602042977E-4	2.939250691034766E-4
6.0	-2.1206938077963016E-4	1.676029319517078E-4
7.5	5.582945888967152E-4	1.981240907416846E-4
10.0	-5.109715142455219E-4	1.802993156193609E-5
12.5	9.044019629185297E-4	3.859731807033648E-4
</tableData>
               </table>
            </product>
         </function>
         <function name="aero/function/aileron_drag_coeff_basic_M3_deflection_1">
            <product>
               <table>
                  <independentVar lookup="row">aero/alpha-deg</independentVar>
                  <independentVar lookup="column">aero/beta-deg</independentVar>
                  <independentVar lookup="table">aero/Re</independentVar>
                  <tableData breakPoint="1.12018250784E7">
 	0.0	10.0
-5.0	1.365256801039126E-4	-1.708732592411343E-5
-2.5	1.3726345830244533E-4	3.201646909239838E-4
0.0	1.3398E-4	-5.104298670574028E-6
1.0	1.3303784535106814E-4	2.836564064113487E-4
2.0	1.2960793525375528E-4	1.5687984970064794E-5
3.0	1.275173707415737E-4	2.5152090616293124E-4
4.0	1.2454171763263023E-4	4.9385992146204496E-5
5.0	1.2194787392115936E-4	2.0674796316029947E-4
6.0	1.1817911792102175E-4	1.1484992148643277E-4
7.5	1.135286556236536E-4	1.315053131910438E-4
10.0	1.0335999281196434E-4	5.323739565314049E-5
12.5	9.418841849687859E-5	1.5082048312135702E-4
</tableData>
                  <tableData breakPoint="3.36054752352E7">
 	0.0	10.0
-5.0	3.841282334283222E-4	6.461356824087235E-4
-2.5	7.640122417605931E-5	-1.4657612957517794E-4
0.0	9.5229E-5	2.964469507366932E-4
1.0	2.4342058455157885E-4	5.895902782493454E-5
2.0	3.7141012832091484E-5	1.848623231193015E-4
3.0	2.9289911559678985E-4	1.6123798351752158E-4
4.0	-8.618478980037603E-5	4.240606001222521E-5
5.0	4.0610533602042977E-4	2.939250691034766E-4
6.0	-2.1206938077963016E-4	1.676029319517078E-4
7.5	5.582945888967152E-4	1.981240907416846E-4
10.0	-5.109715142455219E-4	1.802993156193609E-5
12.5	9.044019629185297E-4	3.859731807033648E-4
</tableData>
                  <tableData breakPoint="4.36871178058E7">
 	0.0	10.0
-5.0	1.365256801039126E-4	-1.708732592411343E-5
-2.5	1.3726345830244533E-4	3.201646909239838E-4
0.0	1.3398E-4	-5.104298670574028E-6
1.0	1.3303784535106814E-4	2.836564064113487E-4
2.0	1.2960793525375528E-4	1.5687984970064794E-5
3.0	1.275173707415737E-4	2.5152090616293124E-4
4.0	1.2454171763263023E-4	4.9385992146204496E-5
5.0	1.2194787392115936E-4	2.0674796316029947E-4
6.0	1.1817911792102175E-4	1.1484992148643277E-4
7.5	1.135286556236536E-4	1.315053131910438E-4
10.0	1.0335999281196434E-4	5.323739565314049E-5
12.5	9.418841849687859E-5	1.5082048312135702E-4
</tableData>
                  <tableData breakPoint="4.48073003136E7">
 	0.0	10.0
-5.0	3.841282334283222E-4	6.461356824087235E-4
-2.5	7.640122417605931E-5	-1.4657612957517794E-4
0.0	9.5229E-5	2.964469507366932E-4
1.0	2.4342058455157885E-4	5.895902782493454E-5
2.0	3.7141012832091484E-5	1.848623231193015E-4
3.0	2.9289911559678985E-4	1.6123798351752158E-4
4.0	-8.618478980037603E-5	4.240606001222521E-5
5.0	4.0610533602042977E-4	2.939250691034766E-4
6.0	-2.1206938077963016E-4	1.676029319517078E-4
7.5	5.582945888967152E-4	1.981240907416846E-4
10.0	-5.109715142455219E-4	1.802993156193609E-5
12.5	9.044019629185297E-4	3.859731807033648E-4
</tableData>
               </table>
            </product>
         </function>
         <function name="aero/function/aileron_drag_coeff_effect">
            <sum>
               <p>aero/function/aileron_drag_coeff_basic_Mach_deflection</p>
               <p>aero/function/drag_coeff_basic_Mach</p>
            </sum>
         </function>
         <function name="aero/forces/aileron_drag_basic_Mach">
            <description>drag force due to alpha beta Reynolds number and Mach number</description>
            <product>
               <property>aero/qbar-psf</property>
               <property>metrics/Sw-sqft</property>
               <property>aero/function/aileron_drag_coeff_effect</property>
            </product>
         </function>
         <function name="aero/function/elevator_drag_coeff_basic_Mach_deflection">
            <product>
               <interpolate1d>
                  <p>fcs/elevator-pos-deg</p>
                  <v>-3.000000</v>
                  <p>aero/function/elevator_drag_coeff_basic_Mach_deflection_0</p>
                  <v>3.0000</v>
                  <p>aero/function/elevator_drag_coeff_basic_Mach_deflection_1</p>
               </interpolate1d>
            </product>
         </function>
         <function name="aero/function/elevator_drag_coeff_basic_Mach_deflection_0">
            <product>
               <interpolate1d>
                  <p>velocities/mach</p>
                  <v>0.2000</v>
                  <p>aero/function/elevator_drag_coeff_basic_M0_deflection_0</p>
                  <v>0.6000</v>
                  <p>aero/function/elevator_drag_coeff_basic_M1_deflection_0</p>
                  <v>0.7800</v>
                  <p>aero/function/elevator_drag_coeff_basic_M2_deflection_0</p>
                  <v>0.8000</v>
                  <p>aero/function/elevator_drag_coeff_basic_M3_deflection_0</p>
               </interpolate1d>
            </product>
         </function>
         <function name="aero/function/elevator_drag_coeff_basic_M0_deflection_0">
            <product>
               <table>
                  <independentVar lookup="row">aero/alpha-deg</independentVar>
                  <independentVar lookup="column">aero/beta-deg</independentVar>
                  <independentVar lookup="table">aero/Re</independentVar>
                  <tableData breakPoint="1.12018250784E7">
 	0.0	10.0
-5.0	8.360139746724208E-5	-1.046333235077533E-5
-2.5	8.405318130641613E-5	1.9606093852602064E-4
0.0	8.2044E-5	-3.127375334277519E-6
1.0	8.146604127231474E-5	1.73702697482485E-4
2.0	7.936847549079882E-5	9.609104474623975E-6
3.0	7.80883096611695E-5	1.5402465669001045E-4
4.0	7.626434724268904E-5	3.0243685986696932E-5
5.0	7.467601119255269E-5	1.2660575925835E-4
6.0	7.237151624246563E-5	7.033035139303282E-5
7.5	6.952377624342225E-5	8.052951931378456E-5
10.0	6.329790484666586E-5	3.26010983287584E-5
12.5	5.7681565466098105E-5	9.236344597336971E-5
</tableData>
                  <tableData breakPoint="3.36054752352E7">
 	0.0	10.0
-5.0	2.3523023133753765E-4	3.9566465131861753E-4
-2.5	4.679160354798036E-5	-8.975925452945272E-5
0.0	5.8315E-5	1.8153220732698824E-4
1.0	1.4906245909496158E-4	3.610325662200193E-5
2.0	2.2741146972364717E-5	1.1320041154443778E-4
3.0	1.7936492572774313E-4	9.873184988424897E-5
4.0	-5.2774559835959634E-5	2.596922438044571E-5
5.0	2.4868583633580417E-4	1.7998795288471959E-4
6.0	-1.2987385228846094E-4	1.0263702601448618E-4
7.5	3.418863418369134E-4	1.2132843574087834E-4
10.0	-3.1289753867545875E-4	1.1044262584363187E-5
12.5	5.538208023903755E-4	2.3635952677058416E-4
</tableData>
                  <tableData breakPoint="4.36871178058E7">
 	0.0	10.0
-5.0	8.360139746724208E-5	-1.046333235077533E-5
-2.5	8.405318130641613E-5	1.9606093852602064E-4
0.0	8.2044E-5	-3.127375334277519E-6
1.0	8.146604127231474E-5	1.73702697482485E-4
2.0	7.936847549079882E-5	9.609104474623975E-6
3.0	7.80883096611695E-5	1.5402465669001045E-4
4.0	7.626434724268904E-5	3.0243685986696932E-5
5.0	7.467601119255269E-5	1.2660575925835E-4
6.0	7.237151624246563E-5	7.033035139303282E-5
7.5	6.952377624342225E-5	8.052951931378456E-5
10.0	6.329790484666586E-5	3.26010983287584E-5
12.5	5.7681565466098105E-5	9.236344597336971E-5
</tableData>
                  <tableData breakPoint="4.48073003136E7">
 	0.0	10.0
-5.0	2.3523023133753765E-4	3.9566465131861753E-4
-2.5	4.679160354798036E-5	-8.975925452945272E-5
0.0	5.8315E-5	1.8153220732698824E-4
1.0	1.4906245909496158E-4	3.610325662200193E-5
2.0	2.2741146972364717E-5	1.1320041154443778E-4
3.0	1.7936492572774313E-4	9.873184988424897E-5
4.0	-5.2774559835959634E-5	2.596922438044571E-5
5.0	2.4868583633580417E-4	1.7998795288471959E-4
6.0	-1.2987385228846094E-4	1.0263702601448618E-4
7.5	3.418863418369134E-4	1.2132843574087834E-4
10.0	-3.1289753867545875E-4	1.1044262584363187E-5
12.5	5.538208023903755E-4	2.3635952677058416E-4
</tableData>
               </table>
            </product>
         </function>
         <function name="aero/function/elevator_drag_coeff_basic_M1_deflection_0">
            <product>
               <table>
                  <independentVar lookup="row">aero/alpha-deg</independentVar>
                  <independentVar lookup="column">aero/beta-deg</independentVar>
                  <independentVar lookup="table">aero/Re</independentVar>
                  <tableData breakPoint="1.12018250784E7">
 	0.0	10.0
-5.0	8.360139746724208E-5	-1.046333235077533E-5
-2.5	8.405318130641613E-5	1.9606093852602064E-4
0.0	8.2044E-5	-3.127375334277519E-6
1.0	8.146604127231474E-5	1.73702697482485E-4
2.0	7.936847549079882E-5	9.609104474623975E-6
3.0	7.80883096611695E-5	1.5402465669001045E-4
4.0	7.626434724268904E-5	3.0243685986696932E-5
5.0	7.467601119255269E-5	1.2660575925835E-4
6.0	7.237151624246563E-5	7.033035139303282E-5
7.5	6.952377624342225E-5	8.052951931378456E-5
10.0	6.329790484666586E-5	3.26010983287584E-5
12.5	5.7681565466098105E-5	9.236344597336971E-5
</tableData>
                  <tableData breakPoint="3.36054752352E7">
 	0.0	10.0
-5.0	2.3523023133753765E-4	3.9566465131861753E-4
-2.5	4.679160354798036E-5	-8.975925452945272E-5
0.0	5.8315E-5	1.8153220732698824E-4
1.0	1.4906245909496158E-4	3.610325662200193E-5
2.0	2.2741146972364717E-5	1.1320041154443778E-4
3.0	1.7936492572774313E-4	9.873184988424897E-5
4.0	-5.2774559835959634E-5	2.596922438044571E-5
5.0	2.4868583633580417E-4	1.7998795288471959E-4
6.0	-1.2987385228846094E-4	1.0263702601448618E-4
7.5	3.418863418369134E-4	1.2132843574087834E-4
10.0	-3.1289753867545875E-4	1.1044262584363187E-5
12.5	5.538208023903755E-4	2.3635952677058416E-4
</tableData>
                  <tableData breakPoint="4.36871178058E7">
 	0.0	10.0
-5.0	8.360139746724208E-5	-1.046333235077533E-5
-2.5	8.405318130641613E-5	1.9606093852602064E-4
0.0	8.2044E-5	-3.127375334277519E-6
1.0	8.146604127231474E-5	1.73702697482485E-4
2.0	7.936847549079882E-5	9.609104474623975E-6
3.0	7.80883096611695E-5	1.5402465669001045E-4
4.0	7.626434724268904E-5	3.0243685986696932E-5
5.0	7.467601119255269E-5	1.2660575925835E-4
6.0	7.237151624246563E-5	7.033035139303282E-5
7.5	6.952377624342225E-5	8.052951931378456E-5
10.0	6.329790484666586E-5	3.26010983287584E-5
12.5	5.7681565466098105E-5	9.236344597336971E-5
</tableData>
                  <tableData breakPoint="4.48073003136E7">
 	0.0	10.0
-5.0	2.3523023133753765E-4	3.9566465131861753E-4
-2.5	4.679160354798036E-5	-8.975925452945272E-5
0.0	5.8315E-5	1.8153220732698824E-4
1.0	1.4906245909496158E-4	3.610325662200193E-5
2.0	2.2741146972364717E-5	1.1320041154443778E-4
3.0	1.7936492572774313E-4	9.873184988424897E-5
4.0	-5.2774559835959634E-5	2.596922438044571E-5
5.0	2.4868583633580417E-4	1.7998795288471959E-4
6.0	-1.2987385228846094E-4	1.0263702601448618E-4
7.5	3.418863418369134E-4	1.2132843574087834E-4
10.0	-3.1289753867545875E-4	1.1044262584363187E-5
12.5	5.538208023903755E-4	2.3635952677058416E-4
</tableData>
               </table>
            </product>
         </function>
         <function name="aero/function/elevator_drag_coeff_basic_M2_deflection_0">
            <product>
               <table>
                  <independentVar lookup="row">aero/alpha-deg</independentVar>
                  <independentVar lookup="column">aero/beta-deg</independentVar>
                  <independentVar lookup="table">aero/Re</independentVar>
                  <tableData breakPoint="1.12018250784E7">
 	0.0	10.0
-5.0	1.0238927692555043E-4	-1.2817303356356727E-5
-2.5	1.0294259957621076E-4	2.401213806922337E-4
0.0	1.0048E-4	-3.827789882486352E-6
1.0	9.977337168552053E-5	2.1274182771990446E-4
2.0	9.720341806375221E-5	1.176685696843695E-5
3.0	9.56355314823434E-5	1.886398113813101E-4
4.0	9.340860774341397E-5	3.7041869026753356E-5
5.0	9.146317803825787E-5	1.5506320547956385E-4
6.0	8.863957237140134E-5	8.6139762532038E-5
7.5	8.515177525752762E-5	9.863097425559983E-5
10.0	7.75265124262325E-5	3.992476707372104E-5
12.5	7.064755389464264E-5	1.1311910390335365E-4
</tableData>
                  <tableData breakPoint="3.36054752352E7">
 	0.0	10.0
-5.0	2.881005577632465E-4	4.845951448343964E-4
-2.5	5.7299827647360336E-5	-1.0993198155183755E-4
0.0	7.1422E-5	2.2233521305251995E-4
1.0	1.8256000286504746E-4	4.421521138196418E-5
2.0	2.7852388659583497E-5	1.3865049621188038E-4
3.0	2.1967196955716394E-4	1.2093106468091462E-4
4.0	-6.463360453003077E-5	3.180915256954432E-5
5.0	3.0457464422818496E-4	2.2043951024504859E-4
6.0	-1.5905974831262445E-4	1.2571207465931068E-4
7.5	4.187174306565156E-4	1.4859237346355266E-4
10.0	-3.832261736647588E-4	1.3522588530768296E-5
12.5	6.782963052725505E-4	2.894815082917451E-4
</tableData>
                  <tableData breakPoint="4.36871178058E7">
 	0.0	10.0
-5.0	1.0238927692555043E-4	-1.2817303356356727E-5
-2.5	1.0294259957621076E-4	2.401213806922337E-4
0.0	1.0048E-4	-3.827789882486352E-6
1.0	9.977337168552053E-5	2.1274182771990446E-4
2.0	9.720341806375221E-5	1.176685696843695E-5
3.0	9.56355314823434E-5	1.886398113813101E-4
4.0	9.340860774341397E-5	3.7041869026753356E-5
5.0	9.146317803825787E-5	1.5506320547956385E-4
6.0	8.863957237140134E-5	8.6139762532038E-5
7.5	8.515177525752762E-5	9.863097425559983E-5
10.0	7.75265124262325E-5	3.992476707372104E-5
12.5	7.064755389464264E-5	1.1311910390335365E-4
</tableData>
                  <tableData breakPoint="4.48073003136E7">
 	0.0	10.0
-5.0	2.881005577632465E-4	4.845951448343964E-4
-2.5	5.7299827647360336E-5	-1.0993198155183755E-4
0.0	7.1422E-5	2.2233521305251995E-4
1.0	1.8256000286504746E-4	4.421521138196418E-5
2.0	2.7852388659583497E-5	1.3865049621188038E-4
3.0	2.1967196955716394E-4	1.2093106468091462E-4
4.0	-6.463360453003077E-5	3.180915256954432E-5
5.0	3.0457464422818496E-4	2.2043951024504859E-4
6.0	-1.5905974831262445E-4	1.2571207465931068E-4
7.5	4.187174306565156E-4	1.4859237346355266E-4
10.0	-3.832261736647588E-4	1.3522588530768296E-5
12.5	6.782963052725505E-4	2.894815082917451E-4
</tableData>
               </table>
            </product>
         </function>
         <function name="aero/function/elevator_drag_coeff_basic_M3_deflection_0">
            <product>
               <table>
                  <independentVar lookup="row">aero/alpha-deg</independentVar>
                  <independentVar lookup="column">aero/beta-deg</independentVar>
                  <independentVar lookup="table">aero/Re</independentVar>
                  <tableData breakPoint="1.12018250784E7">
 	0.0	10.0
-5.0	1.0238927692555043E-4	-1.2817303356356727E-5
-2.5	1.0294259957621076E-4	2.401213806922337E-4
0.0	1.0048E-4	-3.827789882486352E-6
1.0	9.977337168552053E-5	2.1274182771990446E-4
2.0	9.720341806375221E-5	1.176685696843695E-5
3.0	9.56355314823434E-5	1.886398113813101E-4
4.0	9.340860774341397E-5	3.7041869026753356E-5
5.0	9.146317803825787E-5	1.5506320547956385E-4
6.0	8.863957237140134E-5	8.6139762532038E-5
7.5	8.515177525752762E-5	9.863097425559983E-5
10.0	7.75265124262325E-5	3.992476707372104E-5
12.5	7.064755389464264E-5	1.1311910390335365E-4
</tableData>
                  <tableData breakPoint="3.36054752352E7">
 	0.0	10.0
-5.0	2.881005577632465E-4	4.845951448343964E-4
-2.5	5.7299827647360336E-5	-1.0993198155183755E-4
0.0	7.1422E-5	2.2233521305251995E-4
1.0	1.8256000286504746E-4	4.421521138196418E-5
2.0	2.7852388659583497E-5	1.3865049621188038E-4
3.0	2.1967196955716394E-4	1.2093106468091462E-4
4.0	-6.463360453003077E-5	3.180915256954432E-5
5.0	3.0457464422818496E-4	2.2043951024504859E-4
6.0	-1.5905974831262445E-4	1.2571207465931068E-4
7.5	4.187174306565156E-4	1.4859237346355266E-4
10.0	-3.832261736647588E-4	1.3522588530768296E-5
12.5	6.782963052725505E-4	2.894815082917451E-4
</tableData>
                  <tableData breakPoint="4.36871178058E7">
 	0.0	10.0
-5.0	1.0238927692555043E-4	-1.2817303356356727E-5
-2.5	1.0294259957621076E-4	2.401213806922337E-4
0.0	1.0048E-4	-3.827789882486352E-6
1.0	9.977337168552053E-5	2.1274182771990446E-4
2.0	9.720341806375221E-5	1.176685696843695E-5
3.0	9.56355314823434E-5	1.886398113813101E-4
4.0	9.340860774341397E-5	3.7041869026753356E-5
5.0	9.146317803825787E-5	1.5506320547956385E-4
6.0	8.863957237140134E-5	8.6139762532038E-5
7.5	8.515177525752762E-5	9.863097425559983E-5
10.0	7.75265124262325E-5	3.992476707372104E-5
12.5	7.064755389464264E-5	1.1311910390335365E-4
</tableData>
                  <tableData breakPoint="4.48073003136E7">
 	0.0	10.0
-5.0	2.881005577632465E-4	4.845951448343964E-4
-2.5	5.7299827647360336E-5	-1.0993198155183755E-4
0.0	7.1422E-5	2.2233521305251995E-4
1.0	1.8256000286504746E-4	4.421521138196418E-5
2.0	2.7852388659583497E-5	1.3865049621188038E-4
3.0	2.1967196955716394E-4	1.2093106468091462E-4
4.0	-6.463360453003077E-5	3.180915256954432E-5
5.0	3.0457464422818496E-4	2.2043951024504859E-4
6.0	-1.5905974831262445E-4	1.2571207465931068E-4
7.5	4.187174306565156E-4	1.4859237346355266E-4
10.0	-3.832261736647588E-4	1.3522588530768296E-5
12.5	6.782963052725505E-4	2.894815082917451E-4
</tableData>
               </table>
            </product>
         </function>
         <function name="aero/function/elevator_drag_coeff_basic_Mach_deflection_1">
            <product>
               <interpolate1d>
                  <p>velocities/mach</p>
                  <v>0.2000</v>
                  <p>aero/function/elevator_drag_coeff_basic_M0_deflection_1</p>
                  <v>0.6000</v>
                  <p>aero/function/elevator_drag_coeff_basic_M1_deflection_1</p>
                  <v>0.7800</v>
                  <p>aero/function/elevator_drag_coeff_basic_M2_deflection_1</p>
                  <v>0.8000</v>
                  <p>aero/function/elevator_drag_coeff_basic_M3_deflection_1</p>
               </interpolate1d>
            </product>
         </function>
         <function name="aero/function/elevator_drag_coeff_basic_M0_deflection_1">
            <product>
               <table>
                  <independentVar lookup="row">aero/alpha-deg</independentVar>
                  <independentVar lookup="column">aero/beta-deg</independentVar>
                  <independentVar lookup="table">aero/Re</independentVar>
                  <tableData breakPoint="1.12018250784E7">
 	0.0	10.0
-5.0	1.3089572442203577E-4	-1.6378088242119962E-5
-2.5	1.3160309740995767E-4	3.0698027083410644E-4
0.0	1.2846E-4	-4.893711280503689E-6
1.0	1.27556645057806E-4	2.7197213493630247E-4
2.0	1.242653194313818E-4	1.5039053256033673E-5
3.0	1.2226090099941785E-4	2.411572889584045E-4
4.0	1.1941282469453234E-4	4.734877895405745E-5
5.0	1.1692574302739272E-4	1.982288469354551E-4
6.0	1.1331013601085272E-4	1.1011726359011867E-4
7.5	1.088510898878346E-4	1.2608640923464622E-4
10.0	9.910337574289035E-5	5.103594509971271E-5
12.5	9.030964220376074E-5	1.4460784483608945E-4
</tableData>
                  <tableData breakPoint="3.36054752352E7">
 	0.0	10.0
-5.0	3.6830703786528085E-4	6.195160240738043E-4
-2.5	7.325853681423047E-5	-1.4053452976004415E-4
0.0	9.1306E-5	2.8423369273862455E-4
1.0	2.3339212572679585E-4	5.65274459794961E-5
2.0	3.561657132811815E-5	1.7725136089774543E-4
3.0	2.808319590771681E-4	1.5459453483550838E-4
4.0	-8.26268447550441E-5	4.066909090817194E-5
5.0	3.893748410409751E-4	2.81810830021255E-4
6.0	-2.0333379768967656E-4	1.6070912549644598E-4
7.5	5.352988107568497E-4	1.8995984292493934E-4
10.0	-4.899146275418204E-4	1.7284754863988008E-5
12.5	8.671349202943252E-4	3.7007781871639553E-4
</tableData>
                  <tableData breakPoint="4.36871178058E7">
 	0.0	10.0
-5.0	1.3089572442203577E-4	-1.6378088242119962E-5
-2.5	1.3160309740995767E-4	3.0698027083410644E-4
0.0	1.2846E-4	-4.893711280503689E-6
1.0	1.27556645057806E-4	2.7197213493630247E-4
2.0	1.242653194313818E-4	1.5039053256033673E-5
3.0	1.2226090099941785E-4	2.411572889584045E-4
4.0	1.1941282469453234E-4	4.734877895405745E-5
5.0	1.1692574302739272E-4	1.982288469354551E-4
6.0	1.1331013601085272E-4	1.1011726359011867E-4
7.5	1.088510898878346E-4	1.2608640923464622E-4
10.0	9.910337574289035E-5	5.103594509971271E-5
12.5	9.030964220376074E-5	1.4460784483608945E-4
</tableData>
                  <tableData breakPoint="4.48073003136E7">
 	0.0	10.0
-5.0	3.6830703786528085E-4	6.195160240738043E-4
-2.5	7.325853681423047E-5	-1.4053452976004415E-4
0.0	9.1306E-5	2.8423369273862455E-4
1.0	2.3339212572679585E-4	5.65274459794961E-5
2.0	3.561657132811815E-5	1.7725136089774543E-4
3.0	2.808319590771681E-4	1.5459453483550838E-4
4.0	-8.26268447550441E-5	4.066909090817194E-5
5.0	3.893748410409751E-4	2.81810830021255E-4
6.0	-2.0333379768967656E-4	1.6070912549644598E-4
7.5	5.352988107568497E-4	1.8995984292493934E-4
10.0	-4.899146275418204E-4	1.7284754863988008E-5
12.5	8.671349202943252E-4	3.7007781871639553E-4
</tableData>
               </table>
            </product>
         </function>
         <function name="aero/function/elevator_drag_coeff_basic_M1_deflection_1">
            <product>
               <table>
                  <independentVar lookup="row">aero/alpha-deg</independentVar>
                  <independentVar lookup="column">aero/beta-deg</independentVar>
                  <independentVar lookup="table">aero/Re</independentVar>
                  <tableData breakPoint="1.12018250784E7">
 	0.0	10.0
-5.0	1.3089572442203577E-4	-1.6378088242119962E-5
-2.5	1.3160309740995767E-4	3.0698027083410644E-4
0.0	1.2846E-4	-4.893711280503689E-6
1.0	1.27556645057806E-4	2.7197213493630247E-4
2.0	1.242653194313818E-4	1.5039053256033673E-5
3.0	1.2226090099941785E-4	2.411572889584045E-4
4.0	1.1941282469453234E-4	4.734877895405745E-5
5.0	1.1692574302739272E-4	1.982288469354551E-4
6.0	1.1331013601085272E-4	1.1011726359011867E-4
7.5	1.088510898878346E-4	1.2608640923464622E-4
10.0	9.910337574289035E-5	5.103594509971271E-5
12.5	9.030964220376074E-5	1.4460784483608945E-4
</tableData>
                  <tableData breakPoint="3.36054752352E7">
 	0.0	10.0
-5.0	3.6830703786528085E-4	6.195160240738043E-4
-2.5	7.325853681423047E-5	-1.4053452976004415E-4
0.0	9.1306E-5	2.8423369273862455E-4
1.0	2.3339212572679585E-4	5.65274459794961E-5
2.0	3.561657132811815E-5	1.7725136089774543E-4
3.0	2.808319590771681E-4	1.5459453483550838E-4
4.0	-8.26268447550441E-5	4.066909090817194E-5
5.0	3.893748410409751E-4	2.81810830021255E-4
6.0	-2.0333379768967656E-4	1.6070912549644598E-4
7.5	5.352988107568497E-4	1.8995984292493934E-4
10.0	-4.899146275418204E-4	1.7284754863988008E-5
12.5	8.671349202943252E-4	3.7007781871639553E-4
</tableData>
                  <tableData breakPoint="4.36871178058E7">
 	0.0	10.0
-5.0	1.3089572442203577E-4	-1.6378088242119962E-5
-2.5	1.3160309740995767E-4	3.0698027083410644E-4
0.0	1.2846E-4	-4.893711280503689E-6
1.0	1.27556645057806E-4	2.7197213493630247E-4
2.0	1.242653194313818E-4	1.5039053256033673E-5
3.0	1.2226090099941785E-4	2.411572889584045E-4
4.0	1.1941282469453234E-4	4.734877895405745E-5
5.0	1.1692574302739272E-4	1.982288469354551E-4
6.0	1.1331013601085272E-4	1.1011726359011867E-4
7.5	1.088510898878346E-4	1.2608640923464622E-4
10.0	9.910337574289035E-5	5.103594509971271E-5
12.5	9.030964220376074E-5	1.4460784483608945E-4
</tableData>
                  <tableData breakPoint="4.48073003136E7">
 	0.0	10.0
-5.0	3.6830703786528085E-4	6.195160240738043E-4
-2.5	7.325853681423047E-5	-1.4053452976004415E-4
0.0	9.1306E-5	2.8423369273862455E-4
1.0	2.3339212572679585E-4	5.65274459794961E-5
2.0	3.561657132811815E-5	1.7725136089774543E-4
3.0	2.808319590771681E-4	1.5459453483550838E-4
4.0	-8.26268447550441E-5	4.066909090817194E-5
5.0	3.893748410409751E-4	2.81810830021255E-4
6.0	-2.0333379768967656E-4	1.6070912549644598E-4
7.5	5.352988107568497E-4	1.8995984292493934E-4
10.0	-4.899146275418204E-4	1.7284754863988008E-5
12.5	8.671349202943252E-4	3.7007781871639553E-4
</tableData>
               </table>
            </product>
         </function>
         <function name="aero/function/elevator_drag_coeff_basic_M2_deflection_1">
            <product>
               <table>
                  <independentVar lookup="row">aero/alpha-deg</independentVar>
                  <independentVar lookup="column">aero/beta-deg</independentVar>
                  <independentVar lookup="table">aero/Re</independentVar>
                  <tableData breakPoint="1.12018250784E7">
 	0.0	10.0
-5.0	1.365256801039126E-4	-1.708732592411343E-5
-2.5	1.3726345830244533E-4	3.201646909239838E-4
0.0	1.3398E-4	-5.104298670574028E-6
1.0	1.3303784535106814E-4	2.836564064113487E-4
2.0	1.2960793525375528E-4	1.5687984970064794E-5
3.0	1.275173707415737E-4	2.5152090616293124E-4
4.0	1.2454171763263023E-4	4.9385992146204496E-5
5.0	1.2194787392115936E-4	2.0674796316029947E-4
6.0	1.1817911792102175E-4	1.1484992148643277E-4
7.5	1.135286556236536E-4	1.315053131910438E-4
10.0	1.0335999281196434E-4	5.323739565314049E-5
12.5	9.418841849687859E-5	1.5082048312135702E-4
</tableData>
                  <tableData breakPoint="3.36054752352E7">
 	0.0	10.0
-5.0	3.841282334283222E-4	6.461356824087235E-4
0.0	9.5229E-5	2.964469507366932E-4
2.0	3.7141012832091484E-5	1.848623231193015E-4
4.0	-8.618478980037603E-5	4.240606001222521E-5
6.0	-2.1206938077963016E-4	1.676029319517078E-4
10.0	-5.109715142455219E-4	1.802993156193609E-5
12.5	9.044019629185297E-4	3.859731807033648E-4
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</tableData>
                  <tableData breakPoint="4.36871178058E7">
 	0.0	10.0
-5.0	1.365256801039126E-4	-1.708732592411343E-5
0.0	1.3398E-4	-5.104298670574028E-6
2.0	1.2960793525375528E-4	1.5687984970064794E-5
4.0	1.2454171763263023E-4	4.9385992146204496E-5
6.0	1.1817911792102175E-4	1.1484992148643277E-4
10.0	1.0335999281196434E-4	5.323739565314049E-5
12.5	9.418841849687859E-5	1.5082048312135702E-4
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</tableData>
                  <tableData breakPoint="4.48073003136E7">
 	0.0	10.0
-5.0	3.841282334283222E-4	6.461356824087235E-4
0.0	9.5229E-5	2.964469507366932E-4
2.0	3.7141012832091484E-5	1.848623231193015E-4
4.0	-8.618478980037603E-5	4.240606001222521E-5
6.0	-2.1206938077963016E-4	1.676029319517078E-4
10.0	-5.109715142455219E-4	1.802993156193609E-5
12.5	9.044019629185297E-4	3.859731807033648E-4
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</tableData>
               </table>
            </product>
         </function>
         <function name="aero/function/elevator_drag_coeff_basic_M3_deflection_1">
            <product>
               <table>
                  <independentVar lookup="row">aero/alpha-deg</independentVar>
                  <independentVar lookup="column">aero/beta-deg</independentVar>
                  <independentVar lookup="table">aero/Re</independentVar>
                  <tableData breakPoint="1.12018250784E7">
 	0.0	10.0
-5.0	1.365256801039126E-4	-1.708732592411343E-5
0.0	1.3398E-4	-5.104298670574028E-6
2.0	1.2960793525375528E-4	1.5687984970064794E-5
4.0	1.2454171763263023E-4	4.9385992146204496E-5
6.0	1.1817911792102175E-4	1.1484992148643277E-4
10.0	1.0335999281196434E-4	5.323739565314049E-5
12.5	9.418841849687859E-5	1.5082048312135702E-4
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</tableData>
                  <tableData breakPoint="3.36054752352E7">
 	0.0	10.0
-5.0	3.841282334283222E-4	6.461356824087235E-4
0.0	9.5229E-5	2.964469507366932E-4
2.0	3.7141012832091484E-5	1.848623231193015E-4
4.0	-8.618478980037603E-5	4.240606001222521E-5
6.0	-2.1206938077963016E-4	1.676029319517078E-4
10.0	-5.109715142455219E-4	1.802993156193609E-5
12.5	9.044019629185297E-4	3.859731807033648E-4
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</tableData>
                  <tableData breakPoint="4.36871178058E7">
 	0.0	10.0
-5.0	1.365256801039126E-4	-1.708732592411343E-5
0.0	1.3398E-4	-5.104298670574028E-6
2.0	1.2960793525375528E-4	1.5687984970064794E-5
4.0	1.2454171763263023E-4	4.9385992146204496E-5
6.0	1.1817911792102175E-4	1.1484992148643277E-4
10.0	1.0335999281196434E-4	5.323739565314049E-5
12.5	9.418841849687859E-5	1.5082048312135702E-4
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</tableData>
                  <tableData breakPoint="4.48073003136E7">
 	0.0	10.0
-5.0	3.841282334283222E-4	6.461356824087235E-4
0.0	9.5229E-5	2.964469507366932E-4
2.0	3.7141012832091484E-5	1.848623231193015E-4
4.0	-8.618478980037603E-5	4.240606001222521E-5
6.0	-2.1206938077963016E-4	1.676029319517078E-4
10.0	-5.109715142455219E-4	1.802993156193609E-5
12.5	9.044019629185297E-4	3.859731807033648E-4
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</tableData>
               </table>
            </product>
         </function>
         <function name="aero/function/elevator_drag_coeff_effect">
            <sum>
               <p>aero/function/elevator_drag_coeff_basic_Mach_deflection</p>
               <p>aero/function/drag_coeff_basic_Mach</p>
            </sum>
         </function>
         <function name="aero/forces/elevator_drag_basic_Mach">
            <description>drag force due to alpha beta Reynolds number and Mach number</description>
            <product>
               <property>aero/qbar-psf</property>
               <property>metrics/Sw-sqft</property>
               <property>aero/function/elevator_drag_coeff_effect</property>
            </product>
         </function>
         <function name="aero/function/rudder_drag_coeff_basic_Mach_deflection">
            <product>
               <interpolate1d>
                  <p>fcs/rudder-pos-deg</p>
                  <v>-3.000000</v>
                  <p>aero/function/rudder_drag_coeff_basic_Mach_deflection_0</p>
                  <v>3.0000</v>
                  <p>aero/function/rudder_drag_coeff_basic_Mach_deflection_1</p>
               </interpolate1d>
            </product>
         </function>
         <function name="aero/function/rudder_drag_coeff_basic_Mach_deflection_0">
            <product>
               <interpolate1d>
                  <p>velocities/mach</p>
                  <v>0.2000</v>
                  <p>aero/function/rudder_drag_coeff_basic_M0_deflection_0</p>
                  <v>0.6000</v>
                  <p>aero/function/rudder_drag_coeff_basic_M1_deflection_0</p>
                  <v>0.7800</v>
                  <p>aero/function/rudder_drag_coeff_basic_M2_deflection_0</p>
                  <v>0.8000</v>
                  <p>aero/function/rudder_drag_coeff_basic_M3_deflection_0</p>
               </interpolate1d>
            </product>
         </function>
         <function name="aero/function/rudder_drag_coeff_basic_M0_deflection_0">
            <product>
               <table>
                  <independentVar lookup="row">aero/alpha-deg</independentVar>
                  <independentVar lookup="column">aero/beta-deg</independentVar>
                  <independentVar lookup="table">aero/Re</independentVar>
                  <tableData breakPoint="1.12018250784E7">
 	0.0	10.0
-5.0	8.360139746724208E-5	-1.046333235077533E-5
0.0	8.2044E-5	-3.127375334277519E-6
2.0	7.936847549079882E-5	9.609104474623975E-6
4.0	7.626434724268904E-5	3.0243685986696932E-5
6.0	7.237151624246563E-5	7.033035139303282E-5
10.0	6.329790484666586E-5	3.26010983287584E-5
12.5	5.7681565466098105E-5	9.236344597336971E-5
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</tableData>
                  <tableData breakPoint="3.36054752352E7">
 	0.0	10.0
-5.0	2.3523023133753765E-4	3.9566465131861753E-4
0.0	5.8315E-5	1.8153220732698824E-4
2.0	2.2741146972364717E-5	1.1320041154443778E-4
4.0	-5.2774559835959634E-5	2.596922438044571E-5
6.0	-1.2987385228846094E-4	1.0263702601448618E-4
10.0	-3.1289753867545875E-4	1.1044262584363187E-5
12.5	5.538208023903755E-4	2.3635952677058416E-4
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</tableData>
                  <tableData breakPoint="4.36871178058E7">
 	0.0	10.0
-5.0	8.360139746724208E-5	-1.046333235077533E-5
0.0	8.2044E-5	-3.127375334277519E-6
2.0	7.936847549079882E-5	9.609104474623975E-6
4.0	7.626434724268904E-5	3.0243685986696932E-5
6.0	7.237151624246563E-5	7.033035139303282E-5
10.0	6.329790484666586E-5	3.26010983287584E-5
12.5	5.7681565466098105E-5	9.236344597336971E-5
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</tableData>
                  <tableData breakPoint="4.48073003136E7">
 	0.0	10.0
-5.0	2.3523023133753765E-4	3.9566465131861753E-4
0.0	5.8315E-5	1.8153220732698824E-4
2.0	2.2741146972364717E-5	1.1320041154443778E-4
4.0	-5.2774559835959634E-5	2.596922438044571E-5
6.0	-1.2987385228846094E-4	1.0263702601448618E-4
10.0	-3.1289753867545875E-4	1.1044262584363187E-5
12.5	5.538208023903755E-4	2.3635952677058416E-4
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</tableData>
               </table>
            </product>
         </function>
         <function name="aero/function/rudder_drag_coeff_basic_M1_deflection_0">
            <product>
               <table>
                  <independentVar lookup="row">aero/alpha-deg</independentVar>
                  <independentVar lookup="column">aero/beta-deg</independentVar>
                  <independentVar lookup="table">aero/Re</independentVar>
                  <tableData breakPoint="1.12018250784E7">
 	0.0	10.0
-5.0	8.360139746724208E-5	-1.046333235077533E-5
0.0	8.2044E-5	-3.127375334277519E-6
2.0	7.936847549079882E-5	9.609104474623975E-6
4.0	7.626434724268904E-5	3.0243685986696932E-5
6.0	7.237151624246563E-5	7.033035139303282E-5
10.0	6.329790484666586E-5	3.26010983287584E-5
12.5	5.7681565466098105E-5	9.236344597336971E-5
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</tableData>
                  <tableData breakPoint="3.36054752352E7">
 	0.0	10.0
-5.0	2.3523023133753765E-4	3.9566465131861753E-4
0.0	5.8315E-5	1.8153220732698824E-4
2.0	2.2741146972364717E-5	1.1320041154443778E-4
4.0	-5.2774559835959634E-5	2.596922438044571E-5
6.0	-1.2987385228846094E-4	1.0263702601448618E-4
10.0	-3.1289753867545875E-4	1.1044262584363187E-5
12.5	5.538208023903755E-4	2.3635952677058416E-4
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</tableData>
                  <tableData breakPoint="4.36871178058E7">
 	0.0	10.0
-5.0	8.360139746724208E-5	-1.046333235077533E-5
0.0	8.2044E-5	-3.127375334277519E-6
2.0	7.936847549079882E-5	9.609104474623975E-6
4.0	7.626434724268904E-5	3.0243685986696932E-5
6.0	7.237151624246563E-5	7.033035139303282E-5
10.0	6.329790484666586E-5	3.26010983287584E-5
12.5	5.7681565466098105E-5	9.236344597336971E-5
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</tableData>
                  <tableData breakPoint="4.48073003136E7">
 	0.0	10.0
-5.0	2.3523023133753765E-4	3.9566465131861753E-4
0.0	5.8315E-5	1.8153220732698824E-4
2.0	2.2741146972364717E-5	1.1320041154443778E-4
4.0	-5.2774559835959634E-5	2.596922438044571E-5
6.0	-1.2987385228846094E-4	1.0263702601448618E-4
10.0	-3.1289753867545875E-4	1.1044262584363187E-5
12.5	5.538208023903755E-4	2.3635952677058416E-4
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</tableData>
               </table>
            </product>
         </function>
         <function name="aero/function/rudder_drag_coeff_basic_M2_deflection_0">
            <product>
               <table>
                  <independentVar lookup="row">aero/alpha-deg</independentVar>
                  <independentVar lookup="column">aero/beta-deg</independentVar>
                  <independentVar lookup="table">aero/Re</independentVar>
                  <tableData breakPoint="1.12018250784E7">
 	0.0	10.0
-5.0	1.0238927692555043E-4	-1.2817303356356727E-5
0.0	1.0048E-4	-3.827789882486352E-6
2.0	9.720341806375221E-5	1.176685696843695E-5
4.0	9.340860774341397E-5	3.7041869026753356E-5
6.0	8.863957237140134E-5	8.6139762532038E-5
10.0	7.75265124262325E-5	3.992476707372104E-5
12.5	7.064755389464264E-5	1.1311910390335365E-4
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</tableData>
                  <tableData breakPoint="3.36054752352E7">
 	0.0	10.0
-5.0	2.881005577632465E-4	4.845951448343964E-4
0.0	7.1422E-5	2.2233521305251995E-4
2.0	2.7852388659583497E-5	1.3865049621188038E-4
4.0	-6.463360453003077E-5	3.180915256954432E-5
6.0	-1.5905974831262445E-4	1.2571207465931068E-4
10.0	-3.832261736647588E-4	1.3522588530768296E-5
12.5	6.782963052725505E-4	2.894815082917451E-4
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</tableData>
                  <tableData breakPoint="4.36871178058E7">
 	0.0	10.0
-5.0	1.0238927692555043E-4	-1.2817303356356727E-5
0.0	1.0048E-4	-3.827789882486352E-6
2.0	9.720341806375221E-5	1.176685696843695E-5
4.0	9.340860774341397E-5	3.7041869026753356E-5
6.0	8.863957237140134E-5	8.6139762532038E-5
10.0	7.75265124262325E-5	3.992476707372104E-5
12.5	7.064755389464264E-5	1.1311910390335365E-4
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</tableData>
                  <tableData breakPoint="4.48073003136E7">
 	0.0	10.0
-5.0	2.881005577632465E-4	4.845951448343964E-4
0.0	7.1422E-5	2.2233521305251995E-4
2.0	2.7852388659583497E-5	1.3865049621188038E-4
4.0	-6.463360453003077E-5	3.180915256954432E-5
6.0	-1.5905974831262445E-4	1.2571207465931068E-4
10.0	-3.832261736647588E-4	1.3522588530768296E-5
12.5	6.782963052725505E-4	2.894815082917451E-4
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</tableData>
               </table>
            </product>
         </function>
         <function name="aero/function/rudder_drag_coeff_basic_M3_deflection_0">
            <product>
               <table>
                  <independentVar lookup="row">aero/alpha-deg</independentVar>
                  <independentVar lookup="column">aero/beta-deg</independentVar>
                  <independentVar lookup="table">aero/Re</independentVar>
                  <tableData breakPoint="1.12018250784E7">
 	0.0	10.0
-5.0	1.0238927692555043E-4	-1.2817303356356727E-5
0.0	1.0048E-4	-3.827789882486352E-6
2.0	9.720341806375221E-5	1.176685696843695E-5
4.0	9.340860774341397E-5	3.7041869026753356E-5
6.0	8.863957237140134E-5	8.6139762532038E-5
10.0	7.75265124262325E-5	3.992476707372104E-5
12.5	7.064755389464264E-5	1.1311910390335365E-4
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</tableData>
                  <tableData breakPoint="3.36054752352E7">
 	0.0	10.0
-5.0	2.881005577632465E-4	4.845951448343964E-4
0.0	7.1422E-5	2.2233521305251995E-4
2.0	2.7852388659583497E-5	1.3865049621188038E-4
4.0	-6.463360453003077E-5	3.180915256954432E-5
6.0	-1.5905974831262445E-4	1.2571207465931068E-4
10.0	-3.832261736647588E-4	1.3522588530768296E-5
12.5	6.782963052725505E-4	2.894815082917451E-4
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</tableData>
                  <tableData breakPoint="4.36871178058E7">
 	0.0	10.0
-5.0	1.0238927692555043E-4	-1.2817303356356727E-5
0.0	1.0048E-4	-3.827789882486352E-6
2.0	9.720341806375221E-5	1.176685696843695E-5
4.0	9.340860774341397E-5	3.7041869026753356E-5
6.0	8.863957237140134E-5	8.6139762532038E-5
10.0	7.75265124262325E-5	3.992476707372104E-5
12.5	7.064755389464264E-5	1.1311910390335365E-4
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</tableData>
                  <tableData breakPoint="4.48073003136E7">
 	0.0	10.0
-5.0	2.881005577632465E-4	4.845951448343964E-4
0.0	7.1422E-5	2.2233521305251995E-4
2.0	2.7852388659583497E-5	1.3865049621188038E-4
4.0	-6.463360453003077E-5	3.180915256954432E-5
6.0	-1.5905974831262445E-4	1.2571207465931068E-4
10.0	-3.832261736647588E-4	1.3522588530768296E-5
12.5	6.782963052725505E-4	2.894815082917451E-4
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</tableData>
               </table>
            </product>
         </function>
         <function name="aero/function/rudder_drag_coeff_basic_Mach_deflection_1">
            <product>
               <interpolate1d>
                  <p>velocities/mach</p>
                  <v>0.2000</v>
                  <p>aero/function/rudder_drag_coeff_basic_M0_deflection_1</p>
                  <v>0.6000</v>
                  <p>aero/function/rudder_drag_coeff_basic_M1_deflection_1</p>
                  <v>0.7800</v>
                  <p>aero/function/rudder_drag_coeff_basic_M2_deflection_1</p>
                  <v>0.8000</v>
                  <p>aero/function/rudder_drag_coeff_basic_M3_deflection_1</p>
               </interpolate1d>
            </product>
         </function>
         <function name="aero/function/rudder_drag_coeff_basic_M0_deflection_1">
            <product>
               <table>
                  <independentVar lookup="row">aero/alpha-deg</independentVar>
                  <independentVar lookup="column">aero/beta-deg</independentVar>
                  <independentVar lookup="table">aero/Re</independentVar>
                  <tableData breakPoint="1.12018250784E7">
 	0.0	10.0
-5.0	1.3089572442203577E-4	-1.6378088242119962E-5
0.0	1.2846E-4	-4.893711280503689E-6
2.0	1.242653194313818E-4	1.5039053256033673E-5
4.0	1.1941282469453234E-4	4.734877895405745E-5
6.0	1.1331013601085272E-4	1.1011726359011867E-4
10.0	9.910337574289035E-5	5.103594509971271E-5
12.5	9.030964220376074E-5	1.4460784483608945E-4
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</tableData>
                  <tableData breakPoint="3.36054752352E7">
 	0.0	10.0
-5.0	3.6830703786528085E-4	6.195160240738043E-4
0.0	9.1306E-5	2.8423369273862455E-4
2.0	3.561657132811815E-5	1.7725136089774543E-4
4.0	-8.26268447550441E-5	4.066909090817194E-5
6.0	-2.0333379768967656E-4	1.6070912549644598E-4
10.0	-4.899146275418204E-4	1.7284754863988008E-5
12.5	8.671349202943252E-4	3.7007781871639553E-4
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</tableData>
                  <tableData breakPoint="4.36871178058E7">
 	0.0	10.0
-5.0	1.3089572442203577E-4	-1.6378088242119962E-5
0.0	1.2846E-4	-4.893711280503689E-6
2.0	1.242653194313818E-4	1.5039053256033673E-5
4.0	1.1941282469453234E-4	4.734877895405745E-5
6.0	1.1331013601085272E-4	1.1011726359011867E-4
10.0	9.910337574289035E-5	5.103594509971271E-5
12.5	9.030964220376074E-5	1.4460784483608945E-4
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</tableData>
                  <tableData breakPoint="4.48073003136E7">
 	0.0	10.0
-5.0	3.6830703786528085E-4	6.195160240738043E-4
0.0	9.1306E-5	2.8423369273862455E-4
2.0	3.561657132811815E-5	1.7725136089774543E-4
4.0	-8.26268447550441E-5	4.066909090817194E-5
6.0	-2.0333379768967656E-4	1.6070912549644598E-4
10.0	-4.899146275418204E-4	1.7284754863988008E-5
12.5	8.671349202943252E-4	3.7007781871639553E-4
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</tableData>
               </table>
            </product>
         </function>
         <function name="aero/function/rudder_drag_coeff_basic_M1_deflection_1">
            <product>
               <table>
                  <independentVar lookup="row">aero/alpha-deg</independentVar>
                  <independentVar lookup="column">aero/beta-deg</independentVar>
                  <independentVar lookup="table">aero/Re</independentVar>
                  <tableData breakPoint="1.12018250784E7">
 	0.0	10.0
-5.0	1.3089572442203577E-4	-1.6378088242119962E-5
0.0	1.2846E-4	-4.893711280503689E-6
2.0	1.242653194313818E-4	1.5039053256033673E-5
4.0	1.1941282469453234E-4	4.734877895405745E-5
6.0	1.1331013601085272E-4	1.1011726359011867E-4
10.0	9.910337574289035E-5	5.103594509971271E-5
12.5	9.030964220376074E-5	1.4460784483608945E-4
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</tableData>
                  <tableData breakPoint="3.36054752352E7">
 	0.0	10.0
-5.0	3.6830703786528085E-4	6.195160240738043E-4
0.0	9.1306E-5	2.8423369273862455E-4
2.0	3.561657132811815E-5	1.7725136089774543E-4
4.0	-8.26268447550441E-5	4.066909090817194E-5
6.0	-2.0333379768967656E-4	1.6070912549644598E-4
10.0	-4.899146275418204E-4	1.7284754863988008E-5
12.5	8.671349202943252E-4	3.7007781871639553E-4
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</tableData>
                  <tableData breakPoint="4.36871178058E7">
 	0.0	10.0
-5.0	1.3089572442203577E-4	-1.6378088242119962E-5
0.0	1.2846E-4	-4.893711280503689E-6
2.0	1.242653194313818E-4	1.5039053256033673E-5
4.0	1.1941282469453234E-4	4.734877895405745E-5
6.0	1.1331013601085272E-4	1.1011726359011867E-4
10.0	9.910337574289035E-5	5.103594509971271E-5
12.5	9.030964220376074E-5	1.4460784483608945E-4
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</tableData>
                  <tableData breakPoint="4.48073003136E7">
 	0.0	10.0
-5.0	3.6830703786528085E-4	6.195160240738043E-4
0.0	9.1306E-5	2.8423369273862455E-4
2.0	3.561657132811815E-5	1.7725136089774543E-4
4.0	-8.26268447550441E-5	4.066909090817194E-5
6.0	-2.0333379768967656E-4	1.6070912549644598E-4
10.0	-4.899146275418204E-4	1.7284754863988008E-5
12.5	8.671349202943252E-4	3.7007781871639553E-4
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</tableData>
               </table>
            </product>
         </function>
         <function name="aero/function/rudder_drag_coeff_basic_M2_deflection_1">
            <product>
               <table>
                  <independentVar lookup="row">aero/alpha-deg</independentVar>
                  <independentVar lookup="column">aero/beta-deg</independentVar>
                  <independentVar lookup="table">aero/Re</independentVar>
                  <tableData breakPoint="1.12018250784E7">
 	0.0	10.0
-5.0	1.365256801039126E-4	-1.708732592411343E-5
0.0	1.3398E-4	-5.104298670574028E-6
2.0	1.2960793525375528E-4	1.5687984970064794E-5
4.0	1.2454171763263023E-4	4.9385992146204496E-5
6.0	1.1817911792102175E-4	1.1484992148643277E-4
10.0	1.0335999281196434E-4	5.323739565314049E-5
12.5	9.418841849687859E-5	1.5082048312135702E-4
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</tableData>
                  <tableData breakPoint="3.36054752352E7">
 	0.0	10.0
-5.0	3.841282334283222E-4	6.461356824087235E-4
0.0	9.5229E-5	2.964469507366932E-4
2.0	3.7141012832091484E-5	1.848623231193015E-4
4.0	-8.618478980037603E-5	4.240606001222521E-5
6.0	-2.1206938077963016E-4	1.676029319517078E-4
10.0	-5.109715142455219E-4	1.802993156193609E-5
12.5	9.044019629185297E-4	3.859731807033648E-4
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</tableData>
                  <tableData breakPoint="4.36871178058E7">
 	0.0	10.0
-5.0	1.365256801039126E-4	-1.708732592411343E-5
0.0	1.3398E-4	-5.104298670574028E-6
2.0	1.2960793525375528E-4	1.5687984970064794E-5
4.0	1.2454171763263023E-4	4.9385992146204496E-5
6.0	1.1817911792102175E-4	1.1484992148643277E-4
10.0	1.0335999281196434E-4	5.323739565314049E-5
12.5	9.418841849687859E-5	1.5082048312135702E-4
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</tableData>
                  <tableData breakPoint="4.48073003136E7">
 	0.0	10.0
-5.0	3.841282334283222E-4	6.461356824087235E-4
0.0	9.5229E-5	2.964469507366932E-4
2.0	3.7141012832091484E-5	1.848623231193015E-4
4.0	-8.618478980037603E-5	4.240606001222521E-5
6.0	-2.1206938077963016E-4	1.676029319517078E-4
10.0	-5.109715142455219E-4	1.802993156193609E-5
12.5	9.044019629185297E-4	3.859731807033648E-4
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</tableData>
               </table>
            </product>
         </function>
         <function name="aero/function/rudder_drag_coeff_basic_M3_deflection_1">
            <product>
               <table>
                  <independentVar lookup="row">aero/alpha-deg</independentVar>
                  <independentVar lookup="column">aero/beta-deg</independentVar>
                  <independentVar lookup="table">aero/Re</independentVar>
                  <tableData breakPoint="1.12018250784E7">
 	0.0	10.0
-5.0	1.365256801039126E-4	-1.708732592411343E-5
0.0	1.3398E-4	-5.104298670574028E-6
2.0	1.2960793525375528E-4	1.5687984970064794E-5
4.0	1.2454171763263023E-4	4.9385992146204496E-5
6.0	1.1817911792102175E-4	1.1484992148643277E-4
10.0	1.0335999281196434E-4	5.323739565314049E-5
12.5	9.418841849687859E-5	1.5082048312135702E-4
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</tableData>
                  <tableData breakPoint="3.36054752352E7">
 	0.0	10.0
-5.0	3.841282334283222E-4	6.461356824087235E-4
0.0	9.5229E-5	2.964469507366932E-4
2.0	3.7141012832091484E-5	1.848623231193015E-4
4.0	-8.618478980037603E-5	4.240606001222521E-5
6.0	-2.1206938077963016E-4	1.676029319517078E-4
10.0	-5.109715142455219E-4	1.802993156193609E-5
12.5	9.044019629185297E-4	3.859731807033648E-4
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</tableData>
                  <tableData breakPoint="4.36871178058E7">
 	0.0	10.0
-5.0	1.365256801039126E-4	-1.708732592411343E-5
0.0	1.3398E-4	-5.104298670574028E-6
2.0	1.2960793525375528E-4	1.5687984970064794E-5
4.0	1.2454171763263023E-4	4.9385992146204496E-5
6.0	1.1817911792102175E-4	1.1484992148643277E-4
10.0	1.0335999281196434E-4	5.323739565314049E-5
12.5	9.418841849687859E-5	1.5082048312135702E-4
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</tableData>
                  <tableData breakPoint="4.48073003136E7">
 	0.0	10.0
-5.0	3.841282334283222E-4	6.461356824087235E-4
0.0	9.5229E-5	2.964469507366932E-4
2.0	3.7141012832091484E-5	1.848623231193015E-4
4.0	-8.618478980037603E-5	4.240606001222521E-5
6.0	-2.1206938077963016E-4	1.676029319517078E-4
10.0	-5.109715142455219E-4	1.802993156193609E-5
12.5	9.044019629185297E-4	3.859731807033648E-4
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</tableData>
               </table>
            </product>
         </function>
         <function name="aero/function/rudder_drag_coeff_effect">
            <sum>
               <p>aero/function/rudder_drag_coeff_basic_Mach_deflection</p>
               <p>aero/function/drag_coeff_basic_Mach</p>
            </sum>
         </function>
         <function name="aero/forces/rudder_drag_basic_Mach">
            <description>drag force due to alpha beta Reynolds number and Mach number</description>
            <product>
               <property>aero/qbar-psf</property>
               <property>metrics/Sw-sqft</property>
               <property>aero/function/rudder_drag_coeff_effect</property>
            </product>
         </function>
         <function name="aero/function/flap_drag_coeff_basic_Mach_deflection">
            <product>
               <interpolate1d>
                  <p>fcs/flap-pos-deg</p>
                  <v>-3.000000</v>
                  <p>aero/function/flap_drag_coeff_basic_Mach_deflection_0</p>
                  <v>3.0000</v>
                  <p>aero/function/flap_drag_coeff_basic_Mach_deflection_1</p>
               </interpolate1d>
            </product>
         </function>
         <function name="aero/function/flap_drag_coeff_basic_Mach_deflection_0">
            <product>
               <interpolate1d>
                  <p>velocities/mach</p>
                  <v>0.2000</v>
                  <p>aero/function/flap_drag_coeff_basic_M0_deflection_0</p>
                  <v>0.6000</v>
                  <p>aero/function/flap_drag_coeff_basic_M1_deflection_0</p>
                  <v>0.7800</v>
                  <p>aero/function/flap_drag_coeff_basic_M2_deflection_0</p>
                  <v>0.8000</v>
                  <p>aero/function/flap_drag_coeff_basic_M3_deflection_0</p>
               </interpolate1d>
            </product>
         </function>
         <function name="aero/function/flap_drag_coeff_basic_M0_deflection_0">
            <product>
               <table>
                  <independentVar lookup="row">aero/alpha-deg</independentVar>
                  <independentVar lookup="column">aero/beta-deg</independentVar>
                  <independentVar lookup="table">aero/Re</independentVar>
                  <tableData breakPoint="1.12018250784E7">
 	0.0	10.0
-5.0	0.0014636961385045984	0.011839724441112932
0.0	-0.0040178	0.004743326675508939
2.0	-0.004460999233202359	0.0026088960018385045
4.0	-0.006657563087459721	0.001052492791732606
6.0	-0.008845848621829005	2.844736456355029E-4
10.0	-0.014361513173597325	-0.003593321779408858
12.5	0.019079042566883746	0.007502645324454654
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</tableData>
                  <tableData breakPoint="3.36054752352E7">
 	0.0	10.0
-5.0	0.0014620241141435728	0.01141518554103517
0.0	-0.0038588999999999997	0.004512113109752802
2.0	-0.00429775248628155	0.002297412306007809
4.0	-0.006433700468785499	-0.7950399484370778
6.0	-0.008561808624679722	0.0022847239990272973
10.0	-0.013918489099412519	-0.004212602510328454
12.5	0.018413106270367987	0.007248881346630473
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</tableData>
                  <tableData breakPoint="4.36871178058E7">
 	0.0	10.0
-5.0	0.0014636961385045984	0.011839724441112932
0.0	-0.0040178	0.004743326675508939
2.0	-0.004460999233202359	0.0026088960018385045
4.0	-0.006657563087459721	0.001052492791732606
6.0	-0.008845848621829005	2.844736456355029E-4
10.0	-0.014361513173597325	-0.003593321779408858
12.5	0.019079042566883746	0.007502645324454654
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</tableData>
                  <tableData breakPoint="4.48073003136E7">
 	0.0	10.0
-5.0	0.0014620241141435728	0.01141518554103517
0.0	-0.0038588999999999997	0.004512113109752802
2.0	-0.00429775248628155	0.002297412306007809
4.0	-0.006433700468785499	-0.7950399484370778
6.0	-0.008561808624679722	0.0022847239990272973
10.0	-0.013918489099412519	-0.004212602510328454
12.5	0.018413106270367987	0.007248881346630473
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</tableData>
               </table>
            </product>
         </function>
         <function name="aero/function/flap_drag_coeff_basic_M1_deflection_0">
            <product>
               <table>
                  <independentVar lookup="row">aero/alpha-deg</independentVar>
                  <independentVar lookup="column">aero/beta-deg</independentVar>
                  <independentVar lookup="table">aero/Re</independentVar>
                  <tableData breakPoint="1.12018250784E7">
 	0.0	10.0
-5.0	0.0014636961385045984	0.011839724441112932
0.0	-0.0040178	0.004743326675508939
2.0	-0.004460999233202359	0.0026088960018385045
4.0	-0.006657563087459721	0.001052492791732606
6.0	-0.008845848621829005	2.844736456355029E-4
10.0	-0.014361513173597325	-0.003593321779408858
12.5	0.019079042566883746	0.007502645324454654
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</tableData>
                  <tableData breakPoint="3.36054752352E7">
 	0.0	10.0
-5.0	0.0014620241141435728	0.01141518554103517
0.0	-0.0038588999999999997	0.004512113109752802
2.0	-0.00429775248628155	0.002297412306007809
4.0	-0.006433700468785499	-0.7950399484370778
6.0	-0.008561808624679722	0.0022847239990272973
10.0	-0.013918489099412519	-0.004212602510328454
12.5	0.018413106270367987	0.007248881346630473
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</tableData>
                  <tableData breakPoint="4.36871178058E7">
 	0.0	10.0
-5.0	0.0014636961385045984	0.011839724441112932
0.0	-0.0040178	0.004743326675508939
2.0	-0.004460999233202359	0.0026088960018385045
4.0	-0.006657563087459721	0.001052492791732606
6.0	-0.008845848621829005	2.844736456355029E-4
10.0	-0.014361513173597325	-0.003593321779408858
12.5	0.019079042566883746	0.007502645324454654
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</tableData>
                  <tableData breakPoint="4.48073003136E7">
 	0.0	10.0
-5.0	0.0014620241141435728	0.01141518554103517
0.0	-0.0038588999999999997	0.004512113109752802
2.0	-0.00429775248628155	0.002297412306007809
4.0	-0.006433700468785499	-0.7950399484370778
6.0	-0.008561808624679722	0.0022847239990272973
10.0	-0.013918489099412519	-0.004212602510328454
12.5	0.018413106270367987	0.007248881346630473
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</tableData>
               </table>
            </product>
         </function>
         <function name="aero/function/flap_drag_coeff_basic_M2_deflection_0">
            <product>
               <table>
                  <independentVar lookup="row">aero/alpha-deg</independentVar>
                  <independentVar lookup="column">aero/beta-deg</independentVar>
                  <independentVar lookup="table">aero/Re</independentVar>
                  <tableData breakPoint="1.12018250784E7">
 	0.0	10.0
-5.0	0.001792632683278045	0.014500499108113052
0.0	-0.0049207999999999995	0.005809381098064235
2.0	-0.005463601186262037	0.0031952029967536014
4.0	-0.008153778592904042	0.001289065853922525
6.0	-0.010833838355166794	3.482546231259214E-4
10.0	-0.01758908148116256	-0.004400885375625785
12.5	0.023366948305469308	0.00918890859702633
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</tableData>
                  <tableData breakPoint="3.36054752352E7">
 	0.0	10.0
-5.0	0.001790893556022701	0.013980782744294068
0.0	-0.0047262	0.005526164015466642
2.0	-0.0052636421284937415	0.0028137395232754577
4.0	-0.007879656883470752	-0.9737275754645511
6.0	-0.010486083233576915	0.0027983299637147343
10.0	-0.017046538077472903	-0.005159255106119062
12.5	0.02255154144341779	0.008878220087266887
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</tableData>
                  <tableData breakPoint="4.36871178058E7">
 	0.0	10.0
-5.0	0.001792632683278045	0.014500499108113052
0.0	-0.0049207999999999995	0.005809381098064235
2.0	-0.005463601186262037	0.0031952029967536014
4.0	-0.008153778592904042	0.001289065853922525
6.0	-0.010833838355166794	3.482546231259214E-4
10.0	-0.01758908148116256	-0.004400885375625785
12.5	0.023366948305469308	0.00918890859702633
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</tableData>
                  <tableData breakPoint="4.48073003136E7">
 	0.0	10.0
-5.0	0.001790893556022701	0.013980782744294068
0.0	-0.0047262	0.005526164015466642
2.0	-0.0052636421284937415	0.0028137395232754577
4.0	-0.007879656883470752	-0.9737275754645511
6.0	-0.010486083233576915	0.0027983299637147343
10.0	-0.017046538077472903	-0.005159255106119062
12.5	0.02255154144341779	0.008878220087266887
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</tableData>
               </table>
            </product>
         </function>
         <function name="aero/function/flap_drag_coeff_basic_M3_deflection_0">
            <product>
               <table>
                  <independentVar lookup="row">aero/alpha-deg</independentVar>
                  <independentVar lookup="column">aero/beta-deg</independentVar>
                  <independentVar lookup="table">aero/Re</independentVar>
                  <tableData breakPoint="1.12018250784E7">
 	0.0	10.0
-5.0	0.001792632683278045	0.014500499108113052
0.0	-0.0049207999999999995	0.005809381098064235
2.0	-0.005463601186262037	0.0031952029967536014
4.0	-0.008153778592904042	0.001289065853922525
6.0	-0.010833838355166794	3.482546231259214E-4
10.0	-0.01758908148116256	-0.004400885375625785
12.5	0.023366948305469308	0.00918890859702633
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</tableData>
                  <tableData breakPoint="3.36054752352E7">
 	0.0	10.0
-5.0	0.001790893556022701	0.013980782744294068
0.0	-0.0047262	0.005526164015466642
2.0	-0.0052636421284937415	0.0028137395232754577
4.0	-0.007879656883470752	-0.9737275754645511
6.0	-0.010486083233576915	0.0027983299637147343
10.0	-0.017046538077472903	-0.005159255106119062
12.5	0.02255154144341779	0.008878220087266887
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</tableData>
                  <tableData breakPoint="4.36871178058E7">
 	0.0	10.0
-5.0	0.001792632683278045	0.014500499108113052
0.0	-0.0049207999999999995	0.005809381098064235
2.0	-0.005463601186262037	0.0031952029967536014
4.0	-0.008153778592904042	0.001289065853922525
6.0	-0.010833838355166794	3.482546231259214E-4
10.0	-0.01758908148116256	-0.004400885375625785
12.5	0.023366948305469308	0.00918890859702633
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</tableData>
                  <tableData breakPoint="4.48073003136E7">
 	0.0	10.0
-5.0	0.001790893556022701	0.013980782744294068
0.0	-0.0047262	0.005526164015466642
2.0	-0.0052636421284937415	0.0028137395232754577
4.0	-0.007879656883470752	-0.9737275754645511
6.0	-0.010486083233576915	0.0027983299637147343
10.0	-0.017046538077472903	-0.005159255106119062
12.5	0.02255154144341779	0.008878220087266887
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</tableData>
               </table>
            </product>
         </function>
         <function name="aero/function/flap_drag_coeff_basic_Mach_deflection_1">
            <product>
               <interpolate1d>
                  <p>velocities/mach</p>
                  <v>0.2000</v>
                  <p>aero/function/flap_drag_coeff_basic_M0_deflection_1</p>
                  <v>0.6000</v>
                  <p>aero/function/flap_drag_coeff_basic_M1_deflection_1</p>
                  <v>0.7800</v>
                  <p>aero/function/flap_drag_coeff_basic_M2_deflection_1</p>
                  <v>0.8000</v>
                  <p>aero/function/flap_drag_coeff_basic_M3_deflection_1</p>
               </interpolate1d>
            </product>
         </function>
         <function name="aero/function/flap_drag_coeff_basic_M0_deflection_1">
            <product>
               <table>
                  <independentVar lookup="row">aero/alpha-deg</independentVar>
                  <independentVar lookup="column">aero/beta-deg</independentVar>
                  <independentVar lookup="table">aero/Re</independentVar>
                  <tableData breakPoint="1.12018250784E7">
 	0.0	10.0
-5.0	0.002291867270164825	0.018537613507897517
0.0	-0.0062908	0.007426730916233028
2.0	-0.006984716531526878	0.004084802344270027
4.0	-0.010423810736852564	0.0016479548289148704
6.0	-0.013849961343259783	4.452150690450615E-4
10.0	-0.022486170408467177	-0.0056267594205846325
12.5	0.029872225277018723	0.011747056081094083
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</tableData>
                  <tableData breakPoint="3.36054752352E7">
 	0.0	10.0
-5.0	0.0022892805232378015	0.017873047084285557
0.0	-0.0060420000000000005	0.007064625076024603
2.0	-0.006729082708973494	0.003597069392581258
4.0	-0.01007346021138893	-1.244839177306375
6.0	-0.013405404056497181	0.0035773894100834753
10.0	-0.021792261618746464	-0.006595762792729906
12.5	0.028829791488463784	0.01134971845429969
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</tableData>
                  <tableData breakPoint="4.36871178058E7">
 	0.0	10.0
-5.0	0.002291867270164825	0.018537613507897517
0.0	-0.0062908	0.007426730916233028
2.0	-0.006984716531526878	0.004084802344270027
4.0	-0.010423810736852564	0.0016479548289148704
6.0	-0.013849961343259783	4.452150690450615E-4
10.0	-0.022486170408467177	-0.0056267594205846325
12.5	0.029872225277018723	0.011747056081094083
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</tableData>
                  <tableData breakPoint="4.48073003136E7">
 	0.0	10.0
-5.0	0.0022892805232378015	0.017873047084285557
0.0	-0.0060420000000000005	0.007064625076024603
2.0	-0.006729082708973494	0.003597069392581258
4.0	-0.01007346021138893	-1.244839177306375
6.0	-0.013405404056497181	0.0035773894100834753
10.0	-0.021792261618746464	-0.006595762792729906
12.5	0.028829791488463784	0.01134971845429969
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</tableData>
               </table>
            </product>
         </function>
         <function name="aero/function/flap_drag_coeff_basic_M1_deflection_1">
            <product>
               <table>
                  <independentVar lookup="row">aero/alpha-deg</independentVar>
                  <independentVar lookup="column">aero/beta-deg</independentVar>
                  <independentVar lookup="table">aero/Re</independentVar>
                  <tableData breakPoint="1.12018250784E7">
 	0.0	10.0
-5.0	0.002291867270164825	0.018537613507897517
0.0	-0.0062908	0.007426730916233028
2.0	-0.006984716531526878	0.004084802344270027
4.0	-0.010423810736852564	0.0016479548289148704
6.0	-0.013849961343259783	4.452150690450615E-4
10.0	-0.022486170408467177	-0.0056267594205846325
12.5	0.029872225277018723	0.011747056081094083
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</tableData>
                  <tableData breakPoint="3.36054752352E7">
 	0.0	10.0
-5.0	0.0022892805232378015	0.017873047084285557
0.0	-0.0060420000000000005	0.007064625076024603
2.0	-0.006729082708973494	0.003597069392581258
4.0	-0.01007346021138893	-1.244839177306375
6.0	-0.013405404056497181	0.0035773894100834753
10.0	-0.021792261618746464	-0.006595762792729906
12.5	0.028829791488463784	0.01134971845429969
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</tableData>
                  <tableData breakPoint="4.36871178058E7">
 	0.0	10.0
-5.0	0.002291867270164825	0.018537613507897517
0.0	-0.0062908	0.007426730916233028
2.0	-0.006984716531526878	0.004084802344270027
4.0	-0.010423810736852564	0.0016479548289148704
6.0	-0.013849961343259783	4.452150690450615E-4
10.0	-0.022486170408467177	-0.0056267594205846325
12.5	0.029872225277018723	0.011747056081094083
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</tableData>
                  <tableData breakPoint="4.48073003136E7">
 	0.0	10.0
-5.0	0.0022892805232378015	0.017873047084285557
0.0	-0.0060420000000000005	0.007064625076024603
2.0	-0.006729082708973494	0.003597069392581258
4.0	-0.01007346021138893	-1.244839177306375
6.0	-0.013405404056497181	0.0035773894100834753
10.0	-0.021792261618746464	-0.006595762792729906
12.5	0.028829791488463784	0.01134971845429969
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</tableData>
               </table>
            </product>
         </function>
         <function name="aero/function/flap_drag_coeff_basic_M2_deflection_1">
            <product>
               <table>
                  <independentVar lookup="row">aero/alpha-deg</independentVar>
                  <independentVar lookup="column">aero/beta-deg</independentVar>
                  <independentVar lookup="table">aero/Re</independentVar>
                  <tableData breakPoint="1.12018250784E7">
 	0.0	10.0
-5.0	0.002390143704547456	0.01933408873393561
0.0	-0.0065611	0.007745808637165757
2.0	-0.007284838120436716	0.004260260768266649
4.0	-0.01087177853726867	0.0017186988260251628
6.0	-0.01444509622435991	4.64344496661322E-4
10.0	-0.023452239949250477	-0.005867831861367157
12.5	0.03115585241878105	0.012251454542149414
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</tableData>
                  <tableData breakPoint="3.36054752352E7">
 	0.0	10.0
-5.0	0.0023876712994843783	0.018641065363349578
0.0	-0.0063015	0.0073681213641680725
2.0	-0.007018191143915621	0.0037516655905975517
4.0	-0.010506229104905417	-1.2982701355957222
6.0	-0.013981394585341117	0.0037310855477357165
10.0	-0.02272863449810386	-0.0068787347833328735
12.5	0.030068590648761197	0.01183733527663604
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</tableData>
                  <tableData breakPoint="4.36871178058E7">
 	0.0	10.0
-5.0	0.002390143704547456	0.01933408873393561
0.0	-0.0065611	0.007745808637165757
2.0	-0.007284838120436716	0.004260260768266649
4.0	-0.01087177853726867	0.0017186988260251628
6.0	-0.01444509622435991	4.64344496661322E-4
10.0	-0.023452239949250477	-0.005867831861367157
12.5	0.03115585241878105	0.012251454542149414
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</tableData>
                  <tableData breakPoint="4.48073003136E7">
 	0.0	10.0
-5.0	0.0023876712994843783	0.018641065363349578
0.0	-0.0063015	0.0073681213641680725
2.0	-0.007018191143915621	0.0037516655905975517
4.0	-0.010506229104905417	-1.2982701355957222
6.0	-0.013981394585341117	0.0037310855477357165
10.0	-0.02272863449810386	-0.0068787347833328735
12.5	0.030068590648761197	0.01183733527663604
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</tableData>
               </table>
            </product>
         </function>
         <function name="aero/function/flap_drag_coeff_basic_M3_deflection_1">
            <product>
               <table>
                  <independentVar lookup="row">aero/alpha-deg</independentVar>
                  <independentVar lookup="column">aero/beta-deg</independentVar>
                  <independentVar lookup="table">aero/Re</independentVar>
                  <tableData breakPoint="1.12018250784E7">
 	0.0	10.0
-5.0	0.002390143704547456	0.01933408873393561
0.0	-0.0065611	0.007745808637165757
2.0	-0.007284838120436716	0.004260260768266649
4.0	-0.01087177853726867	0.0017186988260251628
6.0	-0.01444509622435991	4.64344496661322E-4
10.0	-0.023452239949250477	-0.005867831861367157
12.5	0.03115585241878105	0.012251454542149414
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</tableData>
                  <tableData breakPoint="3.36054752352E7">
 	0.0	10.0
-5.0	0.0023876712994843783	0.018641065363349578
0.0	-0.0063015	0.0073681213641680725
2.0	-0.007018191143915621	0.0037516655905975517
4.0	-0.010506229104905417	-1.2982701355957222
6.0	-0.013981394585341117	0.0037310855477357165
10.0	-0.02272863449810386	-0.0068787347833328735
12.5	0.030068590648761197	0.01183733527663604
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</tableData>
                  <tableData breakPoint="4.36871178058E7">
 	0.0	10.0
-5.0	0.002390143704547456	0.01933408873393561
0.0	-0.0065611	0.007745808637165757
2.0	-0.007284838120436716	0.004260260768266649
4.0	-0.01087177853726867	0.0017186988260251628
6.0	-0.01444509622435991	4.64344496661322E-4
10.0	-0.023452239949250477	-0.005867831861367157
12.5	0.03115585241878105	0.012251454542149414
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</tableData>
                  <tableData breakPoint="4.48073003136E7">
 	0.0	10.0
-5.0	0.0023876712994843783	0.018641065363349578
0.0	-0.0063015	0.0073681213641680725
2.0	-0.007018191143915621	0.0037516655905975517
4.0	-0.010506229104905417	-1.2982701355957222
6.0	-0.013981394585341117	0.0037310855477357165
10.0	-0.02272863449810386	-0.0068787347833328735
12.5	0.030068590648761197	0.01183733527663604
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</tableData>
               </table>
            </product>
         </function>
         <function name="aero/function/flap_drag_coeff_effect">
            <sum>
               <p>aero/function/flap_drag_coeff_basic_Mach_deflection</p>
               <p>aero/function/drag_coeff_basic_Mach</p>
            </sum>
         </function>
         <function name="aero/forces/flap_drag_basic_Mach">
            <description>drag force due to alpha beta Reynolds number and Mach number</description>
            <product>
               <property>aero/qbar-psf</property>
               <property>metrics/Sw-sqft</property>
               <property>aero/function/flap_drag_coeff_effect</property>
            </product>
         </function>
      </axis>
      <axis name="SIDE">
         <function name="aero/forces/side_basic_Mach">
            <description>side force due to alpha beta Reynolds number and Mach number</description>
            <product>
               <property>aero/qbar-psf</property>
               <property>metrics/Sw-sqft</property>
               <property>aero/function/side_coeff_basic_Mach</property>
            </product>
         </function>
         <function name="aero/function/side_coeff_basic_Mach">
            <product>
               <interpolate1d>
                  <p>velocities/mach</p>
                  <v>0.200</v>
                  <p>aero/function/side_coeff_basic_M0</p>
                  <v>0.600</v>
                  <p>aero/function/side_coeff_basic_M1</p>
                  <v>0.780</v>
                  <p>aero/function/side_coeff_basic_M2</p>
                  <v>0.800</v>
                  <p>aero/function/side_coeff_basic_M3</p>
               </interpolate1d>
            </product>
         </function>
         <function name="aero/function/side_coeff_basic_M0">
            <product>
               <table>
                  <independentVar lookup="row">aero/alpha-deg</independentVar>
                  <independentVar lookup="column">aero/beta-deg</independentVar>
                  <independentVar lookup="table">aero/Re</independentVar>
                  <tableData breakPoint="1.12018250784E7">
 	0.0	10.0
-5.0	-3.0561E-7	0.07718797678262192
0.0	-2.9894E-7	0.07741657724928025
2.0	-2.9579E-7	0.07869932839159935
4.0	-2.9213E-7	0.08085230880458896
6.0	-2.8753E-7	0.08462035913972399
10.0	-2.8667E-7	0.08918517989042754
12.5	-2.9322E-7	0.08558060217307432
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</tableData>
                  <tableData breakPoint="3.36054752352E7">
 	0.0	10.0
-5.0	-3.0561E-7	0.07718797678262192
0.0	-2.9894E-7	0.07741657724928025
2.0	-2.9579E-7	0.07869932839159935
4.0	-2.9213E-7	0.08085230880458896
6.0	-2.8753E-7	0.08462035913972399
10.0	-2.8667E-7	0.08918517989042754
12.5	-2.9322E-7	0.08558060217307432
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</tableData>
                  <tableData breakPoint="4.36871178058E7">
 	0.0	10.0
-5.0	-3.0561E-7	0.07718797678262192
0.0	-2.9894E-7	0.07741657724928025
2.0	-2.9579E-7	0.07869932839159935
4.0	-2.9213E-7	0.08085230880458896
6.0	-2.8753E-7	0.08462035913972399
10.0	-2.8667E-7	0.08918517989042754
12.5	-2.9322E-7	0.08558060217307432
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</tableData>
                  <tableData breakPoint="4.48073003136E7">
 	0.0	10.0
-5.0	-3.0561E-7	0.07718797678262192
0.0	-2.9894E-7	0.07741657724928025
2.0	-2.9579E-7	0.07869932839159935
4.0	-2.9213E-7	0.08085230880458896
6.0	-2.8753E-7	0.08462035913972399
10.0	-2.8667E-7	0.08918517989042754
12.5	-2.9322E-7	0.08558060217307432
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</tableData>
               </table>
            </product>
         </function>
         <function name="aero/function/side_coeff_basic_M1">
            <product>
               <table>
                  <independentVar lookup="row">aero/alpha-deg</independentVar>
                  <independentVar lookup="column">aero/beta-deg</independentVar>
                  <independentVar lookup="table">aero/Re</independentVar>
                  <tableData breakPoint="1.12018250784E7">
 	0.0	10.0
-5.0	-3.743E-7	0.09453612435850095
0.0	-3.6613E-7	0.0948155161611929
2.0	-3.6227E-7	0.09638622288573734
4.0	-3.5779E-7	0.0990237653738437
6.0	-3.5215E-7	0.10363620353554177
10.0	-3.511E-7	0.10922245662905994
12.5	-3.5912E-7	0.10481249543128868
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</tableData>
                  <tableData breakPoint="3.36054752352E7">
 	0.0	10.0
-5.0	-3.743E-7	0.09453612435850095
0.0	-3.6613E-7	0.0948155161611929
2.0	-3.6227E-7	0.09638622288573734
4.0	-3.5779E-7	0.0990237653738437
6.0	-3.5215E-7	0.10363620353554177
10.0	-3.511E-7	0.10922245662905994
12.5	-3.5912E-7	0.10481249543128868
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</tableData>
                  <tableData breakPoint="4.36871178058E7">
 	0.0	10.0
-5.0	-3.743E-7	0.09453612435850095
0.0	-3.6613E-7	0.0948155161611929
2.0	-3.6227E-7	0.09638622288573734
4.0	-3.5779E-7	0.0990237653738437
6.0	-3.5215E-7	0.10363620353554177
10.0	-3.511E-7	0.10922245662905994
12.5	-3.5912E-7	0.10481249543128868
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</tableData>
                  <tableData breakPoint="4.48073003136E7">
 	0.0	10.0
-5.0	-3.743E-7	0.09453612435850095
0.0	-3.6613E-7	0.0948155161611929
2.0	-3.6227E-7	0.09638622288573734
4.0	-3.5779E-7	0.0990237653738437
6.0	-3.5215E-7	0.10363620353554177
10.0	-3.511E-7	0.10922245662905994
12.5	-3.5912E-7	0.10481249543128868
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</tableData>
               </table>
            </product>
         </function>
         <function name="aero/function/side_coeff_basic_M2">
            <product>
               <table>
                  <independentVar lookup="row">aero/alpha-deg</independentVar>
                  <independentVar lookup="column">aero/beta-deg</independentVar>
                  <independentVar lookup="table">aero/Re</independentVar>
                  <tableData breakPoint="1.12018250784E7">
 	0.0	10.0
-5.0	-4.785E-7	0.12085029664110548
0.0	-4.6806E-7	0.12121073480163758
2.0	-4.6313E-7	0.12322353755150867
4.0	-4.574E-7	0.12658888608921723
6.0	-4.5019E-7	0.13249167772143272
10.0	-4.4885E-7	0.13963580613417695
12.5	-4.5909E-7	0.13398602824938435
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</tableData>
                  <tableData breakPoint="3.36054752352E7">
 	0.0	10.0
-5.0	-4.785E-7	0.12085029664110548
0.0	-4.6806E-7	0.12121073480163758
2.0	-4.6313E-7	0.12322353755150867
4.0	-4.574E-7	0.12658888608921723
6.0	-4.5019E-7	0.13249167772143272
10.0	-4.4885E-7	0.13963580613417695
12.5	-4.5909E-7	0.13398602824938435
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</tableData>
                  <tableData breakPoint="4.36871178058E7">
 	0.0	10.0
-5.0	-4.785E-7	0.12085029664110548
0.0	-4.6806E-7	0.12121073480163758
2.0	-4.6313E-7	0.12322353755150867
4.0	-4.574E-7	0.12658888608921723
6.0	-4.5019E-7	0.13249167772143272
10.0	-4.4885E-7	0.13963580613417695
12.5	-4.5909E-7	0.13398602824938435
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</tableData>
                  <tableData breakPoint="4.48073003136E7">
 	0.0	10.0
-5.0	-4.785E-7	0.12085029664110548
0.0	-4.6806E-7	0.12121073480163758
2.0	-4.6313E-7	0.12322353755150867
4.0	-4.574E-7	0.12658888608921723
6.0	-4.5019E-7	0.13249167772143272
10.0	-4.4885E-7	0.13963580613417695
12.5	-4.5909E-7	0.13398602824938435
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</tableData>
               </table>
            </product>
         </function>
         <function name="aero/function/side_coeff_basic_M3">
            <product>
               <table>
                  <independentVar lookup="row">aero/alpha-deg</independentVar>
                  <independentVar lookup="column">aero/beta-deg</independentVar>
                  <independentVar lookup="table">aero/Re</independentVar>
                  <tableData breakPoint="1.12018250784E7">
 	0.0	10.0
-5.0	-4.9906E-7	0.12604679507186592
0.0	-4.8817E-7	0.12641875332905333
2.0	-4.8302E-7	0.12851168115513978
4.0	-4.7705E-7	0.1320314113839373
6.0	-4.6953E-7	0.13818381596564977
10.0	-4.6813E-7	0.1456380827136591
12.5	-4.7882E-7	0.13974680264763517
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</tableData>
                  <tableData breakPoint="3.36054752352E7">
 	0.0	10.0
-5.0	-4.9906E-7	0.12604679507186592
0.0	-4.8817E-7	0.12641875332905333
2.0	-4.8302E-7	0.12851168115513978
4.0	-4.7705E-7	0.1320314113839373
6.0	-4.6953E-7	0.13818381596564977
10.0	-4.6813E-7	0.1456380827136591
12.5	-4.7882E-7	0.13974680264763517
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</tableData>
                  <tableData breakPoint="4.36871178058E7">
 	0.0	10.0
-5.0	-4.9906E-7	0.12604679507186592
0.0	-4.8817E-7	0.12641875332905333
2.0	-4.8302E-7	0.12851168115513978
4.0	-4.7705E-7	0.1320314113839373
6.0	-4.6953E-7	0.13818381596564977
10.0	-4.6813E-7	0.1456380827136591
12.5	-4.7882E-7	0.13974680264763517
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</tableData>
                  <tableData breakPoint="4.48073003136E7">
 	0.0	10.0
-5.0	-4.9906E-7	0.12604679507186592
0.0	-4.8817E-7	0.12641875332905333
2.0	-4.8302E-7	0.12851168115513978
4.0	-4.7705E-7	0.1320314113839373
6.0	-4.6953E-7	0.13818381596564977
10.0	-4.6813E-7	0.1456380827136591
12.5	-4.7882E-7	0.13974680264763517
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</tableData>
               </table>
            </product>
         </function>
         <function name="aero/function/aileron_side_coeff_basic_Mach_deflection">
            <product>
               <interpolate1d>
                  <p>fcs/right-aileron-pos-deg</p>
                  <v>-3.000000</v>
                  <p>aero/function/aileron_side_coeff_basic_Mach_deflection_0</p>
                  <v>3.0000</v>
                  <p>aero/function/aileron_side_coeff_basic_Mach_deflection_1</p>
               </interpolate1d>
            </product>
         </function>
         <function name="aero/function/aileron_side_coeff_basic_Mach_deflection_0">
            <product>
               <interpolate1d>
                  <p>velocities/mach</p>
                  <v>0.2000</v>
                  <p>aero/function/aileron_side_coeff_basic_M0_deflection_0</p>
                  <v>0.6000</v>
                  <p>aero/function/aileron_side_coeff_basic_M1_deflection_0</p>
                  <v>0.7800</v>
                  <p>aero/function/aileron_side_coeff_basic_M2_deflection_0</p>
                  <v>0.8000</v>
                  <p>aero/function/aileron_side_coeff_basic_M3_deflection_0</p>
               </interpolate1d>
            </product>
         </function>
         <function name="aero/function/aileron_side_coeff_basic_M0_deflection_0">
            <product>
               <table>
                  <independentVar lookup="row">aero/alpha-deg</independentVar>
                  <independentVar lookup="column">aero/beta-deg</independentVar>
                  <independentVar lookup="table">aero/Re</independentVar>
                  <tableData breakPoint="1.12018250784E7">
 	0.0	10.0
-5.0	-0.0014744	-5.838047743367369E-4
0.0	-0.0012333	-4.931991666940312E-4
2.0	-9.9177E-4	-4.027099927345289E-4
4.0	-8.9552E-4	-2.6816638489143813E-4
6.0	-7.9969E-4	-3.1308346349405386E-5
10.0	-7.0443E-4	-1.8899195816867164E-4
12.5	7.0443E-4	2.110265789610751E-4
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</tableData>
                  <tableData breakPoint="3.36054752352E7">
 	0.0	10.0
-5.0	-0.0014097	-4.7186943052879586E-4
0.0	-0.0011752	-4.2324403726319045E-4
2.0	-9.3984E-4	-3.5177262259595714E-4
4.0	-8.4596E-4	-2.669640005676384E-4
6.0	-7.5249E-4	-3.836931347130776E-5
10.0	-6.5962E-4	1.0835854694999684E-4
12.5	6.6714E-4	-5.795984260882133E-5
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</tableData>
                  <tableData breakPoint="4.36871178058E7">
 	0.0	10.0
-5.0	-0.0014744	-5.838047743367369E-4
0.0	-0.0012333	-4.931991666940312E-4
2.0	-9.9177E-4	-4.027099927345289E-4
4.0	-8.9552E-4	-2.6816638489143813E-4
6.0	-7.9969E-4	-3.1308346349405386E-5
10.0	-7.0443E-4	-1.8899195816867164E-4
12.5	7.0443E-4	2.110265789610751E-4
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</tableData>
                  <tableData breakPoint="4.48073003136E7">
 	0.0	10.0
-5.0	-0.0014097	-4.7186943052879586E-4
0.0	-0.0011752	-4.2324403726319045E-4
2.0	-9.3984E-4	-3.5177262259595714E-4
4.0	-8.4596E-4	-2.669640005676384E-4
6.0	-7.5249E-4	-3.836931347130776E-5
10.0	-6.5962E-4	1.0835854694999684E-4
12.5	6.6714E-4	-5.795984260882133E-5
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</tableData>
               </table>
            </product>
         </function>
         <function name="aero/function/aileron_side_coeff_basic_M1_deflection_0">
            <product>
               <table>
                  <independentVar lookup="row">aero/alpha-deg</independentVar>
                  <independentVar lookup="column">aero/beta-deg</independentVar>
                  <independentVar lookup="table">aero/Re</independentVar>
                  <tableData breakPoint="1.12018250784E7">
 	0.0	10.0
-5.0	-0.0014744	-5.838047743367369E-4
0.0	-0.0012333	-4.931991666940312E-4
2.0	-9.9177E-4	-4.027099927345289E-4
4.0	-8.9552E-4	-2.6816638489143813E-4
6.0	-7.9969E-4	-3.1308346349405386E-5
10.0	-7.0443E-4	-1.8899195816867164E-4
12.5	7.0443E-4	2.110265789610751E-4
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</tableData>
                  <tableData breakPoint="3.36054752352E7">
 	0.0	10.0
-5.0	-0.0014097	-4.7186943052879586E-4
0.0	-0.0011752	-4.2324403726319045E-4
2.0	-9.3984E-4	-3.5177262259595714E-4
4.0	-8.4596E-4	-2.669640005676384E-4
6.0	-7.5249E-4	-3.836931347130776E-5
10.0	-6.5962E-4	1.0835854694999684E-4
12.5	6.6714E-4	-5.795984260882133E-5
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</tableData>
                  <tableData breakPoint="4.36871178058E7">
 	0.0	10.0
-5.0	-0.0014744	-5.838047743367369E-4
0.0	-0.0012333	-4.931991666940312E-4
2.0	-9.9177E-4	-4.027099927345289E-4
4.0	-8.9552E-4	-2.6816638489143813E-4
6.0	-7.9969E-4	-3.1308346349405386E-5
10.0	-7.0443E-4	-1.8899195816867164E-4
12.5	7.0443E-4	2.110265789610751E-4
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</tableData>
                  <tableData breakPoint="4.48073003136E7">
 	0.0	10.0
-5.0	-0.0014097	-4.7186943052879586E-4
0.0	-0.0011752	-4.2324403726319045E-4
2.0	-9.3984E-4	-3.5177262259595714E-4
4.0	-8.4596E-4	-2.669640005676384E-4
6.0	-7.5249E-4	-3.836931347130776E-5
10.0	-6.5962E-4	1.0835854694999684E-4
12.5	6.6714E-4	-5.795984260882133E-5
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</tableData>
               </table>
            </product>
         </function>
         <function name="aero/function/aileron_side_coeff_basic_M2_deflection_0">
            <product>
               <table>
                  <independentVar lookup="row">aero/alpha-deg</independentVar>
                  <independentVar lookup="column">aero/beta-deg</independentVar>
                  <independentVar lookup="table">aero/Re</independentVar>
                  <tableData breakPoint="1.12018250784E7">
 	0.0	10.0
-5.0	-0.0018058	-7.15010514656414E-4
0.0	-0.0015105	-6.040372060634711E-4
2.0	-0.0012147	-4.932160149188871E-4
4.0	-0.0010968	-3.2843653036209467E-4
6.0	-9.7942E-4	-3.8344095281643446E-5
10.0	-8.6275E-4	-2.314692423453043E-4
12.5	8.6275E-4	2.5845500603062776E-4
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</tableData>
                  <tableData breakPoint="3.36054752352E7">
 	0.0	10.0
-5.0	-0.0017265	-5.779144623395151E-4
0.0	-0.0014393	-5.183670415782669E-4
2.0	-0.0011511	-4.308338655785542E-4
4.0	-0.0010361	-3.269546434426684E-4
6.0	-9.2161E-4	-4.699127210610925E-5
10.0	-8.0786E-4	1.32707516368453E-4
12.5	8.1707E-4	-7.098781734337876E-5
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</tableData>
                  <tableData breakPoint="4.36871178058E7">
 	0.0	10.0
-5.0	-0.0018058	-7.15010514656414E-4
0.0	-0.0015105	-6.040372060634711E-4
2.0	-0.0012147	-4.932160149188871E-4
4.0	-0.0010968	-3.2843653036209467E-4
6.0	-9.7942E-4	-3.8344095281643446E-5
10.0	-8.6275E-4	-2.314692423453043E-4
12.5	8.6275E-4	2.5845500603062776E-4
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</tableData>
                  <tableData breakPoint="4.48073003136E7">
 	0.0	10.0
-5.0	-0.0017265	-5.779144623395151E-4
0.0	-0.0014393	-5.183670415782669E-4
2.0	-0.0011511	-4.308338655785542E-4
4.0	-0.0010361	-3.269546434426684E-4
6.0	-9.2161E-4	-4.699127210610925E-5
10.0	-8.0786E-4	1.32707516368453E-4
12.5	8.1707E-4	-7.098781734337876E-5
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</tableData>
               </table>
            </product>
         </function>
         <function name="aero/function/aileron_side_coeff_basic_M3_deflection_0">
            <product>
               <table>
                  <independentVar lookup="row">aero/alpha-deg</independentVar>
                  <independentVar lookup="column">aero/beta-deg</independentVar>
                  <independentVar lookup="table">aero/Re</independentVar>
                  <tableData breakPoint="1.12018250784E7">
 	0.0	10.0
-5.0	-0.0018058	-7.15010514656414E-4
0.0	-0.0015105	-6.040372060634711E-4
2.0	-0.0012147	-4.932160149188871E-4
4.0	-0.0010968	-3.2843653036209467E-4
6.0	-9.7942E-4	-3.8344095281643446E-5
10.0	-8.6275E-4	-2.314692423453043E-4
12.5	8.6275E-4	2.5845500603062776E-4
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</tableData>
                  <tableData breakPoint="3.36054752352E7">
 	0.0	10.0
-5.0	-0.0017265	-5.779144623395151E-4
0.0	-0.0014393	-5.183670415782669E-4
2.0	-0.0011511	-4.308338655785542E-4
4.0	-0.0010361	-3.269546434426684E-4
6.0	-9.2161E-4	-4.699127210610925E-5
10.0	-8.0786E-4	1.32707516368453E-4
12.5	8.1707E-4	-7.098781734337876E-5
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</tableData>
                  <tableData breakPoint="4.36871178058E7">
 	0.0	10.0
-5.0	-0.0018058	-7.15010514656414E-4
0.0	-0.0015105	-6.040372060634711E-4
2.0	-0.0012147	-4.932160149188871E-4
4.0	-0.0010968	-3.2843653036209467E-4
6.0	-9.7942E-4	-3.8344095281643446E-5
10.0	-8.6275E-4	-2.314692423453043E-4
12.5	8.6275E-4	2.5845500603062776E-4
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</tableData>
                  <tableData breakPoint="4.48073003136E7">
 	0.0	10.0
-5.0	-0.0017265	-5.779144623395151E-4
0.0	-0.0014393	-5.183670415782669E-4
2.0	-0.0011511	-4.308338655785542E-4
4.0	-0.0010361	-3.269546434426684E-4
6.0	-9.2161E-4	-4.699127210610925E-5
10.0	-8.0786E-4	1.32707516368453E-4
12.5	8.1707E-4	-7.098781734337876E-5
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</tableData>
               </table>
            </product>
         </function>
         <function name="aero/function/aileron_side_coeff_basic_Mach_deflection_1">
            <product>
               <interpolate1d>
                  <p>velocities/mach</p>
                  <v>0.2000</v>
                  <p>aero/function/aileron_side_coeff_basic_M0_deflection_1</p>
                  <v>0.6000</v>
                  <p>aero/function/aileron_side_coeff_basic_M1_deflection_1</p>
                  <v>0.7800</v>
                  <p>aero/function/aileron_side_coeff_basic_M2_deflection_1</p>
                  <v>0.8000</v>
                  <p>aero/function/aileron_side_coeff_basic_M3_deflection_1</p>
               </interpolate1d>
            </product>
         </function>
         <function name="aero/function/aileron_side_coeff_basic_M0_deflection_1">
            <product>
               <table>
                  <independentVar lookup="row">aero/alpha-deg</independentVar>
                  <independentVar lookup="column">aero/beta-deg</independentVar>
                  <independentVar lookup="table">aero/Re</independentVar>
                  <tableData breakPoint="1.12018250784E7">
 	0.0	10.0
-5.0	-0.0023086	-9.14071499529351E-4
0.0	-0.001931	-7.722101115783691E-4
2.0	-0.0015528	-6.305384174081306E-4
4.0	-0.0014021	-4.1988156656729274E-4
6.0	-0.0012521	-4.90206454415841E-5
10.0	-0.0011029	-2.9591204701497704E-4
12.5	0.0011029	3.304093257887182E-4
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</tableData>
                  <tableData breakPoint="3.36054752352E7">
 	0.0	10.0
-5.0	-0.0022072	-7.388170734181801E-4
0.0	-0.00184	-6.626896607321922E-4
2.0	-0.0014715	-5.507819443531407E-4
4.0	-0.0013245	-4.1798688755337164E-4
6.0	-0.0011782	-6.007397130422663E-5
10.0	-0.0010328	1.696491495540649E-4
12.5	0.0010445	-9.074563790129464E-5
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</tableData>
                  <tableData breakPoint="4.36871178058E7">
 	0.0	10.0
-5.0	-0.0023086	-9.14071499529351E-4
0.0	-0.001931	-7.722101115783691E-4
2.0	-0.0015528	-6.305384174081306E-4
4.0	-0.0014021	-4.1988156656729274E-4
6.0	-0.0012521	-4.90206454415841E-5
10.0	-0.0011029	-2.9591204701497704E-4
12.5	0.0011029	3.304093257887182E-4
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</tableData>
                  <tableData breakPoint="4.48073003136E7">
 	0.0	10.0
-5.0	-0.0022072	-7.388170734181801E-4
0.0	-0.00184	-6.626896607321922E-4
2.0	-0.0014715	-5.507819443531407E-4
4.0	-0.0013245	-4.1798688755337164E-4
6.0	-0.0011782	-6.007397130422663E-5
10.0	-0.0010328	1.696491495540649E-4
12.5	0.0010445	-9.074563790129464E-5
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</tableData>
               </table>
            </product>
         </function>
         <function name="aero/function/aileron_side_coeff_basic_M1_deflection_1">
            <product>
               <table>
                  <independentVar lookup="row">aero/alpha-deg</independentVar>
                  <independentVar lookup="column">aero/beta-deg</independentVar>
                  <independentVar lookup="table">aero/Re</independentVar>
                  <tableData breakPoint="1.12018250784E7">
 	0.0	10.0
-5.0	-0.0023086	-9.14071499529351E-4
0.0	-0.001931	-7.722101115783691E-4
2.0	-0.0015528	-6.305384174081306E-4
4.0	-0.0014021	-4.1988156656729274E-4
6.0	-0.0012521	-4.90206454415841E-5
10.0	-0.0011029	-2.9591204701497704E-4
12.5	0.0011029	3.304093257887182E-4
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</tableData>
                  <tableData breakPoint="3.36054752352E7">
 	0.0	10.0
-5.0	-0.0022072	-7.388170734181801E-4
0.0	-0.00184	-6.626896607321922E-4
2.0	-0.0014715	-5.507819443531407E-4
4.0	-0.0013245	-4.1798688755337164E-4
6.0	-0.0011782	-6.007397130422663E-5
10.0	-0.0010328	1.696491495540649E-4
12.5	0.0010445	-9.074563790129464E-5
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</tableData>
                  <tableData breakPoint="4.36871178058E7">
 	0.0	10.0
-5.0	-0.0023086	-9.14071499529351E-4
0.0	-0.001931	-7.722101115783691E-4
2.0	-0.0015528	-6.305384174081306E-4
4.0	-0.0014021	-4.1988156656729274E-4
6.0	-0.0012521	-4.90206454415841E-5
10.0	-0.0011029	-2.9591204701497704E-4
12.5	0.0011029	3.304093257887182E-4
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</tableData>
                  <tableData breakPoint="4.48073003136E7">
 	0.0	10.0
-5.0	-0.0022072	-7.388170734181801E-4
0.0	-0.00184	-6.626896607321922E-4
2.0	-0.0014715	-5.507819443531407E-4
4.0	-0.0013245	-4.1798688755337164E-4
6.0	-0.0011782	-6.007397130422663E-5
10.0	-0.0010328	1.696491495540649E-4
12.5	0.0010445	-9.074563790129464E-5
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</tableData>
               </table>
            </product>
         </function>
         <function name="aero/function/aileron_side_coeff_basic_M2_deflection_1">
            <product>
               <table>
                  <independentVar lookup="row">aero/alpha-deg</independentVar>
                  <independentVar lookup="column">aero/beta-deg</independentVar>
                  <independentVar lookup="table">aero/Re</independentVar>
                  <tableData breakPoint="1.12018250784E7">
 	0.0	10.0
-5.0	-0.0024077	-9.533469275949311E-4
0.0	-0.002014	-8.053862241104714E-4
2.0	-0.0016196	-6.576279186102029E-4
4.0	-0.0014624	-4.3791911279505557E-4
6.0	-0.0013059	-5.1126960335736346E-5
10.0	-0.0011503	-3.086248854022361E-4
12.5	0.0011503	3.446057950563172E-4
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</tableData>
                  <tableData breakPoint="3.36054752352E7">
 	0.0	10.0
-5.0	-0.0023021	-7.705542414147072E-4
0.0	-0.0019191	-6.911560554376892E-4
2.0	-0.0015348	-5.744492172797021E-4
4.0	-0.0013815	-4.359437884694842E-4
6.0	-0.0012288	-6.265703321394782E-5
10.0	-0.0010772	1.7694650290628986E-4
12.5	0.0010894	-9.464126275171773E-5
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</tableData>
                  <tableData breakPoint="4.36871178058E7">
 	0.0	10.0
-5.0	-0.0024077	-9.533469275949311E-4
0.0	-0.002014	-8.053862241104714E-4
2.0	-0.0016196	-6.576279186102029E-4
4.0	-0.0014624	-4.3791911279505557E-4
6.0	-0.0013059	-5.1126960335736346E-5
10.0	-0.0011503	-3.086248854022361E-4
12.5	0.0011503	3.446057950563172E-4
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</tableData>
                  <tableData breakPoint="4.48073003136E7">
 	0.0	10.0
-5.0	-0.0023021	-7.705542414147072E-4
0.0	-0.0019191	-6.911560554376892E-4
2.0	-0.0015348	-5.744492172797021E-4
4.0	-0.0013815	-4.359437884694842E-4
6.0	-0.0012288	-6.265703321394782E-5
10.0	-0.0010772	1.7694650290628986E-4
12.5	0.0010894	-9.464126275171773E-5
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</tableData>
               </table>
            </product>
         </function>
         <function name="aero/function/aileron_side_coeff_basic_M3_deflection_1">
            <product>
               <table>
                  <independentVar lookup="row">aero/alpha-deg</independentVar>
                  <independentVar lookup="column">aero/beta-deg</independentVar>
                  <independentVar lookup="table">aero/Re</independentVar>
                  <tableData breakPoint="1.12018250784E7">
 	0.0	10.0
-5.0	-0.0024077	-9.533469275949311E-4
0.0	-0.002014	-8.053862241104714E-4
2.0	-0.0016196	-6.576279186102029E-4
4.0	-0.0014624	-4.3791911279505557E-4
6.0	-0.0013059	-5.1126960335736346E-5
10.0	-0.0011503	-3.086248854022361E-4
12.5	0.0011503	3.446057950563172E-4
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</tableData>
                  <tableData breakPoint="3.36054752352E7">
 	0.0	10.0
-5.0	-0.0023021	-7.705542414147072E-4
0.0	-0.0019191	-6.911560554376892E-4
2.0	-0.0015348	-5.744492172797021E-4
4.0	-0.0013815	-4.359437884694842E-4
6.0	-0.0012288	-6.265703321394782E-5
10.0	-0.0010772	1.7694650290628986E-4
12.5	0.0010894	-9.464126275171773E-5
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</tableData>
                  <tableData breakPoint="4.36871178058E7">
 	0.0	10.0
-5.0	-0.0024077	-9.533469275949311E-4
0.0	-0.002014	-8.053862241104714E-4
2.0	-0.0016196	-6.576279186102029E-4
4.0	-0.0014624	-4.3791911279505557E-4
6.0	-0.0013059	-5.1126960335736346E-5
10.0	-0.0011503	-3.086248854022361E-4
12.5	0.0011503	3.446057950563172E-4
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</tableData>
                  <tableData breakPoint="4.48073003136E7">
 	0.0	10.0
-5.0	-0.0023021	-7.705542414147072E-4
0.0	-0.0019191	-6.911560554376892E-4
2.0	-0.0015348	-5.744492172797021E-4
4.0	-0.0013815	-4.359437884694842E-4
6.0	-0.0012288	-6.265703321394782E-5
10.0	-0.0010772	1.7694650290628986E-4
12.5	0.0010894	-9.464126275171773E-5
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</tableData>
               </table>
            </product>
         </function>
         <function name="aero/function/aileron_side_coeff_effect">
            <sum>
               <p>aero/function/aileron_side_coeff_basic_Mach_deflection</p>
               <p>aero/function/side_coeff_basic_Mach</p>
            </sum>
         </function>
         <function name="aero/forces/aileron_side_basic_Mach">
            <description>side force due to alpha beta Reynolds number and Mach number</description>
            <product>
               <property>aero/qbar-psf</property>
               <property>metrics/Sw-sqft</property>
               <property>aero/function/aileron_side_coeff_effect</property>
            </product>
         </function>
         <function name="aero/function/elevator_side_coeff_basic_Mach_deflection">
            <product>
               <interpolate1d>
                  <p>fcs/elevator-pos-deg</p>
                  <v>-3.000000</v>
                  <p>aero/function/elevator_side_coeff_basic_Mach_deflection_0</p>
                  <v>3.0000</v>
                  <p>aero/function/elevator_side_coeff_basic_Mach_deflection_1</p>
               </interpolate1d>
            </product>
         </function>
         <function name="aero/function/elevator_side_coeff_basic_Mach_deflection_0">
            <product>
               <interpolate1d>
                  <p>velocities/mach</p>
                  <v>0.2000</v>
                  <p>aero/function/elevator_side_coeff_basic_M0_deflection_0</p>
                  <v>0.6000</v>
                  <p>aero/function/elevator_side_coeff_basic_M1_deflection_0</p>
                  <v>0.7800</v>
                  <p>aero/function/elevator_side_coeff_basic_M2_deflection_0</p>
                  <v>0.8000</v>
                  <p>aero/function/elevator_side_coeff_basic_M3_deflection_0</p>
               </interpolate1d>
            </product>
         </function>
         <function name="aero/function/elevator_side_coeff_basic_M0_deflection_0">
            <product>
               <table>
                  <independentVar lookup="row">aero/alpha-deg</independentVar>
                  <independentVar lookup="column">aero/beta-deg</independentVar>
                  <independentVar lookup="table">aero/Re</independentVar>
                  <tableData breakPoint="1.12018250784E7">
 	0.0	10.0
-5.0	-0.0014744	-5.838047743367369E-4
0.0	-0.0012333	-4.931991666940312E-4
2.0	-9.9177E-4	-4.027099927345289E-4
4.0	-8.9552E-4	-2.6816638489143813E-4
6.0	-7.9969E-4	-3.1308346349405386E-5
10.0	-7.0443E-4	-1.8899195816867164E-4
12.5	7.0443E-4	2.110265789610751E-4
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</tableData>
                  <tableData breakPoint="3.36054752352E7">
 	0.0	10.0
-5.0	-0.0014097	-4.7186943052879586E-4
0.0	-0.0011752	-4.2324403726319045E-4
2.0	-9.3984E-4	-3.5177262259595714E-4
4.0	-8.4596E-4	-2.669640005676384E-4
6.0	-7.5249E-4	-3.836931347130776E-5
10.0	-6.5962E-4	1.0835854694999684E-4
12.5	6.6714E-4	-5.795984260882133E-5
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</tableData>
                  <tableData breakPoint="4.36871178058E7">
 	0.0	10.0
-5.0	-0.0014744	-5.838047743367369E-4
0.0	-0.0012333	-4.931991666940312E-4
2.0	-9.9177E-4	-4.027099927345289E-4
4.0	-8.9552E-4	-2.6816638489143813E-4
6.0	-7.9969E-4	-3.1308346349405386E-5
10.0	-7.0443E-4	-1.8899195816867164E-4
12.5	7.0443E-4	2.110265789610751E-4
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</tableData>
                  <tableData breakPoint="4.48073003136E7">
 	0.0	10.0
-5.0	-0.0014097	-4.7186943052879586E-4
0.0	-0.0011752	-4.2324403726319045E-4
2.0	-9.3984E-4	-3.5177262259595714E-4
4.0	-8.4596E-4	-2.669640005676384E-4
6.0	-7.5249E-4	-3.836931347130776E-5
10.0	-6.5962E-4	1.0835854694999684E-4
12.5	6.6714E-4	-5.795984260882133E-5
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</tableData>
               </table>
            </product>
         </function>
         <function name="aero/function/elevator_side_coeff_basic_M1_deflection_0">
            <product>
               <table>
                  <independentVar lookup="row">aero/alpha-deg</independentVar>
                  <independentVar lookup="column">aero/beta-deg</independentVar>
                  <independentVar lookup="table">aero/Re</independentVar>
                  <tableData breakPoint="1.12018250784E7">
 	0.0	10.0
-5.0	-0.0014744	-5.838047743367369E-4
0.0	-0.0012333	-4.931991666940312E-4
2.0	-9.9177E-4	-4.027099927345289E-4
4.0	-8.9552E-4	-2.6816638489143813E-4
6.0	-7.9969E-4	-3.1308346349405386E-5
10.0	-7.0443E-4	-1.8899195816867164E-4
12.5	7.0443E-4	2.110265789610751E-4
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</tableData>
                  <tableData breakPoint="3.36054752352E7">
 	0.0	10.0
-5.0	-0.0014097	-4.7186943052879586E-4
0.0	-0.0011752	-4.2324403726319045E-4
2.0	-9.3984E-4	-3.5177262259595714E-4
4.0	-8.4596E-4	-2.669640005676384E-4
6.0	-7.5249E-4	-3.836931347130776E-5
10.0	-6.5962E-4	1.0835854694999684E-4
12.5	6.6714E-4	-5.795984260882133E-5
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</tableData>
                  <tableData breakPoint="4.36871178058E7">
 	0.0	10.0
-5.0	-0.0014744	-5.838047743367369E-4
0.0	-0.0012333	-4.931991666940312E-4
2.0	-9.9177E-4	-4.027099927345289E-4
4.0	-8.9552E-4	-2.6816638489143813E-4
6.0	-7.9969E-4	-3.1308346349405386E-5
10.0	-7.0443E-4	-1.8899195816867164E-4
12.5	7.0443E-4	2.110265789610751E-4
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</tableData>
                  <tableData breakPoint="4.48073003136E7">
 	0.0	10.0
-5.0	-0.0014097	-4.7186943052879586E-4
0.0	-0.0011752	-4.2324403726319045E-4
2.0	-9.3984E-4	-3.5177262259595714E-4
4.0	-8.4596E-4	-2.669640005676384E-4
6.0	-7.5249E-4	-3.836931347130776E-5
10.0	-6.5962E-4	1.0835854694999684E-4
12.5	6.6714E-4	-5.795984260882133E-5
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</tableData>
               </table>
            </product>
         </function>
         <function name="aero/function/elevator_side_coeff_basic_M2_deflection_0">
            <product>
               <table>
                  <independentVar lookup="row">aero/alpha-deg</independentVar>
                  <independentVar lookup="column">aero/beta-deg</independentVar>
                  <independentVar lookup="table">aero/Re</independentVar>
                  <tableData breakPoint="1.12018250784E7">
 	0.0	10.0
-5.0	-0.0018058	-7.15010514656414E-4
0.0	-0.0015105	-6.040372060634711E-4
2.0	-0.0012147	-4.932160149188871E-4
4.0	-0.0010968	-3.2843653036209467E-4
6.0	-9.7942E-4	-3.8344095281643446E-5
10.0	-8.6275E-4	-2.314692423453043E-4
12.5	8.6275E-4	2.5845500603062776E-4
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</tableData>
                  <tableData breakPoint="3.36054752352E7">
 	0.0	10.0
-5.0	-0.0017265	-5.779144623395151E-4
0.0	-0.0014393	-5.183670415782669E-4
2.0	-0.0011511	-4.308338655785542E-4
4.0	-0.0010361	-3.269546434426684E-4
6.0	-9.2161E-4	-4.699127210610925E-5
10.0	-8.0786E-4	1.32707516368453E-4
12.5	8.1707E-4	-7.098781734337876E-5
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</tableData>
                  <tableData breakPoint="4.36871178058E7">
 	0.0	10.0
-5.0	-0.0018058	-7.15010514656414E-4
0.0	-0.0015105	-6.040372060634711E-4
2.0	-0.0012147	-4.932160149188871E-4
4.0	-0.0010968	-3.2843653036209467E-4
6.0	-9.7942E-4	-3.8344095281643446E-5
10.0	-8.6275E-4	-2.314692423453043E-4
12.5	8.6275E-4	2.5845500603062776E-4
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</tableData>
                  <tableData breakPoint="4.48073003136E7">
 	0.0	10.0
-5.0	-0.0017265	-5.779144623395151E-4
0.0	-0.0014393	-5.183670415782669E-4
2.0	-0.0011511	-4.308338655785542E-4
4.0	-0.0010361	-3.269546434426684E-4
6.0	-9.2161E-4	-4.699127210610925E-5
10.0	-8.0786E-4	1.32707516368453E-4
12.5	8.1707E-4	-7.098781734337876E-5
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</tableData>
               </table>
            </product>
         </function>
         <function name="aero/function/elevator_side_coeff_basic_M3_deflection_0">
            <product>
               <table>
                  <independentVar lookup="row">aero/alpha-deg</independentVar>
                  <independentVar lookup="column">aero/beta-deg</independentVar>
                  <independentVar lookup="table">aero/Re</independentVar>
                  <tableData breakPoint="1.12018250784E7">
 	0.0	10.0
-5.0	-0.0018058	-7.15010514656414E-4
0.0	-0.0015105	-6.040372060634711E-4
2.0	-0.0012147	-4.932160149188871E-4
4.0	-0.0010968	-3.2843653036209467E-4
6.0	-9.7942E-4	-3.8344095281643446E-5
10.0	-8.6275E-4	-2.314692423453043E-4
12.5	8.6275E-4	2.5845500603062776E-4
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</tableData>
                  <tableData breakPoint="3.36054752352E7">
 	0.0	10.0
-5.0	-0.0017265	-5.779144623395151E-4
0.0	-0.0014393	-5.183670415782669E-4
2.0	-0.0011511	-4.308338655785542E-4
4.0	-0.0010361	-3.269546434426684E-4
6.0	-9.2161E-4	-4.699127210610925E-5
10.0	-8.0786E-4	1.32707516368453E-4
12.5	8.1707E-4	-7.098781734337876E-5
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</tableData>
                  <tableData breakPoint="4.36871178058E7">
 	0.0	10.0
-5.0	-0.0018058	-7.15010514656414E-4
0.0	-0.0015105	-6.040372060634711E-4
2.0	-0.0012147	-4.932160149188871E-4
4.0	-0.0010968	-3.2843653036209467E-4
6.0	-9.7942E-4	-3.8344095281643446E-5
10.0	-8.6275E-4	-2.314692423453043E-4
12.5	8.6275E-4	2.5845500603062776E-4
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</tableData>
                  <tableData breakPoint="4.48073003136E7">
 	0.0	10.0
-5.0	-0.0017265	-5.779144623395151E-4
0.0	-0.0014393	-5.183670415782669E-4
2.0	-0.0011511	-4.308338655785542E-4
4.0	-0.0010361	-3.269546434426684E-4
6.0	-9.2161E-4	-4.699127210610925E-5
10.0	-8.0786E-4	1.32707516368453E-4
12.5	8.1707E-4	-7.098781734337876E-5
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</tableData>
               </table>
            </product>
         </function>
         <function name="aero/function/elevator_side_coeff_basic_Mach_deflection_1">
            <product>
               <interpolate1d>
                  <p>velocities/mach</p>
                  <v>0.2000</v>
                  <p>aero/function/elevator_side_coeff_basic_M0_deflection_1</p>
                  <v>0.6000</v>
                  <p>aero/function/elevator_side_coeff_basic_M1_deflection_1</p>
                  <v>0.7800</v>
                  <p>aero/function/elevator_side_coeff_basic_M2_deflection_1</p>
                  <v>0.8000</v>
                  <p>aero/function/elevator_side_coeff_basic_M3_deflection_1</p>
               </interpolate1d>
            </product>
         </function>
         <function name="aero/function/elevator_side_coeff_basic_M0_deflection_1">
            <product>
               <table>
                  <independentVar lookup="row">aero/alpha-deg</independentVar>
                  <independentVar lookup="column">aero/beta-deg</independentVar>
                  <independentVar lookup="table">aero/Re</independentVar>
                  <tableData breakPoint="1.12018250784E7">
 	0.0	10.0
-5.0	-0.0023086	-9.14071499529351E-4
0.0	-0.001931	-7.722101115783691E-4
2.0	-0.0015528	-6.305384174081306E-4
4.0	-0.0014021	-4.1988156656729274E-4
6.0	-0.0012521	-4.90206454415841E-5
10.0	-0.0011029	-2.9591204701497704E-4
12.5	0.0011029	3.304093257887182E-4
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</tableData>
                  <tableData breakPoint="3.36054752352E7">
 	0.0	10.0
-5.0	-0.0022072	-7.388170734181801E-4
0.0	-0.00184	-6.626896607321922E-4
2.0	-0.0014715	-5.507819443531407E-4
4.0	-0.0013245	-4.1798688755337164E-4
6.0	-0.0011782	-6.007397130422663E-5
10.0	-0.0010328	1.696491495540649E-4
12.5	0.0010445	-9.074563790129464E-5
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</tableData>
                  <tableData breakPoint="4.36871178058E7">
 	0.0	10.0
-5.0	-0.0023086	-9.14071499529351E-4
0.0	-0.001931	-7.722101115783691E-4
2.0	-0.0015528	-6.305384174081306E-4
4.0	-0.0014021	-4.1988156656729274E-4
6.0	-0.0012521	-4.90206454415841E-5
10.0	-0.0011029	-2.9591204701497704E-4
12.5	0.0011029	3.304093257887182E-4
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</tableData>
                  <tableData breakPoint="4.48073003136E7">
 	0.0	10.0
-5.0	-0.0022072	-7.388170734181801E-4
0.0	-0.00184	-6.626896607321922E-4
2.0	-0.0014715	-5.507819443531407E-4
4.0	-0.0013245	-4.1798688755337164E-4
6.0	-0.0011782	-6.007397130422663E-5
10.0	-0.0010328	1.696491495540649E-4
12.5	0.0010445	-9.074563790129464E-5
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</tableData>
               </table>
            </product>
         </function>
         <function name="aero/function/elevator_side_coeff_basic_M1_deflection_1">
            <product>
               <table>
                  <independentVar lookup="row">aero/alpha-deg</independentVar>
                  <independentVar lookup="column">aero/beta-deg</independentVar>
                  <independentVar lookup="table">aero/Re</independentVar>
                  <tableData breakPoint="1.12018250784E7">
 	0.0	10.0
-5.0	-0.0023086	-9.14071499529351E-4
0.0	-0.001931	-7.722101115783691E-4
2.0	-0.0015528	-6.305384174081306E-4
4.0	-0.0014021	-4.1988156656729274E-4
6.0	-0.0012521	-4.90206454415841E-5
10.0	-0.0011029	-2.9591204701497704E-4
12.5	0.0011029	3.304093257887182E-4
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</tableData>
                  <tableData breakPoint="3.36054752352E7">
 	0.0	10.0
-5.0	-0.0022072	-7.388170734181801E-4
0.0	-0.00184	-6.626896607321922E-4
2.0	-0.0014715	-5.507819443531407E-4
4.0	-0.0013245	-4.1798688755337164E-4
6.0	-0.0011782	-6.007397130422663E-5
10.0	-0.0010328	1.696491495540649E-4
12.5	0.0010445	-9.074563790129464E-5
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</tableData>
                  <tableData breakPoint="4.36871178058E7">
 	0.0	10.0
-5.0	-0.0023086	-9.14071499529351E-4
0.0	-0.001931	-7.722101115783691E-4
2.0	-0.0015528	-6.305384174081306E-4
4.0	-0.0014021	-4.1988156656729274E-4
6.0	-0.0012521	-4.90206454415841E-5
10.0	-0.0011029	-2.9591204701497704E-4
12.5	0.0011029	3.304093257887182E-4
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</tableData>
                  <tableData breakPoint="4.48073003136E7">
 	0.0	10.0
-5.0	-0.0022072	-7.388170734181801E-4
0.0	-0.00184	-6.626896607321922E-4
2.0	-0.0014715	-5.507819443531407E-4
4.0	-0.0013245	-4.1798688755337164E-4
6.0	-0.0011782	-6.007397130422663E-5
10.0	-0.0010328	1.696491495540649E-4
12.5	0.0010445	-9.074563790129464E-5
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</tableData>
               </table>
            </product>
         </function>
         <function name="aero/function/elevator_side_coeff_basic_M2_deflection_1">
            <product>
               <table>
                  <independentVar lookup="row">aero/alpha-deg</independentVar>
                  <independentVar lookup="column">aero/beta-deg</independentVar>
                  <independentVar lookup="table">aero/Re</independentVar>
                  <tableData breakPoint="1.12018250784E7">
 	0.0	10.0
-5.0	-0.0024077	-9.533469275949311E-4
0.0	-0.002014	-8.053862241104714E-4
2.0	-0.0016196	-6.576279186102029E-4
4.0	-0.0014624	-4.3791911279505557E-4
6.0	-0.0013059	-5.1126960335736346E-5
10.0	-0.0011503	-3.086248854022361E-4
12.5	0.0011503	3.446057950563172E-4
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</tableData>
                  <tableData breakPoint="3.36054752352E7">
 	0.0	10.0
-5.0	-0.0023021	-7.705542414147072E-4
0.0	-0.0019191	-6.911560554376892E-4
2.0	-0.0015348	-5.744492172797021E-4
4.0	-0.0013815	-4.359437884694842E-4
6.0	-0.0012288	-6.265703321394782E-5
10.0	-0.0010772	1.7694650290628986E-4
12.5	0.0010894	-9.464126275171773E-5
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</tableData>
                  <tableData breakPoint="4.36871178058E7">
 	0.0	10.0
-5.0	-0.0024077	-9.533469275949311E-4
0.0	-0.002014	-8.053862241104714E-4
2.0	-0.0016196	-6.576279186102029E-4
4.0	-0.0014624	-4.3791911279505557E-4
6.0	-0.0013059	-5.1126960335736346E-5
10.0	-0.0011503	-3.086248854022361E-4
12.5	0.0011503	3.446057950563172E-4
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</tableData>
                  <tableData breakPoint="4.48073003136E7">
 	0.0	10.0
-5.0	-0.0023021	-7.705542414147072E-4
0.0	-0.0019191	-6.911560554376892E-4
2.0	-0.0015348	-5.744492172797021E-4
4.0	-0.0013815	-4.359437884694842E-4
6.0	-0.0012288	-6.265703321394782E-5
10.0	-0.0010772	1.7694650290628986E-4
12.5	0.0010894	-9.464126275171773E-5
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</tableData>
               </table>
            </product>
         </function>
         <function name="aero/function/elevator_side_coeff_basic_M3_deflection_1">
            <product>
               <table>
                  <independentVar lookup="row">aero/alpha-deg</independentVar>
                  <independentVar lookup="column">aero/beta-deg</independentVar>
                  <independentVar lookup="table">aero/Re</independentVar>
                  <tableData breakPoint="1.12018250784E7">
 	0.0	10.0
-5.0	-0.0024077	-9.533469275949311E-4
0.0	-0.002014	-8.053862241104714E-4
2.0	-0.0016196	-6.576279186102029E-4
4.0	-0.0014624	-4.3791911279505557E-4
6.0	-0.0013059	-5.1126960335736346E-5
10.0	-0.0011503	-3.086248854022361E-4
12.5	0.0011503	3.446057950563172E-4
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</tableData>
                  <tableData breakPoint="3.36054752352E7">
 	0.0	10.0
-5.0	-0.0023021	-7.705542414147072E-4
0.0	-0.0019191	-6.911560554376892E-4
2.0	-0.0015348	-5.744492172797021E-4
4.0	-0.0013815	-4.359437884694842E-4
6.0	-0.0012288	-6.265703321394782E-5
10.0	-0.0010772	1.7694650290628986E-4
12.5	0.0010894	-9.464126275171773E-5
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</tableData>
                  <tableData breakPoint="4.36871178058E7">
 	0.0	10.0
-5.0	-0.0024077	-9.533469275949311E-4
0.0	-0.002014	-8.053862241104714E-4
2.0	-0.0016196	-6.576279186102029E-4
4.0	-0.0014624	-4.3791911279505557E-4
6.0	-0.0013059	-5.1126960335736346E-5
10.0	-0.0011503	-3.086248854022361E-4
12.5	0.0011503	3.446057950563172E-4
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</tableData>
                  <tableData breakPoint="4.48073003136E7">
 	0.0	10.0
-5.0	-0.0023021	-7.705542414147072E-4
0.0	-0.0019191	-6.911560554376892E-4
2.0	-0.0015348	-5.744492172797021E-4
4.0	-0.0013815	-4.359437884694842E-4
6.0	-0.0012288	-6.265703321394782E-5
10.0	-0.0010772	1.7694650290628986E-4
12.5	0.0010894	-9.464126275171773E-5
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</tableData>
               </table>
            </product>
         </function>
         <function name="aero/function/elevator_side_coeff_effect">
            <sum>
               <p>aero/function/elevator_side_coeff_basic_Mach_deflection</p>
               <p>aero/function/side_coeff_basic_Mach</p>
            </sum>
         </function>
         <function name="aero/forces/elevator_side_basic_Mach">
            <description>side force due to alpha beta Reynolds number and Mach number</description>
            <product>
               <property>aero/qbar-psf</property>
               <property>metrics/Sw-sqft</property>
               <property>aero/function/elevator_side_coeff_effect</property>
            </product>
         </function>
         <function name="aero/function/rudder_side_coeff_basic_Mach_deflection">
            <product>
               <interpolate1d>
                  <p>fcs/rudder-pos-deg</p>
                  <v>-3.000000</v>
                  <p>aero/function/rudder_side_coeff_basic_Mach_deflection_0</p>
                  <v>3.0000</v>
                  <p>aero/function/rudder_side_coeff_basic_Mach_deflection_1</p>
               </interpolate1d>
            </product>
         </function>
         <function name="aero/function/rudder_side_coeff_basic_Mach_deflection_0">
            <product>
               <interpolate1d>
                  <p>velocities/mach</p>
                  <v>0.2000</v>
                  <p>aero/function/rudder_side_coeff_basic_M0_deflection_0</p>
                  <v>0.6000</v>
                  <p>aero/function/rudder_side_coeff_basic_M1_deflection_0</p>
                  <v>0.7800</v>
                  <p>aero/function/rudder_side_coeff_basic_M2_deflection_0</p>
                  <v>0.8000</v>
                  <p>aero/function/rudder_side_coeff_basic_M3_deflection_0</p>
               </interpolate1d>
            </product>
         </function>
         <function name="aero/function/rudder_side_coeff_basic_M0_deflection_0">
            <product>
               <table>
                  <independentVar lookup="row">aero/alpha-deg</independentVar>
                  <independentVar lookup="column">aero/beta-deg</independentVar>
                  <independentVar lookup="table">aero/Re</independentVar>
                  <tableData breakPoint="1.12018250784E7">
 	0.0	10.0
-5.0	-0.0014744	-5.838047743367369E-4
0.0	-0.0012333	-4.931991666940312E-4
2.0	-9.9177E-4	-4.027099927345289E-4
4.0	-8.9552E-4	-2.6816638489143813E-4
6.0	-7.9969E-4	-3.1308346349405386E-5
10.0	-7.0443E-4	-1.8899195816867164E-4
12.5	7.0443E-4	2.110265789610751E-4
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</tableData>
                  <tableData breakPoint="3.36054752352E7">
 	0.0	10.0
-5.0	-0.0014097	-4.7186943052879586E-4
0.0	-0.0011752	-4.2324403726319045E-4
2.0	-9.3984E-4	-3.5177262259595714E-4
4.0	-8.4596E-4	-2.669640005676384E-4
6.0	-7.5249E-4	-3.836931347130776E-5
10.0	-6.5962E-4	1.0835854694999684E-4
12.5	6.6714E-4	-5.795984260882133E-5
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</tableData>
                  <tableData breakPoint="4.36871178058E7">
 	0.0	10.0
-5.0	-0.0014744	-5.838047743367369E-4
0.0	-0.0012333	-4.931991666940312E-4
2.0	-9.9177E-4	-4.027099927345289E-4
4.0	-8.9552E-4	-2.6816638489143813E-4
6.0	-7.9969E-4	-3.1308346349405386E-5
10.0	-7.0443E-4	-1.8899195816867164E-4
12.5	7.0443E-4	2.110265789610751E-4
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</tableData>
                  <tableData breakPoint="4.48073003136E7">
 	0.0	10.0
-5.0	-0.0014097	-4.7186943052879586E-4
0.0	-0.0011752	-4.2324403726319045E-4
2.0	-9.3984E-4	-3.5177262259595714E-4
4.0	-8.4596E-4	-2.669640005676384E-4
6.0	-7.5249E-4	-3.836931347130776E-5
10.0	-6.5962E-4	1.0835854694999684E-4
12.5	6.6714E-4	-5.795984260882133E-5
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</tableData>
               </table>
            </product>
         </function>
         <function name="aero/function/rudder_side_coeff_basic_M1_deflection_0">
            <product>
               <table>
                  <independentVar lookup="row">aero/alpha-deg</independentVar>
                  <independentVar lookup="column">aero/beta-deg</independentVar>
                  <independentVar lookup="table">aero/Re</independentVar>
                  <tableData breakPoint="1.12018250784E7">
 	0.0	10.0
-5.0	-0.0014744	-5.838047743367369E-4
0.0	-0.0012333	-4.931991666940312E-4
2.0	-9.9177E-4	-4.027099927345289E-4
4.0	-8.9552E-4	-2.6816638489143813E-4
6.0	-7.9969E-4	-3.1308346349405386E-5
10.0	-7.0443E-4	-1.8899195816867164E-4
12.5	7.0443E-4	2.110265789610751E-4
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</tableData>
                  <tableData breakPoint="3.36054752352E7">
 	0.0	10.0
-5.0	-0.0014097	-4.7186943052879586E-4
0.0	-0.0011752	-4.2324403726319045E-4
2.0	-9.3984E-4	-3.5177262259595714E-4
4.0	-8.4596E-4	-2.669640005676384E-4
6.0	-7.5249E-4	-3.836931347130776E-5
10.0	-6.5962E-4	1.0835854694999684E-4
12.5	6.6714E-4	-5.795984260882133E-5
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</tableData>
                  <tableData breakPoint="4.36871178058E7">
 	0.0	10.0
-5.0	-0.0014744	-5.838047743367369E-4
0.0	-0.0012333	-4.931991666940312E-4
2.0	-9.9177E-4	-4.027099927345289E-4
4.0	-8.9552E-4	-2.6816638489143813E-4
6.0	-7.9969E-4	-3.1308346349405386E-5
10.0	-7.0443E-4	-1.8899195816867164E-4
12.5	7.0443E-4	2.110265789610751E-4
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</tableData>
                  <tableData breakPoint="4.48073003136E7">
 	0.0	10.0
-5.0	-0.0014097	-4.7186943052879586E-4
0.0	-0.0011752	-4.2324403726319045E-4
2.0	-9.3984E-4	-3.5177262259595714E-4
4.0	-8.4596E-4	-2.669640005676384E-4
6.0	-7.5249E-4	-3.836931347130776E-5
10.0	-6.5962E-4	1.0835854694999684E-4
12.5	6.6714E-4	-5.795984260882133E-5
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</tableData>
               </table>
            </product>
         </function>
         <function name="aero/function/rudder_side_coeff_basic_M2_deflection_0">
            <product>
               <table>
                  <independentVar lookup="row">aero/alpha-deg</independentVar>
                  <independentVar lookup="column">aero/beta-deg</independentVar>
                  <independentVar lookup="table">aero/Re</independentVar>
                  <tableData breakPoint="1.12018250784E7">
 	0.0	10.0
-5.0	-0.0018058	-7.15010514656414E-4
0.0	-0.0015105	-6.040372060634711E-4
2.0	-0.0012147	-4.932160149188871E-4
4.0	-0.0010968	-3.2843653036209467E-4
6.0	-9.7942E-4	-3.8344095281643446E-5
10.0	-8.6275E-4	-2.314692423453043E-4
12.5	8.6275E-4	2.5845500603062776E-4
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</tableData>
                  <tableData breakPoint="3.36054752352E7">
 	0.0	10.0
-5.0	-0.0017265	-5.779144623395151E-4
0.0	-0.0014393	-5.183670415782669E-4
2.0	-0.0011511	-4.308338655785542E-4
4.0	-0.0010361	-3.269546434426684E-4
6.0	-9.2161E-4	-4.699127210610925E-5
10.0	-8.0786E-4	1.32707516368453E-4
12.5	8.1707E-4	-7.098781734337876E-5
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</tableData>
                  <tableData breakPoint="4.36871178058E7">
 	0.0	10.0
-5.0	-0.0018058	-7.15010514656414E-4
0.0	-0.0015105	-6.040372060634711E-4
2.0	-0.0012147	-4.932160149188871E-4
4.0	-0.0010968	-3.2843653036209467E-4
6.0	-9.7942E-4	-3.8344095281643446E-5
10.0	-8.6275E-4	-2.314692423453043E-4
12.5	8.6275E-4	2.5845500603062776E-4
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</tableData>
                  <tableData breakPoint="4.48073003136E7">
 	0.0	10.0
-5.0	-0.0017265	-5.779144623395151E-4
0.0	-0.0014393	-5.183670415782669E-4
2.0	-0.0011511	-4.308338655785542E-4
4.0	-0.0010361	-3.269546434426684E-4
6.0	-9.2161E-4	-4.699127210610925E-5
10.0	-8.0786E-4	1.32707516368453E-4
12.5	8.1707E-4	-7.098781734337876E-5
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</tableData>
               </table>
            </product>
         </function>
         <function name="aero/function/rudder_side_coeff_basic_M3_deflection_0">
            <product>
               <table>
                  <independentVar lookup="row">aero/alpha-deg</independentVar>
                  <independentVar lookup="column">aero/beta-deg</independentVar>
                  <independentVar lookup="table">aero/Re</independentVar>
                  <tableData breakPoint="1.12018250784E7">
 	0.0	10.0
-5.0	-0.0018058	-7.15010514656414E-4
0.0	-0.0015105	-6.040372060634711E-4
2.0	-0.0012147	-4.932160149188871E-4
4.0	-0.0010968	-3.2843653036209467E-4
6.0	-9.7942E-4	-3.8344095281643446E-5
10.0	-8.6275E-4	-2.314692423453043E-4
12.5	8.6275E-4	2.5845500603062776E-4
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</tableData>
                  <tableData breakPoint="3.36054752352E7">
 	0.0	10.0
-5.0	-0.0017265	-5.779144623395151E-4
0.0	-0.0014393	-5.183670415782669E-4
2.0	-0.0011511	-4.308338655785542E-4
4.0	-0.0010361	-3.269546434426684E-4
6.0	-9.2161E-4	-4.699127210610925E-5
10.0	-8.0786E-4	1.32707516368453E-4
12.5	8.1707E-4	-7.098781734337876E-5
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</tableData>
                  <tableData breakPoint="4.36871178058E7">
 	0.0	10.0
-5.0	-0.0018058	-7.15010514656414E-4
0.0	-0.0015105	-6.040372060634711E-4
2.0	-0.0012147	-4.932160149188871E-4
4.0	-0.0010968	-3.2843653036209467E-4
6.0	-9.7942E-4	-3.8344095281643446E-5
10.0	-8.6275E-4	-2.314692423453043E-4
12.5	8.6275E-4	2.5845500603062776E-4
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</tableData>
                  <tableData breakPoint="4.48073003136E7">
 	0.0	10.0
-5.0	-0.0017265	-5.779144623395151E-4
0.0	-0.0014393	-5.183670415782669E-4
2.0	-0.0011511	-4.308338655785542E-4
4.0	-0.0010361	-3.269546434426684E-4
6.0	-9.2161E-4	-4.699127210610925E-5
10.0	-8.0786E-4	1.32707516368453E-4
12.5	8.1707E-4	-7.098781734337876E-5
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</tableData>
               </table>
            </product>
         </function>
         <function name="aero/function/rudder_side_coeff_basic_Mach_deflection_1">
            <product>
               <interpolate1d>
                  <p>velocities/mach</p>
                  <v>0.2000</v>
                  <p>aero/function/rudder_side_coeff_basic_M0_deflection_1</p>
                  <v>0.6000</v>
                  <p>aero/function/rudder_side_coeff_basic_M1_deflection_1</p>
                  <v>0.7800</v>
                  <p>aero/function/rudder_side_coeff_basic_M2_deflection_1</p>
                  <v>0.8000</v>
                  <p>aero/function/rudder_side_coeff_basic_M3_deflection_1</p>
               </interpolate1d>
            </product>
         </function>
         <function name="aero/function/rudder_side_coeff_basic_M0_deflection_1">
            <product>
               <table>
                  <independentVar lookup="row">aero/alpha-deg</independentVar>
                  <independentVar lookup="column">aero/beta-deg</independentVar>
                  <independentVar lookup="table">aero/Re</independentVar>
                  <tableData breakPoint="1.12018250784E7">
 	0.0	10.0
-5.0	-0.0023086	-9.14071499529351E-4
0.0	-0.001931	-7.722101115783691E-4
2.0	-0.0015528	-6.305384174081306E-4
4.0	-0.0014021	-4.1988156656729274E-4
6.0	-0.0012521	-4.90206454415841E-5
10.0	-0.0011029	-2.9591204701497704E-4
12.5	0.0011029	3.304093257887182E-4
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</tableData>
                  <tableData breakPoint="3.36054752352E7">
 	0.0	10.0
-5.0	-0.0022072	-7.388170734181801E-4
0.0	-0.00184	-6.626896607321922E-4
2.0	-0.0014715	-5.507819443531407E-4
4.0	-0.0013245	-4.1798688755337164E-4
6.0	-0.0011782	-6.007397130422663E-5
10.0	-0.0010328	1.696491495540649E-4
12.5	0.0010445	-9.074563790129464E-5
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</tableData>
                  <tableData breakPoint="4.36871178058E7">
 	0.0	10.0
-5.0	-0.0023086	-9.14071499529351E-4
0.0	-0.001931	-7.722101115783691E-4
2.0	-0.0015528	-6.305384174081306E-4
4.0	-0.0014021	-4.1988156656729274E-4
6.0	-0.0012521	-4.90206454415841E-5
10.0	-0.0011029	-2.9591204701497704E-4
12.5	0.0011029	3.304093257887182E-4
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</tableData>
                  <tableData breakPoint="4.48073003136E7">
 	0.0	10.0
-5.0	-0.0022072	-7.388170734181801E-4
0.0	-0.00184	-6.626896607321922E-4
2.0	-0.0014715	-5.507819443531407E-4
4.0	-0.0013245	-4.1798688755337164E-4
6.0	-0.0011782	-6.007397130422663E-5
10.0	-0.0010328	1.696491495540649E-4
12.5	0.0010445	-9.074563790129464E-5
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</tableData>
               </table>
            </product>
         </function>
         <function name="aero/function/rudder_side_coeff_basic_M1_deflection_1">
            <product>
               <table>
                  <independentVar lookup="row">aero/alpha-deg</independentVar>
                  <independentVar lookup="column">aero/beta-deg</independentVar>
                  <independentVar lookup="table">aero/Re</independentVar>
                  <tableData breakPoint="1.12018250784E7">
 	0.0	10.0
-5.0	-0.0023086	-9.14071499529351E-4
0.0	-0.001931	-7.722101115783691E-4
2.0	-0.0015528	-6.305384174081306E-4
4.0	-0.0014021	-4.1988156656729274E-4
6.0	-0.0012521	-4.90206454415841E-5
10.0	-0.0011029	-2.9591204701497704E-4
12.5	0.0011029	3.304093257887182E-4
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</tableData>
                  <tableData breakPoint="3.36054752352E7">
 	0.0	10.0
-5.0	-0.0022072	-7.388170734181801E-4
0.0	-0.00184	-6.626896607321922E-4
2.0	-0.0014715	-5.507819443531407E-4
4.0	-0.0013245	-4.1798688755337164E-4
6.0	-0.0011782	-6.007397130422663E-5
10.0	-0.0010328	1.696491495540649E-4
12.5	0.0010445	-9.074563790129464E-5
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</tableData>
                  <tableData breakPoint="4.36871178058E7">
 	0.0	10.0
-5.0	-0.0023086	-9.14071499529351E-4
0.0	-0.001931	-7.722101115783691E-4
2.0	-0.0015528	-6.305384174081306E-4
4.0	-0.0014021	-4.1988156656729274E-4
6.0	-0.0012521	-4.90206454415841E-5
10.0	-0.0011029	-2.9591204701497704E-4
12.5	0.0011029	3.304093257887182E-4
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</tableData>
                  <tableData breakPoint="4.48073003136E7">
 	0.0	10.0
-5.0	-0.0022072	-7.388170734181801E-4
0.0	-0.00184	-6.626896607321922E-4
2.0	-0.0014715	-5.507819443531407E-4
4.0	-0.0013245	-4.1798688755337164E-4
6.0	-0.0011782	-6.007397130422663E-5
10.0	-0.0010328	1.696491495540649E-4
12.5	0.0010445	-9.074563790129464E-5
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</tableData>
               </table>
            </product>
         </function>
         <function name="aero/function/rudder_side_coeff_basic_M2_deflection_1">
            <product>
               <table>
                  <independentVar lookup="row">aero/alpha-deg</independentVar>
                  <independentVar lookup="column">aero/beta-deg</independentVar>
                  <independentVar lookup="table">aero/Re</independentVar>
                  <tableData breakPoint="1.12018250784E7">
 	0.0	10.0
-5.0	-0.0024077	-9.533469275949311E-4
0.0	-0.002014	-8.053862241104714E-4
2.0	-0.0016196	-6.576279186102029E-4
4.0	-0.0014624	-4.3791911279505557E-4
6.0	-0.0013059	-5.1126960335736346E-5
10.0	-0.0011503	-3.086248854022361E-4
12.5	0.0011503	3.446057950563172E-4
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</tableData>
                  <tableData breakPoint="3.36054752352E7">
 	0.0	10.0
-5.0	-0.0023021	-7.705542414147072E-4
0.0	-0.0019191	-6.911560554376892E-4
2.0	-0.0015348	-5.744492172797021E-4
4.0	-0.0013815	-4.359437884694842E-4
6.0	-0.0012288	-6.265703321394782E-5
10.0	-0.0010772	1.7694650290628986E-4
12.5	0.0010894	-9.464126275171773E-5
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</tableData>
                  <tableData breakPoint="4.36871178058E7">
 	0.0	10.0
-5.0	-0.0024077	-9.533469275949311E-4
0.0	-0.002014	-8.053862241104714E-4
2.0	-0.0016196	-6.576279186102029E-4
4.0	-0.0014624	-4.3791911279505557E-4
6.0	-0.0013059	-5.1126960335736346E-5
10.0	-0.0011503	-3.086248854022361E-4
12.5	0.0011503	3.446057950563172E-4
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</tableData>
                  <tableData breakPoint="4.48073003136E7">
 	0.0	10.0
-5.0	-0.0023021	-7.705542414147072E-4
0.0	-0.0019191	-6.911560554376892E-4
2.0	-0.0015348	-5.744492172797021E-4
4.0	-0.0013815	-4.359437884694842E-4
6.0	-0.0012288	-6.265703321394782E-5
10.0	-0.0010772	1.7694650290628986E-4
12.5	0.0010894	-9.464126275171773E-5
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</tableData>
               </table>
            </product>
         </function>
         <function name="aero/function/rudder_side_coeff_basic_M3_deflection_1">
            <product>
               <table>
                  <independentVar lookup="row">aero/alpha-deg</independentVar>
                  <independentVar lookup="column">aero/beta-deg</independentVar>
                  <independentVar lookup="table">aero/Re</independentVar>
                  <tableData breakPoint="1.12018250784E7">
 	0.0	10.0
-5.0	-0.0024077	-9.533469275949311E-4
0.0	-0.002014	-8.053862241104714E-4
2.0	-0.0016196	-6.576279186102029E-4
4.0	-0.0014624	-4.3791911279505557E-4
6.0	-0.0013059	-5.1126960335736346E-5
10.0	-0.0011503	-3.086248854022361E-4
12.5	0.0011503	3.446057950563172E-4
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</tableData>
                  <tableData breakPoint="3.36054752352E7">
 	0.0	10.0
-5.0	-0.0023021	-7.705542414147072E-4
0.0	-0.0019191	-6.911560554376892E-4
2.0	-0.0015348	-5.744492172797021E-4
4.0	-0.0013815	-4.359437884694842E-4
6.0	-0.0012288	-6.265703321394782E-5
10.0	-0.0010772	1.7694650290628986E-4
12.5	0.0010894	-9.464126275171773E-5
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</tableData>
                  <tableData breakPoint="4.36871178058E7">
 	0.0	10.0
-5.0	-0.0024077	-9.533469275949311E-4
0.0	-0.002014	-8.053862241104714E-4
2.0	-0.0016196	-6.576279186102029E-4
4.0	-0.0014624	-4.3791911279505557E-4
6.0	-0.0013059	-5.1126960335736346E-5
10.0	-0.0011503	-3.086248854022361E-4
12.5	0.0011503	3.446057950563172E-4
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</tableData>
                  <tableData breakPoint="4.48073003136E7">
 	0.0	10.0
-5.0	-0.0023021	-7.705542414147072E-4
0.0	-0.0019191	-6.911560554376892E-4
2.0	-0.0015348	-5.744492172797021E-4
4.0	-0.0013815	-4.359437884694842E-4
6.0	-0.0012288	-6.265703321394782E-5
10.0	-0.0010772	1.7694650290628986E-4
12.5	0.0010894	-9.464126275171773E-5
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</tableData>
               </table>
            </product>
         </function>
         <function name="aero/function/rudder_side_coeff_effect">
            <sum>
               <p>aero/function/rudder_side_coeff_basic_Mach_deflection</p>
               <p>aero/function/side_coeff_basic_Mach</p>
            </sum>
         </function>
         <function name="aero/forces/rudder_side_basic_Mach">
            <description>side force due to alpha beta Reynolds number and Mach number</description>
            <product>
               <property>aero/qbar-psf</property>
               <property>metrics/Sw-sqft</property>
               <property>aero/function/rudder_side_coeff_effect</property>
            </product>
         </function>
         <function name="aero/function/flap_side_coeff_basic_Mach_deflection">
            <product>
               <interpolate1d>
                  <p>fcs/flap-pos-deg</p>
                  <v>-3.000000</v>
                  <p>aero/function/flap_side_coeff_basic_Mach_deflection_0</p>
                  <v>3.0000</v>
                  <p>aero/function/flap_side_coeff_basic_Mach_deflection_1</p>
               </interpolate1d>
            </product>
         </function>
         <function name="aero/function/flap_side_coeff_basic_Mach_deflection_0">
            <product>
               <interpolate1d>
                  <p>velocities/mach</p>
                  <v>0.2000</v>
                  <p>aero/function/flap_side_coeff_basic_M0_deflection_0</p>
                  <v>0.6000</v>
                  <p>aero/function/flap_side_coeff_basic_M1_deflection_0</p>
                  <v>0.7800</v>
                  <p>aero/function/flap_side_coeff_basic_M2_deflection_0</p>
                  <v>0.8000</v>
                  <p>aero/function/flap_side_coeff_basic_M3_deflection_0</p>
               </interpolate1d>
            </product>
         </function>
         <function name="aero/function/flap_side_coeff_basic_M0_deflection_0">
            <product>
               <table>
                  <independentVar lookup="row">aero/alpha-deg</independentVar>
                  <independentVar lookup="column">aero/beta-deg</independentVar>
                  <independentVar lookup="table">aero/Re</independentVar>
                  <tableData breakPoint="1.12018250784E7">
 	0.0	10.0
-5.0	6.0879E-10	0.0020876635504239213
0.0	6.7692E-10	8.363772027257857E-4
2.0	7.4366E-10	4.600198375615792E-4
4.0	7.6342E-10	1.855855283134974E-4
6.0	7.6919E-10	5.016604769050394E-5
10.0	7.515400000000001E-10	-6.335952650250317E-4
12.5	-7.5978E-10	0.0013229131269340002
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</tableData>
                  <tableData breakPoint="3.36054752352E7">
 	0.0	10.0
-5.0	-2.6274E-4	0.0016385150650628213
0.0	-2.7257E-4	3.909357712535837E-4
2.0	-3.077E-4	-0.0013156924839222057
4.0	-3.2946E-4	-0.0921820366430753
6.0	-3.5404E-4	0.003218192816656802
10.0	-3.7751E-4	0.007330415455846294
12.5	4.2002E-4	-0.006751135345032827
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</tableData>
                  <tableData breakPoint="4.36871178058E7">
 	0.0	10.0
-5.0	6.0879E-10	0.0020876635504239213
0.0	6.7692E-10	8.363772027257857E-4
2.0	7.4366E-10	4.600198375615792E-4
4.0	7.6342E-10	1.855855283134974E-4
6.0	7.6919E-10	5.016604769050394E-5
10.0	7.515400000000001E-10	-6.335952650250317E-4
12.5	-7.5978E-10	0.0013229131269340002
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</tableData>
                  <tableData breakPoint="4.48073003136E7">
 	0.0	10.0
-5.0	-2.6274E-4	0.0016385150650628213
0.0	-2.7257E-4	3.909357712535837E-4
2.0	-3.077E-4	-0.0013156924839222057
4.0	-3.2946E-4	-0.0921820366430753
6.0	-3.5404E-4	0.003218192816656802
10.0	-3.7751E-4	0.007330415455846294
12.5	4.2002E-4	-0.006751135345032827
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</tableData>
               </table>
            </product>
         </function>
         <function name="aero/function/flap_side_coeff_basic_M1_deflection_0">
            <product>
               <table>
                  <independentVar lookup="row">aero/alpha-deg</independentVar>
                  <independentVar lookup="column">aero/beta-deg</independentVar>
                  <independentVar lookup="table">aero/Re</independentVar>
                  <tableData breakPoint="1.12018250784E7">
 	0.0	10.0
-5.0	6.0879E-10	0.0020876635504239213
0.0	6.7692E-10	8.363772027257857E-4
2.0	7.4366E-10	4.600198375615792E-4
4.0	7.6342E-10	1.855855283134974E-4
6.0	7.6919E-10	5.016604769050394E-5
10.0	7.515400000000001E-10	-6.335952650250317E-4
12.5	-7.5978E-10	0.0013229131269340002
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</tableData>
                  <tableData breakPoint="3.36054752352E7">
 	0.0	10.0
-5.0	-2.6274E-4	0.0016385150650628213
0.0	-2.7257E-4	3.909357712535837E-4
2.0	-3.077E-4	-0.0013156924839222057
4.0	-3.2946E-4	-0.0921820366430753
6.0	-3.5404E-4	0.003218192816656802
10.0	-3.7751E-4	0.007330415455846294
12.5	4.2002E-4	-0.006751135345032827
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</tableData>
                  <tableData breakPoint="4.36871178058E7">
 	0.0	10.0
-5.0	6.0879E-10	0.0020876635504239213
0.0	6.7692E-10	8.363772027257857E-4
2.0	7.4366E-10	4.600198375615792E-4
4.0	7.6342E-10	1.855855283134974E-4
6.0	7.6919E-10	5.016604769050394E-5
10.0	7.515400000000001E-10	-6.335952650250317E-4
12.5	-7.5978E-10	0.0013229131269340002
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</tableData>
                  <tableData breakPoint="4.48073003136E7">
 	0.0	10.0
-5.0	-2.6274E-4	0.0016385150650628213
0.0	-2.7257E-4	3.909357712535837E-4
2.0	-3.077E-4	-0.0013156924839222057
4.0	-3.2946E-4	-0.0921820366430753
6.0	-3.5404E-4	0.003218192816656802
10.0	-3.7751E-4	0.007330415455846294
12.5	4.2002E-4	-0.006751135345032827
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</tableData>
               </table>
            </product>
         </function>
         <function name="aero/function/flap_side_coeff_basic_M2_deflection_0">
            <product>
               <table>
                  <independentVar lookup="row">aero/alpha-deg</independentVar>
                  <independentVar lookup="column">aero/beta-deg</independentVar>
                  <independentVar lookup="table">aero/Re</independentVar>
                  <tableData breakPoint="1.12018250784E7">
 	0.0	10.0
-5.0	7.4562E-10	0.0025568300682657225
0.0	8.2905E-10	0.0010243515247326136
2.0	9.107900000000001E-10	5.634018230518378E-4
4.0	9.349899999999999E-10	2.2730033820637127E-4
6.0	9.4206E-10	6.141362883470057E-5
10.0	9.2045E-10	-7.759895459147758E-4
12.5	-9.3052E-10	0.0016202455640504983
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</tableData>
                  <tableData breakPoint="3.36054752352E7">
 	0.0	10.0
-5.0	-3.21783E-4	0.002006815948276045
0.0	-3.3382999999999997E-4	4.787965622424328E-4
2.0	-3.7685E-4	-0.0016113140264189336
4.0	-4.0350000000000005E-4	-0.11290028174298516
6.0	-4.3361E-4	0.003941478061387349
10.0	-4.6234999999999994E-4	0.008977894785944329
12.5	5.1442E-4	-0.008268315123939657
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</tableData>
                  <tableData breakPoint="4.36871178058E7">
 	0.0	10.0
-5.0	7.4562E-10	0.0025568300682657225
0.0	8.2905E-10	0.0010243515247326136
2.0	9.107900000000001E-10	5.634018230518378E-4
4.0	9.349899999999999E-10	2.2730033820637127E-4
6.0	9.4206E-10	6.141362883470057E-5
10.0	9.2045E-10	-7.759895459147758E-4
12.5	-9.3052E-10	0.0016202455640504983
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</tableData>
                  <tableData breakPoint="4.48073003136E7">
 	0.0	10.0
-5.0	-3.21783E-4	0.002006815948276045
0.0	-3.3382999999999997E-4	4.787965622424328E-4
2.0	-3.7685E-4	-0.0016113140264189336
4.0	-4.0350000000000005E-4	-0.11290028174298516
6.0	-4.3361E-4	0.003941478061387349
10.0	-4.6234999999999994E-4	0.008977894785944329
12.5	5.1442E-4	-0.008268315123939657
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</tableData>
               </table>
            </product>
         </function>
         <function name="aero/function/flap_side_coeff_basic_M3_deflection_0">
            <product>
               <table>
                  <independentVar lookup="row">aero/alpha-deg</independentVar>
                  <independentVar lookup="column">aero/beta-deg</independentVar>
                  <independentVar lookup="table">aero/Re</independentVar>
                  <tableData breakPoint="1.12018250784E7">
 	0.0	10.0
-5.0	7.4562E-10	0.0025568300682657225
0.0	8.2905E-10	0.0010243515247326136
2.0	9.107900000000001E-10	5.634018230518378E-4
4.0	9.349899999999999E-10	2.2730033820637127E-4
6.0	9.4206E-10	6.141362883470057E-5
10.0	9.2045E-10	-7.759895459147758E-4
12.5	-9.3052E-10	0.0016202455640504983
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</tableData>
                  <tableData breakPoint="3.36054752352E7">
 	0.0	10.0
-5.0	-3.21783E-4	0.002006815948276045
0.0	-3.3382999999999997E-4	4.787965622424328E-4
2.0	-3.7685E-4	-0.0016113140264189336
4.0	-4.0350000000000005E-4	-0.11290028174298516
6.0	-4.3361E-4	0.003941478061387349
10.0	-4.6234999999999994E-4	0.008977894785944329
12.5	5.1442E-4	-0.008268315123939657
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</tableData>
                  <tableData breakPoint="4.36871178058E7">
 	0.0	10.0
-5.0	7.4562E-10	0.0025568300682657225
0.0	8.2905E-10	0.0010243515247326136
2.0	9.107900000000001E-10	5.634018230518378E-4
4.0	9.349899999999999E-10	2.2730033820637127E-4
6.0	9.4206E-10	6.141362883470057E-5
10.0	9.2045E-10	-7.759895459147758E-4
12.5	-9.3052E-10	0.0016202455640504983
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</tableData>
                  <tableData breakPoint="4.48073003136E7">
 	0.0	10.0
-5.0	-3.21783E-4	0.002006815948276045
0.0	-3.3382999999999997E-4	4.787965622424328E-4
2.0	-3.7685E-4	-0.0016113140264189336
4.0	-4.0350000000000005E-4	-0.11290028174298516
6.0	-4.3361E-4	0.003941478061387349
10.0	-4.6234999999999994E-4	0.008977894785944329
12.5	5.1442E-4	-0.008268315123939657
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</tableData>
               </table>
            </product>
         </function>
         <function name="aero/function/flap_side_coeff_basic_Mach_deflection_1">
            <product>
               <interpolate1d>
                  <p>velocities/mach</p>
                  <v>0.2000</v>
                  <p>aero/function/flap_side_coeff_basic_M0_deflection_1</p>
                  <v>0.6000</v>
                  <p>aero/function/flap_side_coeff_basic_M1_deflection_1</p>
                  <v>0.7800</v>
                  <p>aero/function/flap_side_coeff_basic_M2_deflection_1</p>
                  <v>0.8000</v>
                  <p>aero/function/flap_side_coeff_basic_M3_deflection_1</p>
               </interpolate1d>
            </product>
         </function>
         <function name="aero/function/flap_side_coeff_basic_M0_deflection_1">
            <product>
               <table>
                  <independentVar lookup="row">aero/alpha-deg</independentVar>
                  <independentVar lookup="column">aero/beta-deg</independentVar>
                  <independentVar lookup="table">aero/Re</independentVar>
                  <tableData breakPoint="1.12018250784E7">
 	0.0	10.0
-5.0	9.532E-10	0.0032686824955127183
0.0	1.05987E-9	0.0013095341843733042
2.0	1.16436E-9	7.202625591389774E-4
4.0	1.19529E-9	2.9058305186114246E-4
6.0	1.20433E-9	7.851230445037967E-5
10.0	1.1767E-9	-9.921427436128838E-4
12.5	-1.18959E-9	0.002071314052680699
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</tableData>
                  <tableData breakPoint="3.36054752352E7">
 	0.0	10.0
-5.0	-4.1137E-4	0.0025654566934302163
0.0	-4.2677E-4	6.120453324510021E-4
2.0	-4.8176E-4	-0.0020599696281838357
4.0	-5.158299999999999E-4	-0.14433622480295594
6.0	-5.543000000000001E-4	0.005038856707750876
10.0	-5.9105E-4	0.011476881252831203
12.5	6.576800000000001E-4	-0.010569995797449293
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</tableData>
                  <tableData breakPoint="4.36871178058E7">
 	0.0	10.0
-5.0	9.532E-10	0.0032686824955127183
0.0	1.05987E-9	0.0013095341843733042
2.0	1.16436E-9	7.202625591389774E-4
4.0	1.19529E-9	2.9058305186114246E-4
6.0	1.20433E-9	7.851230445037967E-5
10.0	1.1767E-9	-9.921427436128838E-4
12.5	-1.18959E-9	0.002071314052680699
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</tableData>
                  <tableData breakPoint="4.48073003136E7">
 	0.0	10.0
-5.0	-4.1137E-4	0.0025654566934302163
0.0	-4.2677E-4	6.120453324510021E-4
2.0	-4.8176E-4	-0.0020599696281838357
4.0	-5.158299999999999E-4	-0.14433622480295594
6.0	-5.543000000000001E-4	0.005038856707750876
10.0	-5.9105E-4	0.011476881252831203
12.5	6.576800000000001E-4	-0.010569995797449293
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</tableData>
               </table>
            </product>
         </function>
         <function name="aero/function/flap_side_coeff_basic_M1_deflection_1">
            <product>
               <table>
                  <independentVar lookup="row">aero/alpha-deg</independentVar>
                  <independentVar lookup="column">aero/beta-deg</independentVar>
                  <independentVar lookup="table">aero/Re</independentVar>
                  <tableData breakPoint="1.12018250784E7">
 	0.0	10.0
-5.0	9.532E-10	0.0032686824955127183
0.0	1.05987E-9	0.0013095341843733042
2.0	1.16436E-9	7.202625591389774E-4
4.0	1.19529E-9	2.9058305186114246E-4
6.0	1.20433E-9	7.851230445037967E-5
10.0	1.1767E-9	-9.921427436128838E-4
12.5	-1.18959E-9	0.002071314052680699
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</tableData>
                  <tableData breakPoint="3.36054752352E7">
 	0.0	10.0
-5.0	-4.1137E-4	0.0025654566934302163
0.0	-4.2677E-4	6.120453324510021E-4
2.0	-4.8176E-4	-0.0020599696281838357
4.0	-5.158299999999999E-4	-0.14433622480295594
6.0	-5.543000000000001E-4	0.005038856707750876
10.0	-5.9105E-4	0.011476881252831203
12.5	6.576800000000001E-4	-0.010569995797449293
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</tableData>
                  <tableData breakPoint="4.36871178058E7">
 	0.0	10.0
-5.0	9.532E-10	0.0032686824955127183
0.0	1.05987E-9	0.0013095341843733042
2.0	1.16436E-9	7.202625591389774E-4
4.0	1.19529E-9	2.9058305186114246E-4
6.0	1.20433E-9	7.851230445037967E-5
10.0	1.1767E-9	-9.921427436128838E-4
12.5	-1.18959E-9	0.002071314052680699
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</tableData>
                  <tableData breakPoint="4.48073003136E7">
 	0.0	10.0
-5.0	-4.1137E-4	0.0025654566934302163
0.0	-4.2677E-4	6.120453324510021E-4
2.0	-4.8176E-4	-0.0020599696281838357
4.0	-5.158299999999999E-4	-0.14433622480295594
6.0	-5.543000000000001E-4	0.005038856707750876
10.0	-5.9105E-4	0.011476881252831203
12.5	6.576800000000001E-4	-0.010569995797449293
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</tableData>
               </table>
            </product>
         </function>
         <function name="aero/function/flap_side_coeff_basic_M2_deflection_1">
            <product>
               <table>
                  <independentVar lookup="row">aero/alpha-deg</independentVar>
                  <independentVar lookup="column">aero/beta-deg</independentVar>
                  <independentVar lookup="table">aero/Re</independentVar>
                  <tableData breakPoint="1.12018250784E7">
 	0.0	10.0
-5.0	9.9416E-10	0.0034091226136072684
0.0	1.1054E-9	0.0013657962447337735
2.0	1.21438E-9	7.51200686105864E-4
4.0	1.24665E-9	3.03057305708172E-4
6.0	1.25608E-9	8.188571996805962E-5
10.0	1.2272600000000002E-9	-0.0010346500289638246
12.5	-1.2407E-9	0.002160252728910724
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</tableData>
                  <tableData breakPoint="3.36054752352E7">
 	0.0	10.0
-5.0	-4.2905000000000005E-4	0.002675697992790167
0.0	-4.451E-4	6.383846168904971E-4
2.0	-5.024599999999999E-4	-0.002148480072925561
4.0	-5.380099999999999E-4	-0.15052818746115357
6.0	-5.781499999999999E-4	0.005255363979136174
10.0	-6.164800000000001E-4	0.011970825616317453
12.5	6.858999999999999E-4	-0.01102472601606563
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</tableData>
                  <tableData breakPoint="4.36871178058E7">
 	0.0	10.0
-5.0	9.9416E-10	0.0034091226136072684
0.0	1.1054E-9	0.0013657962447337735
2.0	1.21438E-9	7.51200686105864E-4
4.0	1.24665E-9	3.03057305708172E-4
6.0	1.25608E-9	8.188571996805962E-5
10.0	1.2272600000000002E-9	-0.0010346500289638246
12.5	-1.2407E-9	0.002160252728910724
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</tableData>
                  <tableData breakPoint="4.48073003136E7">
 	0.0	10.0
-5.0	-4.2905000000000005E-4	0.002675697992790167
0.0	-4.451E-4	6.383846168904971E-4
2.0	-5.024599999999999E-4	-0.002148480072925561
4.0	-5.380099999999999E-4	-0.15052818746115357
6.0	-5.781499999999999E-4	0.005255363979136174
10.0	-6.164800000000001E-4	0.011970825616317453
12.5	6.858999999999999E-4	-0.01102472601606563
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</tableData>
               </table>
            </product>
         </function>
         <function name="aero/function/flap_side_coeff_basic_M3_deflection_1">
            <product>
               <table>
                  <independentVar lookup="row">aero/alpha-deg</independentVar>
                  <independentVar lookup="column">aero/beta-deg</independentVar>
                  <independentVar lookup="table">aero/Re</independentVar>
                  <tableData breakPoint="1.12018250784E7">
 	0.0	10.0
-5.0	9.9416E-10	0.0034091226136072684
0.0	1.1054E-9	0.0013657962447337735
2.0	1.21438E-9	7.51200686105864E-4
4.0	1.24665E-9	3.03057305708172E-4
6.0	1.25608E-9	8.188571996805962E-5
10.0	1.2272600000000002E-9	-0.0010346500289638246
12.5	-1.2407E-9	0.002160252728910724
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</tableData>
                  <tableData breakPoint="3.36054752352E7">
 	0.0	10.0
-5.0	-4.2905000000000005E-4	0.002675697992790167
0.0	-4.451E-4	6.383846168904971E-4
2.0	-5.024599999999999E-4	-0.002148480072925561
4.0	-5.380099999999999E-4	-0.15052818746115357
6.0	-5.781499999999999E-4	0.005255363979136174
10.0	-6.164800000000001E-4	0.011970825616317453
12.5	6.858999999999999E-4	-0.01102472601606563
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</tableData>
                  <tableData breakPoint="4.36871178058E7">
 	0.0	10.0
-5.0	9.9416E-10	0.0034091226136072684
0.0	1.1054E-9	0.0013657962447337735
2.0	1.21438E-9	7.51200686105864E-4
4.0	1.24665E-9	3.03057305708172E-4
6.0	1.25608E-9	8.188571996805962E-5
10.0	1.2272600000000002E-9	-0.0010346500289638246
12.5	-1.2407E-9	0.002160252728910724
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</tableData>
                  <tableData breakPoint="4.48073003136E7">
 	0.0	10.0
-5.0	-4.2905000000000005E-4	0.002675697992790167
0.0	-4.451E-4	6.383846168904971E-4
2.0	-5.024599999999999E-4	-0.002148480072925561
4.0	-5.380099999999999E-4	-0.15052818746115357
6.0	-5.781499999999999E-4	0.005255363979136174
10.0	-6.164800000000001E-4	0.011970825616317453
12.5	6.858999999999999E-4	-0.01102472601606563
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</tableData>
               </table>
            </product>
         </function>
         <function name="aero/function/flap_side_coeff_effect">
            <sum>
               <p>aero/function/flap_side_coeff_basic_Mach_deflection</p>
               <p>aero/function/side_coeff_basic_Mach</p>
            </sum>
         </function>
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