<?xml version="1.0" encoding="UTF-8"?>
<turbine_engine name="D150_AGILE_engine">
   <milthrust unit="N">104530.000</milthrust>
   <bypassratio>1.5000</bypassratio>
   <idlen1>30</idlen1>
   <idlen2>60</idlen2>
   <maxn1>100</maxn1>
   <maxn2>100</maxn2>
   <augmented>0</augmented>
   <injected>0</injected>
   <function name="IdleThrust">
      <value>0.0300</value>
   </function>
   <function name="MilThrust">
      <value>1.0000</value>
   </function>
</turbine_engine>
